# 5.4 Расчет шума двигателя
ORIGIN := 1
# Для определения шума вентилятора необходимо знать следующие параметры:
#
# Расход воздуха через вентилятор...............................G_в := 282 кг/с
#
# Адиабатический напор..............................................H_ад := 2.413*10^4 Дж/кг
#
# Коэффициент полезного действия в вентиляторе......η_в := 0.82
#
# Диаметр вентилятора.................................................D_в := 2.31 м
#
# Частота вращения вала...............................................n_в := 2676 об/мин
#
# Плотность воздуха на входе в вентилятор...................ρ_в := 0.878 кг/м^3
#
# Скорость звука............................................................a_зв := 340.5 м/с
j := 1, 2 .. 9
f := [31.5; 63; 125; 250; 500; 1000; 2000; 4000; 8000]
ΔL_в := -1*[-30; -23; -18; -13; -8; -18; -10; -17; -11]  # дБ
# Формула 4.35
# Таблица 4.2 127 стр
# Звуковая мощность шума всасывания вентилятора:
P_зв := 1/2*((1 - η_в)/η_в)^2*G_в*H_ад^2/(ρ_в*a_зв^3*D_в^2) = 21.3885  # Вт
# Уровень звуковой мощности:
L_w.в := 10*log(P_зв/10^-12) = 133.302  # дБ
# Безразмерные спектры звуковой мощности вентилятора ΔL_в
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# Уровень звуковой мощности в полосах частот:
L_в.f[j] := L_w.в - ΔL_в[j]
transpose(L_в.f) = [103.302, 110.302, 115.302, 120.302, 125.302, 115.302, 123.302, 116.302, 122.302]
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# Определение уровня звуковой мощности сопла
# Для определения сопла вентилятора необходимо знать следующие параметры:
# Коэффициент направленности...............................Ф := 1
# Скорость истечения газ  из сопла...........................C_c := 280 м/с
# Площадь на срезе сопла..........................................F_c := 0.709 м2
# Диаметр среза сопла...............................................*D =2.44 м
# Плотность газа........................................................ρ_c := 0.327 кг./м3
L_p0 := -44  # дБ
Ω := 4*π
D := 2.44
80*log(C_c) = 195.773
20*log(ρ_c) = -9.70904
# Уровень звуковой мощности струи:
10*log(F_c) = -1.49354
L_w.p.с := 80*log(C_c) + 10*log(F_c) + 20*log(ρ_c) + L_p0 = 140.57  # дБ
L_w.p.с == 246.3 - 4.7 - 12.7 - 44 == 163.4  # дБ
# где
L_p0 = -44  # -для горячих струй
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# Определяем число Струхаля по формуле:
Sh[j] := f[j]*D/C_c
transpose(Sh) = [0.2745, 0.549, 1.08929, 2.17857, 4.35714, 8.71429, 17.4286, 34.8571, 69.7143]
ΔL_p.с := [-30; -25; -20; -15; -10; -11; -13; -15; -18]  # дБ
# По рис.1( [1] рис 4.4 стр112): определяем уровни звуковой мощности в полосах  частот  (L_p.с.f[j]).
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transpose(ΔL_p.с) = [-30, -25, -20, -15, -10, -11, -13, -15, -18]
L_p.с.f[j] := L_w.p.с + ΔL_p.с[j]
# где ΔL_p.с.j=L_w.p.с-L_p.с.f.j
transpose(L_p.с.f) = [110.57, 115.57, 120.57, 125.57, 130.57, 129.57, 127.57, 125.57, 122.57]
i := 1, 2 .. 5
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f := [31.5; 63; 125; 250; 500; 1000; 2000; 4000; 8000]
r := [0.5; 1; 1.5; 2; 2.5]
L_н := [79; 63; 52; 45; 39; 35; 32; 30; 28]
# Определение уровня звукового давления вентилятора и сопла на некотором расстоянии r
# Уровень звукового давления, создаваемая точечным источником на расстоянии r от него в однородной среде с учетом всех поглощений и препятствий ([1]  стр169):
β := [0.4; 0.7; 0.9; 1.9; 3.5; 8.2; 26; 88; 255]
L(r) == L_p + 10*log(Ф) - 10*log(Ω) - 20*log(r) - ΔL_а - ΔL_э
transpose(β) = [0.4, 0.7, 0.9, 1.9, 3.5, 8.2, 26, 88, 255]
# где Ω=4*π полный пространственный угол,ΔL_а - поглощение звука воздухом,ΔL_э - поглощение звука препятствиями
# По данным ([1]  стр174):
ΔL_э := 20  # дБ
ΔL_а[i, j] := β[j]*r[i]
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# По этой формуле рассчитываем уровни звукового давления вентилятора и сопла на расстоянии r:
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L_в[i, j] := L_в.f[j] + 10*log(Ф) - 10*log(Ω) - 20*log(r[i]*1000) - ΔL_а[i, j] - ΔL_э
L_p.с[i, j] := L_p.с.f[j] + 10*log(Ф) - 10*log(Ω) - 20*log(r[i]*1000) - ΔL_а[i, j] - ΔL_э
# Сумма шумов от вентилятора и сопла равна:
L_Σ[i, j] := 10*log(10^(0.1*L_p.с[i, j]) + 10^(0.1*L_в[i, j]))
# Согласно СН 2.2.4/2.1.8.562-96  (таблица 3) нормативные значения уровней звукового давления шума для жилых домов:
transpose(L_н) = [79, 63, 52, 45, 39, 35, 32, 30, 28]
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ΔL_а = [
    0.2, 0.35, 0.45, 0.95, 1.75, 4.1, 13, 44, 127.5;
    0.4, 0.7, 0.9, 1.9, 3.5, 8.2, 26, 88, 255;
    0.6, 1.05, 1.35, 2.85, 5.25, 12.3, 39, 132, 382.5;
    0.8, 1.4, 1.8, 3.8, 7, 16.4, 52, 176, 510;
    1, 1.75, 2.25, 4.75, 8.75, 20.5, 65, 220, 637.5
]
r = [0.5; 1; 1.5; 2; 2.5]
L_p.с = [
    25.3986, 30.2486, 35.1486, 39.6486, 43.8486, 40.4986, 29.5986, -3.40144, -89.9014;
    19.178, 23.878, 28.678, 32.678, 36.078, 30.378, 10.578, -53.422, -223.422;
    15.4561, 20.0061, 24.7061, 28.2061, 30.8061, 22.7561, -5.94386, -100.944, -354.444;
    12.7574, 17.1574, 21.7574, 24.7574, 26.5574, 16.1574, -21.4426, -147.443, -484.443;
    10.6192, 14.8692, 19.3692, 21.8692, 22.8692, 10.1192, -36.3808, -193.381, -613.881
]
# Как видно из вышеприведенного графика минимальным расстоянием является r=1 км.
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