# Вывод ур-я относ. массового расхода горючего, отнесенного к массовому расходу на входе в I контур,
# через относ. массовый расход горючего, отнесенного к массовому расходу на входе в КС.
g_охл_КС3 == G_охл/G_КС3 == G_охл/(G_I - G_охл - G_ут + G_гор)
g_охл_КС3 == G_охл/(G_I - G_охл - G_ут + G_гор) solve, G_охл → g_охл_КС3*(G_I - G_ут + G_гор)/(g_охл_КС3 + 1)  # (Тихонов)
g_гор_КС1 == G_гор/G_КС1 == G_гор/(G_I - G_охл - G_ут)
g_гор_КС1 == G_гор/(G_I - G_охл - G_ут) solve, G_гор → -g_гор_КС1*(G_ут - G_I + G_охл)
g_гор_КС1 == G_гор/(G_I - G_охл - G_ут) substitute, G_охл == g_охл_КС3*(G_I - G_ут + G_гор)/(g_охл_КС3 + 1) → g_гор_КС1 == -G_гор*(g_охл_КС3 + 1)/(G_ут - G_I + G_гор*g_охл_КС3)
g_гор_КС1 == -G_гор*(g_охл_КС3 + 1)/(G_ут - G_I + G_гор*g_охл_КС3) solve, G_гор → (G_I*g_гор_КС1 - G_ут*g_гор_КС1)/(g_охл_КС3 + g_гор_КС1*g_охл_КС3 + 1)
G_гор == (G_I*g_гор_КС1 - G_ут*g_гор_КС1)/(g_охл_КС3 + g_гор_КС1*g_охл_КС3 + 1) == G_I*(g_гор_КС1 - g_ут*g_гор_КС1)/(g_охл_КС3 + g_гор_КС1*g_охл_КС3 + 1)
g_гор == G_гор/G_I == G_I*(g_гор_КС1 - g_ут*g_гор_КС1)/(g_охл_КС3 + g_гор_КС1*g_охл_КС3 + 1)/G_I == (g_гор_КС1 - g_ут*g_гор_КС1)/(g_охл_КС3 + g_гор_КС1*g_охл_КС3 + 1)
# Вывод ур-я Тихонова относ. массового расхода на охлаждение, отнесенного к массовому расходу на входе в I контур,
# через относ. массовый расход на охлаждение, онесенного к массовому расходу на выходе из КС.
g_охл == G_охл/G_I == g_охл_КС3*(G_I - G_ут + G_гор)/(g_охл_КС3 + 1)/G_I == G_I*g_охл_КС3*(1 - g_ут + g_гор)/(g_охл_КС3 + 1)/G_I == g_охл_КС3*(1 - g_ут + g_гор)/(g_охл_КС3 + 1)
# Вывод оптимальной скорости выхода из С I контура
L_e == L_В/(η_РВ*η_мех) + (c_СI^2 - υ^2)/2 + (c_СII^2 - υ^2)/2 solve, L_В → η_РВ*η_мех*(υ^2 - c_СI^2/2 - c_СII^2/2 + L_e)
L_тяг(υ, c_СI, c_СII, L_e, η_мех, η_РВ, η_В, L_В) := L_В*η_В + (c_СI - υ)*υ + (c_СII - υ) substitute, L_В == η_РВ*η_мех*(υ^2 - c_СI^2/2 - c_СII^2/2 + L_e) → c_СII - υ - υ^2 + υ*c_СI + υ^2*η_В*η_РВ*η_мех - c_СI^2*η_В*η_РВ*η_мех/2 - η_В*c_СII^2*η_РВ*η_мех/2 + L_e*η_В*η_РВ*η_мех
d/dc_СI(L_тяг(υ, c_СI, c_СII, L_e, η_мех, η_РВ, η_В, L_В)) → υ - c_СI*η_В*η_РВ*η_мех
d/dc_СI(L_тяг(υ, c_СI, c_СII, L_e, η_мех, η_РВ, η_В, L_В)) == 0 solve, c_СI → υ/(η_В*η_РВ*η_мех)
L_e(υ, c_СI, c_СII, m2, L_ВлII) := m2*L_ВлII + (c_СI(L_ВлII)^2 - υ^2)/2
d/dL_ВлII(L_e(υ, c_СI, c_СII, m2, L_ВлII)) → m2 + c_СI(L_ВлII)*d/dL_ВлII(c_СI(L_ВлII)) solve, d/dL_ВлII(c_СI(L_ВлII)) → -m2/c_СI(L_ВлII)
# Баланс энергии II контура:
L_ВлII*η_II == (c_СII(υ, η_II, L_ВлII)^2 - υ^2)/2 solve, c_СII(υ, η_II, L_ВлII) → [sqrt(υ^2 + 2*η_II*L_ВлII); -sqrt(υ^2 + 2*η_II*L_ВлII)]
c_СII(υ, η_II, L_ВлII) := sqrt(υ^2 + 2*η_II*L_ВлII)
d/dL_ВлII(c_СII(υ, η_II, L_ВлII)) → η_II/sqrt(υ^2 + 2*η_II*L_ВлII)
# Удельная тяга двигателя:
R_уд(υ, c_СI, c_СII, m2, L_ВлII, η_II) := (R_удI + m2*R_удII)/(1 + m2) substitute, R_удI == c_СI(L_ВлII, m2) - υ; substitute, R_удII == c_СII(υ, η_II, L_ВлII) - υ → -(υ - m2*c_СII(υ, η_II, L_ВлII) + υ*m2 - c_СI(L_ВлII, m2))/(m2 + 1)
# Условие получения max тяги:
d/dL_ВлII(R_уд(υ, c_СI, c_СII, m2, L_ВлII, η_II)) == 0
d/dL_ВлII(R_уд(υ, c_СI, c_СII, m2, L_ВлII, η_II)) → (d/dL_ВлII(c_СI(L_ВлII, m2)) + m2*η_II/sqrt(υ^2 + 2*η_II*L_ВлII))/(m2 + 1) substitute, d/dL_ВлII(c_СI(L_ВлII, m2)) == -m2/c_СI(L_ВлII, m2); substitute, d/dL_ВлII(c_СII(υ, η_II, L_ВлII)) == η_II/c_СII(L_ВлII) → -m2*(sqrt(υ^2 + 2*η_II*L_ВлII) - η_II*c_СI(L_ВлII, m2))/(sqrt(υ^2 + 2*η_II*L_ВлII)*(m2 + 1)*c_СI(L_ВлII, m2)) solve, c_СI(L_ВлII, m2) → sqrt(υ^2 + 2*η_II*L_ВлII)/η_II
# Вывод общего ур-я профилирования Л цилиндрической ступени К
# Дано:
# (0)
d/dr(H_т) == d/dr(c_a^2/2) + c_u*(d/dr(c_u)) + c_u^2/r == 0
# =>
d/dr(c_a^2/2) == -c_u*(d/dr(c_u)) - c_u^2/r  # (00)
# Домножим на 2 =>
d/dr(c_a^2) == -2*c_u*(d/dr(c_u)) - 2*c_u^2/r  # (000)
# (1)
(c_1u + c_2u)/2*r^m == const
# (2)
H_т == (c_2u*u_2 - c_1u*u_1) == (c_2u - c_1u)*u
u_1 == ω*r_1
u == ω*r
ω == const
u_1/r_1 == u_2/r_2
1 - (c_1u + c_2u)/(2*u) - (c_a2^2 - c_a1^2)/(2*H_т)
u_2 == ω*r_2
# (3)
R == 1 - (c_1u + c_2u)/(u_1 + u_2) == 1 - (c_1u + c_2u)/(2*u)
# Вывод:
c_1u == (1 - R)*ω*r + H_т/(2*ω*r)  # (c1u)
# (2) (3) =>
c_2u == -(1 - R)*ω*r + H_т/(2*ω*r)  # (c2u)
# (2) =>
(c_1u + c_2u)/2 == (1 - R)*ω*r
# (1):
const == (c_1u + c_2u)/2*r^m == 2 == (1 - R)*ω*r*r^m == (1 - R)*ω*r^(m + 1) == (1 - R_ср)*ω*r_ср^(m + 1)
# =>
(1 - R)*ω == ((1 - R_ср)*ω*r_ср^(m + 1))/r^(m + 1)  # (&)
c_1u(r, m, A, B) := A/r^m - B/r
# (&) -> (c1u)
c_1u == (1 - R)*ω*r - H_т/(2*ω*r) == ((1 - R_ср)*ω*r_ср^(m + 1))/r^(m + 1)*r - H_т/(2*ω*r) == ((1 - R_ср)*ω*r_ср^(m + 1))/r^(m + 1)*r - (H_т/(2*ω))/r
# (AB1)
A == ((1 - R_ср)*ω*r_ср^(m + 1))
c_2u(r, m, A, B) := A/r^m + B/r
# (&) -> (c2u)
c_2u == (1 - R)*ω*r + H_т/(2*ω*r) == ((1 - R_ср)*ω*r_ср^(m + 1))/r^(m + 1)*r + H_т/(2*ω*r) == ((1 - R_ср)*ω*r_ср^(m + 1))/r^(m + 1)*r + (H_т/(2*ω))/r
# (AB2)
B == (H_т/(2*ω))
c_a1^2 - c_a1.ср^2 == integral(-2*c_u1*(d/dr(c_u1)) - 2*c_u1^2/r, r = r_ср .. r)
c_a1 == sqrt(c_a1.ср^2 + integral(-2*c_u1*(d/dr(c_u1)) - 2*c_u1^2/r, r = r_ср .. r))
# (000)
integral(d/dr(c_a^2), r = r_ср .. r) == c_a^2 - c_a.ср^2 == integral(-2*c_u*(d/dr(c_u)) - 2*c_u^2/r, r = r_ср .. r)  # =>
# =>
# (0000)
c_a2^2 - c_a2.ср^2 == integral(-2*c_u2*(d/dr(c_u2)) - 2*c_u2^2/r, r = r_ср .. r)
c_a2 == sqrt(c_a2.ср^2 + integral(-2*c_u2*(d/dr(c_u2)) - 2*c_u2^2/r, r = r_ср .. r))
sqrt(c_a1.ср^2 + integral(-2*c_1u(r, m, A, B)*(d/dr(c_1u(r, m, A, B))) - 2*c_1u(r, m, A, B)^2/r, r = r_ср .. r)) assume, r_ср > 0, r ≥ 0, m == -1; substitute, m == -1 → sqrt(c_a1.ср^2 - 2*A^2*r^2 + 2*A^2*r_ср^2 + 4*A*B*ln(r) - 4*A*B*ln(r_ср))
sqrt(c_a2.ср^2 + integral(-2*c_2u(r, m, A, B)*(d/dr(c_2u(r, m, A, B))) - 2*c_2u(r, m, A, B)^2/r, r = r_ср .. r)) assume, r_ср > 0, r ≥ 0, m == -1; substitute, m == -1 → sqrt(c_a2.ср^2 - 2*A^2*r^2 + 2*A^2*r_ср^2 - 4*A*B*ln(r) + 4*A*B*ln(r_ср))
sqrt(c_a1.ср^2 + integral(-2*c_1u(r, m, A, B)*(d/dr(c_1u(r, m, A, B))) - 2*c_1u(r, m, A, B)^2/r, r = r_ср .. r)) assume, r_ср > 0, r ≥ 0, m == 0 → sqrt(2*A^2*ln(r_ср) - 2*A^2*ln(r) + c_a1.ср^2 - 2*A*B/r + 2*A*B/r_ср)
sqrt(c_a2.ср^2 + integral(-2*c_2u(r, m, A, B)*(d/dr(c_2u(r, m, A, B))) - 2*c_2u(r, m, A, B)^2/r, r = r_ср .. r)) assume, r_ср > 0, r ≥ 0, m == 0 → sqrt(2*A^2*ln(r_ср) - 2*A^2*ln(r) + c_a2.ср^2 + 2*A*B/r - 2*A*B/r_ср)
sqrt(c_a1.ср^2 + integral(-2*c_1u(r, m, A, B)*(d/dr(c_1u(r, m, A, B))) - 2*c_1u(r, m, A, B)^2/r, r = r_ср .. r)) assume, r_ср > 0, r ≥ 0, -1 < m ≤ 1, m ≠ 0 → sqrt(c_a1.ср^2 + A*(m - 1)*(A*r*r^(2*m)*r_ср - A*r*r_ср*r_ср^(2*m) - 2*B*m*r*r^(2*m)*r_ср^m + 2*B*m*r^m*r_ср*r_ср^(2*m) + A*m*r*r^(2*m)*r_ср - A*m*r*r_ср*r_ср^(2*m))/(m*(m + 1)*(r*r_ср)^(2*m + 1)))
sqrt(c_a2.ср^2 + integral(-2*c_2u(r, m, A, B)*(d/dr(c_2u(r, m, A, B))) - 2*c_2u(r, m, A, B)^2/r, r = r_ср .. r)) assume, r_ср > 0, r ≥ 0, -1 < m ≤ 1, m ≠ 0 → sqrt(c_a2.ср^2 + A*(m - 1)*(A*r*r^(2*m)*r_ср - A*r*r_ср*r_ср^(2*m) + 2*B*m*r*r^(2*m)*r_ср^m - 2*B*m*r^m*r_ср*r_ср^(2*m) + A*m*r*r^(2*m)*r_ср - A*m*r*r_ср*r_ср^(2*m))/(m*(m + 1)*(r*r_ср)^(2*m + 1)))
# Вывод общего ур-я профилирования Л цилиндрической ступени Т
# (1)
(c_1u + c_2u)/2*r^m == const
const == (c_1u + c_2u)/2*r^m == 3 == (1 - R)*ω*r*r^m == (1 - R)*ω*r^(m + 1) == (1 - R_ср)*ω*r_ср^(m + 1)
# =>
(1 - R)*ω*r == ((1 - R_ср)*ω*r_ср^(m + 1))/r^m
A == ((1 - R_ср)*ω*r_ср^(m + 1))
c_1u(r, m, A, B) := A/r^m + B/r
c_1u == c_2u + L_u/(ω*r)
# (2)
L_u == c_2u*u_2 + c_1u*u_1 == (c_2u + c_1u)*u
u == ω*r
L_u == c_2u*ω*r_2 + c_1u*ω*r_1 == (c_2u + c_1u)*ω*r
c_2u(r, m, A, B) := -A/r^m + B/r
c_2u == c_1u + L_u/(ω*r)
c_1u == (1 - R)*ω*r + L_u/(2*ω*r) == (1 - R)*ω*r + (L_u/(2*ω))/r
B == (L_u/(2*ω))
c_1u == (1 - R)*2*ω*r - c_2u
# (3)
R == 1 - (c_1u - c_2u)/(2*u)
u == ω*r
R == 1 - (c_1u - c_2u)/(2*ω*r)
c_2u == -(1 - R)*ω*r + L_u/(2*ω*r) == -(1 - R)*ω*r + (L_u/(2*ω))/r
c_2u == -(1 - R)*2*ω*r - c_1u
# Работа сил трения:
L_тр == (1/φ^2 - 1)*c_1^2/2 == c_1^2/(2*φ^2) - c_1^2/2
# Работа гидравлических сил сопротивления:
L_гид == (1/φ^2 - 1)*c_1^2/2 + (1/ψ^2 - 1)*w_2^2/2 == (1/φ^2 - 1)*(c_a1^2 + c_u1^2)/2 + (1/ψ^2 - 1)*((c_2u + u_2)^2 + c_2a^2)/2
# Ур-е радиадьного равновесия:
1/ρ*d/dr(P) == c_u^2/r
0 == c_1^2/2 + integral(1/ρ, P = 0 .. 1) + L_тр  # Допущения:
φ(r) == const
d/dr(φ(r)) == 0
1/ρ*dP + d(c_1^2/2) + d(L_тр) == d(H_т)
# Ур-е Бернулли:
H_т(r) == const
d/dr(H_т(r)) == 0
ψ(r) == const
d/dr(ψ(r)) == 0
1/ρ*dP + d(c_2^2/2) + d(L_гид) + d(L_ст) == d(H_т)
0 == c_2^2/2 + integral(1/ρ, P = 0 .. 2) + L_гид + L_ст
0 == c_1^2/2 + integral(1/ρ, P = 0 .. 1) + L_тр == c_1^2/2 + integral(1/ρ, P = 0 .. 1) + c_1^2/(2*φ^2) - c_1^2/2 == c_1^2/(2*φ^2) + integral(1/ρ, P = 0 .. 1) == (c_a1^2 + c_u1^2)/(2*φ^2) + integral(1/ρ, P = 0 .. 1) == 1/φ^2*(c_a1^2/2 + c_u1^2/2) + integral(1/ρ, P = 0 .. 1)
0 == d/dr(1/φ^2*(c_a1^2/2 + c_u1^2/2) + integral(1/ρ, P = 0 .. 1)) == 1/φ^2*(c_a1*d/dr(c_a1) + c_u1*d/dr(c_u1)) + 1/ρ*d/dr(P) == 1/φ^2*(c_a1*d/dr(c_a1) + c_u1*d/dr(c_u1)) + c_u1^2/r
1/φ^2*(c_a1*d/dr(c_a1) + c_u1*d/dr(c_u1)) + c_u1^2/r == 0
d/dr(c_a1^2/2) == -c_u1*(d/dr(c_u1)) - φ^2*c_u1^2/r
d/dr(c_a1^2) == -2*c_u1*(d/dr(c_u1)) - 2*φ^2*c_u1^2/r
integral(d/dr(c_a1^2), r = r_ср .. r) == c_a1^2 - c_a1.ср^2 == integral(-2*c_u1*(d/dr(c_u1)) - 2*φ^2*c_u1^2/r, r = r_ср .. r)
c_a1 == sqrt(c_a1.ср^2 + integral(-2*c_u1*(d/dr(c_u1)) - 2*φ^2*c_u1^2/r, r = r_ср .. r))  # (c.a1)
0 == d/dr(c_a2^2) + d/dr(c_u2^2) + (1/φ^2 - 1)*ψ^2*(d/dr(c_a1^2) + d/dr(c_u1^2)) + ψ^2*2*c_u2^2/r + (1 - ψ^2)*d/dr(2*c_u2*u + u^2)
d/dr(c_a2^2) == -d/dr(c_u2^2) - (1/φ^2 - 1)*ψ^2*(d/dr(c_a1^2) + d/dr(c_u1^2)) - ψ^2*2*c_u2^2/r - (1 - ψ^2)*d/dr(2*c_u2*ω*r + (ω*r)^2)
integral(d/dr(c_a2^2), r = r_ср .. r) == c_a2^2 - c_a2.ср^2 == integral(-d/dr(c_u2^2) - (1/φ^2 - 1)*ψ^2*(d/dr(c_a1^2) + d/dr(c_u1^2)) - ψ^2*2*c_u2^2/r - (1 - ψ^2)*d/dr(2*c_u2*ω*r + (ω*r)^2), r = r_ср .. r) == integral(-d/dr(c_u2^2) - (1/φ^2 - 1)*ψ^2*(d/dr(c_a1^2) + d/dr(c_u1^2)) - ψ^2*2*c_u2^2/r - (1 - ψ^2)*d/dr(2*c_u2*ω*r + (ω*r)^2), r = r_ср .. r)
c_a2 == sqrt(c_a2.ср^2 + integral(-d/dr(c_u2^2) - (1/φ^2 - 1)*ψ^2*(d/dr(c_a1^2) + d/dr(c_u1^2)) - ψ^2*2*c_u2^2/r - (1 - ψ^2)*d/dr(2*c_u2*ω*r + (ω*r)^2), r = r_ср .. r)) == sqrt(c_a2.ср^2 + integral(-d/dr(c_u2^2) - (1/φ^2 - 1)*ψ^2*(d/dr(c_a1.ср^2 + integral(-2*c_u1*(d/dr(c_u1)) - 2*φ^2*c_u1^2/r, r = r_ср .. r)) + d/dr(c_u1^2)) - ψ^2*2*c_u2^2/r - (1 - ψ^2)*d/dr(2*c_u2*ω*r + (ω*r)^2), r = r_ср .. r))
# (c.a2)
sqrt(c_a1.ср^2 + integral(-2*c_1u(r, m, A, B)*(d/dr(c_1u(r, m, A, B))) - 2*φ^2*c_1u(r, m, A, B)^2/r, r = r_ср .. r)) assume, r_ср > 0, r ≥ 0, m == -1; substitute, m == -1; simplify → sqrt(B^2*r^2 - B^2*r_ср^2 - B^2*φ^2*r^2 + B^2*φ^2*r_ср^2 + A^2*r^2*r_ср^4 - A^2*r^4*r_ср^2 + r^2*r_ср^2*c_a1.ср^2 + A^2*φ^2*r^2*r_ср^4 - A^2*φ^2*r^4*r_ср^2 - 4*A*B*φ^2*r^2*r_ср^2*ln(r) + 4*A*B*φ^2*r^2*r_ср^2*ln(r_ср))/(r*r_ср)
sqrt(c_a2.ср^2 + integral(-2*c_2u(r, m, A, B)*(d/dr(c_2u(r, m, A, B))) - 2*φ^2*c_2u(r, m, A, B)^2/r, r = r_ср .. r)) assume, r_ср > 0, r ≥ 0, m == -1; substitute, m == -1; simplify → sqrt(B^2*r^2 - B^2*r_ср^2 - B^2*φ^2*r^2 + B^2*φ^2*r_ср^2 + A^2*r^2*r_ср^4 - A^2*r^4*r_ср^2 + r^2*r_ср^2*c_a2.ср^2 + A^2*φ^2*r^2*r_ср^4 - A^2*φ^2*r^4*r_ср^2 + 4*A*B*φ^2*r^2*r_ср^2*ln(r) - 4*A*B*φ^2*r^2*r_ср^2*ln(r_ср))/(r*r_ср)
sqrt(c_a1.ср^2 + integral(-2*c_1u(r, m, A, B)*(d/dr(c_1u(r, m, A, B))) - 2*φ^2*c_1u(r, m, A, B)^2/r, r = r_ср .. r)) assume, r_ср > 0, r ≥ 0, m == 0; simplify → sqrt(B^2*r^2 - B^2*r_ср^2 - B^2*φ^2*r^2 + B^2*φ^2*r_ср^2 + r^2*r_ср^2*c_a1.ср^2 - 2*A*B*r*r_ср^2 + 2*A*B*r^2*r_ср + 4*A*B*φ^2*r*r_ср^2 - 4*A*B*φ^2*r^2*r_ср - 2*A^2*φ^2*r^2*r_ср^2*ln(r) + 2*A^2*φ^2*r^2*r_ср^2*ln(r_ср))/(r*r_ср)
sqrt(c_a2.ср^2 + integral(-2*c_2u(r, m, A, B)*(d/dr(c_2u(r, m, A, B))) - 2*φ^2*c_2u(r, m, A, B)^2/r, r = r_ср .. r)) assume, r_ср > 0, r ≥ 0, m == 0; simplify → sqrt(B^2*r^2 - B^2*r_ср^2 - B^2*φ^2*r^2 + B^2*φ^2*r_ср^2 + r^2*r_ср^2*c_a2.ср^2 + 2*A*B*r*r_ср^2 - 2*A*B*r^2*r_ср - 4*A*B*φ^2*r*r_ср^2 + 4*A*B*φ^2*r^2*r_ср - 2*A^2*φ^2*r^2*r_ср^2*ln(r) + 2*A^2*φ^2*r^2*r_ср^2*ln(r_ср))/(r*r_ср)
sqrt(c_a1.ср^2 + integral(-2*c_1u(r, m, A, B)*(d/dr(c_1u(r, m, A, B))) - 2*φ^2*c_1u(r, m, A, B)^2/r, r = r_ср .. r)) assume, r_ср > 0, r ≥ 0, -1 < m ≤ 1, m ≠ 0; simplify → sqrt((B^2*m + B^2*m^2 + m*r_ср^2*c_a1.ср^2 + A^2*m*r_ср^(2 - 2*m) - B^2*φ^2*m^2 + m^2*r_ср^2*c_a1.ср^2 - A^2*φ^2*r_ср^(2 - 2*m) + A^2*m^2*r_ср^(2 - 2*m) - B^2*φ^2*m + 2*A*B*m*r_ср^(1 - m) - A^2*φ^2*m*r_ср^(2 - 2*m) + A^2*φ^2*r_ср^2*(1/r^2)^m - A^2*m^2*r_ср^2*(1/r^2)^m - B^2*m^2*r_ср^2/r^2 + 2*A*B*m^2*r_ср^(1 - m) - A^2*m*r_ср^2*(1/r^2)^m - B^2*m*r_ср^2/r^2 - 2*A*B*m*r_ср^2/r^(m + 1) + B^2*φ^2*m^2*r_ср^2/r^2 - 2*A*B*m^2*r_ср^2/r^(m + 1) + A^2*φ^2*m*r_ср^2*(1/r^2)^m + B^2*φ^2*m*r_ср^2/r^2 - 4*A*B*φ^2*m*r_ср^(1 - m) + 4*A*B*φ^2*m*r_ср^2/r^(m + 1))/(m*(m + 1)))/r_ср
sqrt(c_a2.ср^2 + integral(-2*c_2u(r, m, A, B)*(d/dr(c_2u(r, m, A, B))) - 2*φ^2*c_2u(r, m, A, B)^2/r, r = r_ср .. r)) assume, r_ср > 0, r ≥ 0, -1 < m ≤ 1, m ≠ 0; simplify → sqrt((B^2*m + B^2*m^2 + m*r_ср^2*c_a2.ср^2 + A^2*m*r_ср^(2 - 2*m) - B^2*φ^2*m^2 + m^2*r_ср^2*c_a2.ср^2 - A^2*φ^2*r_ср^(2 - 2*m) + A^2*m^2*r_ср^(2 - 2*m) - B^2*φ^2*m - 2*A*B*m*r_ср^(1 - m) - A^2*φ^2*m*r_ср^(2 - 2*m) + A^2*φ^2*r_ср^2*(1/r^2)^m - A^2*m^2*r_ср^2*(1/r^2)^m - B^2*m^2*r_ср^2/r^2 - 2*A*B*m^2*r_ср^(1 - m) - A^2*m*r_ср^2*(1/r^2)^m - B^2*m*r_ср^2/r^2 + 2*A*B*m*r_ср^2/r^(m + 1) + B^2*φ^2*m^2*r_ср^2/r^2 + 2*A*B*m^2*r_ср^2/r^(m + 1) + A^2*φ^2*m*r_ср^2*(1/r^2)^m + B^2*φ^2*m*r_ср^2/r^2 + 4*A*B*φ^2*m*r_ср^(1 - m) - 4*A*B*φ^2*m*r_ср^2/r^(m + 1))/(m*(m + 1)))/r_ср
c_a1.ср := 160
r := 0.8
r_ср := 0.4
L_u := 250000
ω := 3200
R_ср := 0.3
φ := -1
m := -1
c_a2.ср := 150
B := (L_u/(2*ω))
A := ((1 - R_ср)*ω*r_ср^(m + 1))
sqrt(c_a1.ср^2 - 2*φ^2*(ln(r) - ln(r_ср))*(A*r^2 + B)^2/r^2) = 2161.5i
sqrt(B^2*r^2 - B^2*r_ср^2 - B^2*φ^2*r^2 + B^2*φ^2*r_ср^2 + A^2*r^2*r_ср^4 - A^2*r^4*r_ср^2 + r^2*r_ср^2*c_a1.ср^2 + A^2*φ^2*r^2*r_ср^4 - A^2*φ^2*r^4*r_ср^2 - 4*A*B*φ^2*r^2*r_ср^2*ln(r) + 4*A*B*φ^2*r^2*r_ср^2*ln(r_ср))/(r*r_ср) = 2243.63i
# Вывод общего ур-я профилирования Л Т по радиусу с потерями
# Ур-е радиального равновесия:
1/ρ*(d/dr(p)) == c_u^2/r  # (РР)
1/ρ*(d/dr(p)) == c_u^2/r
# Ур-е Бернулли:
c^2/2 == -integral(1/ρ, p = 0 .. 1) - L_тр  # (Б)
# Работа трения:
L_тр == (1/φ^2 - 1)*c^2/2
# Общий случай:
c_u*r^m == const
# следовательно
c_u*r^m == c_u.ср*r_ср^m
# следовательно
c_u(r) := c_u.ср*(r_ср/r)^m  # disabled
d/dr(c_u(r)) → {
    x0 ← 0.8
    d/dx0(c_u(x0))
} simplify → {
    x0 ← 0.8
    d/dx0(c_u(x0))
}
# Допущение:
φ(r) == const
# следовательно
d/dr(φ) == 0
# (Б)
c^2/2 == -integral(1/ρ, p = 0 .. 1) - L_тр
c^2/2 == -integral(1/ρ, p = 0 .. 1) - (1/φ^2 - 1)*c^2/2
c^2/2 + (1/φ^2 - 1)*c^2/2 + integral(1/ρ, p = 0 .. 1) == 0
1/φ^2*c^2/2 + integral(1/ρ, p = 0 .. 1) == 0
1/φ^2*(c_a^2 + c_u^2)/2 + integral(1/ρ, p = 0 .. 1) == 0
# (РР)
1/φ^2*(c_a^2 + c_u^2)/2 + integral(c_u^2/r, r = 0 .. 1) == 0
d/dr(1/φ^2*(c_a^2 + c_u^2)/2 + integral(c_u^2/r, r = 0 .. 1)) == 0
d/dr(1/φ^2*(c_a^2 + c_u^2)/2) + d/dr(integral(c_u^2/r, r = 0 .. 1)) == 0
1/(2*φ^2)*d/dr(c_a^2 + c_u^2) + c_u^2/r == 0
1/(2*φ^2)*(d/dr(c_a^2) + d/dr(c_u^2)) + c_u^2/r == 0
1/φ^2*(c_a*d/dr(c_a) + c_u*d/dr(c_u)) + c_u^2/r == 0
c_a*d/dr(c_a) + c_u*d/dr(c_u) + φ^2*c_u^2/r == 0
c_a*d/dr(c_a) + (c_u.ср*(r_ср/r)^m)*(-m*c_u.ср*(r_ср/r)^m/r) + φ^2*(c_u.ср*(r_ср/r)^m)^2/r == 0
c_a*d/dr(c_a) + (c_u.ср*(r_ср/r)^m)*(-m*c_u.ср*(r_ср/r)^m/r) + φ^2*(c_u.ср*(r_ср/r)^m)^2/r == 0
integral(c_a(r)*d/dr(c_a(r)) + (c_u.ср*(r_ср/r)^m)*(-m*c_u.ср*(r_ср/r)^m/r) + φ^2*(c_u.ср*(r_ср/r)^m)^2/r, r) → c_a(0.8)^2/2 + 4*c_u.ср^2  # + C
c_a(r)^2/2 + c_u.ср^2*(r_ср/r)^(2*m)/2 - φ^2*c_u.ср^2*(r_ср/r)^(2*m)/(2*m) + C == 0 substitute, r == r_ср; substitute, c_a(r_ср) == c_a.ср → 4*c_u.ср^2 + C + 0.5*c_a(2/5)^2 == 0 simplify → 4*c_u.ср^2 + C + 0.5*c_a(2/5)^2 == 0 solve, C → -4*c_u.ср^2 - 0.5*c_a(2/5)^2
c_a(r)^2/2 + c_u.ср^2*(r_ср/r)^(2*m)/2 - φ^2*c_u.ср^2*(r_ср/r)^(2*m)/(2*m) + C == 0 substitute, C == -(m*c_a.ср^2 - φ^2*c_u.ср^2 + m*c_u.ср^2)/(2*m) → 3*c_u.ср^2 - 0.5*c_a.ср^2 + 0.5*c_a(4/5)^2 == 0
-(m*c_a.ср^2 + m*c_u.ср^2 - m*c_a(r)^2 - φ^2*c_u.ср^2 - m*c_u.ср^2*(r_ср/r)^(2*m) + φ^2*c_u.ср^2*(r_ср/r)^(2*m))/(2*m) == 0 simplify → 3*c_u.ср^2 - 0.5*c_a.ср^2 + 0.5*c_a(4/5)^2 == 0
c_a(r)^2/2 - c_u.ср^2/2 - c_a.ср^2/2 + c_u.ср^2*(r_ср/r)^(2*m)/2 + φ^2*c_u.ср^2/(2*m) - φ^2*c_u.ср^2*(r_ср/r)^(2*m)/(2*m) == 0 solve, c_a(r) →  # error: Решение не было найдено.
# Проверка:
m := 0.6
φ := 0.98
[r; r_ср] := [0.45; 0.5]
[c_a.ср; c_u.ср] := [12; 120]
sqrt(m*c_a.ср^2 + m*c_u.ср^2 - φ^2*c_u.ср^2 - m*c_u.ср^2*(r_ср/r)^(2*m) + φ^2*c_u.ср^2*(r_ср/r)^(2*m))/sqrt(m) = 36.1902
sqrt(c_a.ср^2 + c_u.ср^2*(1 - φ^2/m)*(1 - (r_ср/r)^(2*m))) = 36.1902
