# Список сокращений и условных обозначений
#
# ГУ - граничные условия
# Л - лопатка
# Д - диск
# НЛ - нейтральная линия
# ЦТ - центр тяжести
# ЦД - центр давления
# Ср. - средний
# Зн-е - значение
# З-н - закон
# Коэф. - коэффициент
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# Исходные данные:
8760*1282*10^-9*2806.2^2*73/(11*10^-3*2*π*109.82*10^-3) = 850.547*10^6
ORIGIN := 1
# Частота дискритизации:
N_dis := 100
# Частота вращения (рад/с):
ω := 2806.2
# Плотность материала (кг/м^3):
ρ := 8400
# Втулка Д | Обод Д
# Напряжения (Па):
P_0 := 0
P_m := 120.6*10^6
# Температура (К):
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T_0 := 350
T_m := 650
# Радиус (м):
R_0 := 20*10^-3
R_m := 109.82*10^-3
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# Количество отверстий:
n_экс.отв := 5
# Радиус отверстия (м):
R_экс.отв := 66.8*10^-3
# Диаметр отверстия (м):
d_экс.отв := 6.2*10^-3
# Расстояние между краями отверстий по окружности,
# по которой расположены центры отверстий (м):
b_экс.отв :=
    2*π*R_экс.отв/n_экс.отв - d_экс.отв if n_экс.отв ≠ 0
    ∞ otherwise
    = 77.7434*10^-3
# Ср. коэф. линейного расширения (град^-1):
α_T := 18*10^-6
# Температура среды (К):
Т_окр.ср. := 20 + 273.15 = 293.15
# Температурные деформации
# на втулке и ободе Д соответственно:
[θ_0; θ_m] := α_T*[T_0 - Т_окр.ср.; T_m - Т_окр.ср.] = [0.10233; 0.64233] %
# З-н изменения температурных деформаций по радиусу Д:
θ(r) := θ_0 + (θ_m - θ_0)*(r - R_0)^2/(R_m - R_0)^2
# З-н изменения температуры по радиусу Д:
T(r) := T_0 + (T_m - T_0)*((r - R_0)/(R_m - R_0))^2
# З-н изменения физических св-тв материала по радиусу Д:
# Коэф. Пуассона:
T_excel := [400; 500; 600; 700; 800]
E := 10^11*[1.74; 1.66; 1.57; 1.47; 1.32]
μ := [0.384; 0.379; 0.371; 0.361; 0.347]
G := E/(2*(μ + 1)) = [62861.3; 60188.5; 57257.5; 54004.4; 48997.8]*10^6
r := R_0, R_0 + (R_m - R_0)/N_dis .. R_m
μ(r) := interp(cspline(T_excel, μ), T_excel, μ, T(r))
E(r) := interp(cspline(T_excel, E), T_excel, E, T(r))
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# Количество сечений:
n := 11
# Дискритизация сечений:
i := 1 .. n
# Радиусы границ (м): | Толщины границ (м):
r[i] := R_0, 26*10^-3, 30.62*10^-3, 37.26*10^-3, 56.94*10^-3, 60.67*10^-3, 72.95*10^-3, 75.95*10^-3, 102.41*10^-3, 106.52*10^-3, R_m
h[i] := 26*10^-3, 26*10^-3, 15.43*10^-3, 11.27*10^-3, 10*10^-3, 12*10^-3, 12*10^-3, 8*10^-3, 6*10^-3, 11*10^-3, 11*10^-3
h_ср(l) := interp(lspline(r, h), r, h, l)
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# Ср. зн-я радиусов границ (м):
r_ср :=
    for i ∈ 1 .. n - 1
        r_ср[i] ← 0.5*(r[i] + r[i + 1])
    r_ср
r_ср = [23; 28.31; 33.94; 47.1; 58.805; 66.81; 74.45; 89.18; 104.465; 108.17]*10^-3
[σI_t, σII_t; σI_r, σII_r] :=
    for i ∈ 1 .. n - 1
        σI_t[i, i] ←
            400*10^6 if i == 1
            μ(r_ср[i])*h_ср(r[i - 1])/h_ср(r[i])*σI_r[i - 1, i] + E(r_ср[i])/E(r_ср[i - 1])*(σI_t[i - 1, i] - μ(r_ср[i - 1])*σI_r[i - 1, i]) otherwise
        σI_r[i, i] ←
            -P_0 if i == 1
            h_ср(r[i - 1])/h_ср(r[i])*σI_r[i - 1, i] otherwise
        [C_1; C_2] ← 1/2*[
            σI_t[i, i] + σI_r[i, i] + (4 + 4*μ(r_ср[i]))*ρ*ω^2*r[i]^2/8 + E(r_ср[i])*θ(r[i]);
            r[i]^2*(σI_t[i, i] - σI_r[i, i] - ((2 - 2*μ(r_ср[i]))*ρ*ω^2*r[i]^2/8 - E(r_ср[i])*θ(r[i])))
        ]
        σI_r[i, i + 1] ← C_1 - C_2/r[i + 1]^2 - (3 + μ(r_ср[i]))*ρ*ω^2*r[i + 1]^2/8 - E(r_ср[i])/r[i + 1]^2*((θ(r[i]) - (θ(r[i + 1]) - θ(r[i]))/(r[i + 1] - r[i])*r[i])*integral(r, r = r[i] .. r[i + 1]) + (θ(r[i + 1]) - θ(r[i]))/(r[i + 1] - r[i])*integral(r^2, r = r[i] .. r[i + 1]))
        σI_t[i, i + 1] ← C_1 + C_2/r[i + 1]^2 - (1 + 3*μ(r_ср[i]))*ρ*ω^2*r[i + 1]^2/8 + E(r_ср[i])/r[i + 1]^2*((θ(r[i]) - (θ(r[i + 1]) - θ(r[i]))/(r[i + 1] - r[i])*r[i])*integral(r, r = r[i] .. r[i + 1]) + (θ(r[i + 1]) - θ(r[i]))/(r[i + 1] - r[i])*integral(r^2, r = r[i] .. r[i + 1])) - E(r_ср[i])*θ(r[i + 1])
    for i ∈ 1 .. n - 1
        σII_t[i, i] ←
            400*10^6 if i == 1
            μ(r_ср[i])*h_ср(r[i - 1])/h_ср(r[i])*σII_r[i - 1, i] + E(r_ср[i])/E(r_ср[i - 1])*(σII_t[i - 1, i] - μ(r_ср[i - 1])*σII_r[i - 1, i]) otherwise
        σII_r[i, i] ←
            if i == 1
                σII_t[i, i] if R_0 == 0
                0 otherwise
            h_ср(r[i - 1])/h_ср(r[i])*σII_r[i - 1, i] otherwise
        [C_1; C_2] ← 1/2*[σII_t[i, i] + σII_r[i, i]; r[i]^2*(σII_t[i, i] - σII_r[i, i])]
        σII_r[i, i + 1] ← C_1 - C_2/r[i + 1]^2
        σII_t[i, i + 1] ← C_1 + C_2/r[i + 1]^2
    [σI_t, σII_t; σI_r, σII_r]
transpose(σI_t) = [
    400, 0, 0, 0, 0, 0, 0, 0, 0, 0;
    310.44, 310.223, 0, 0, 0, 0, 0, 0, 0, 0;
    0, 264.928, 290.087, 0, 0, 0, 0, 0, 0, 0;
    0, 0, 242.931, 265.398, 0, 0, 0, 0, 0, 0;
    0, 0, 0, 120.047, 127.317, 0, 0, 0, 0, 0;
    0, 0, 0, 0, 92.3471, 81.2157, 0, 0, 0, 0;
    0, 0, 0, 0, 0, -54.7965, -53.8118, 0, 0, 0;
    0, 0, 0, 0, 0, 0, -91.2164, -78.6132, 0, 0;
    0, 0, 0, 0, 0, 0, 0, -467.933, -465.898, 0;
    0, 0, 0, 0, 0, 0, 0, 0, -537.821, -489.957;
    0, 0, 0, 0, 0, 0, 0, 0, 0, -547.156
]*10^6
transpose(σII_t) = [
    400, 0, 0, 0, 0, 0, 0, 0, 0, 0;
    318.343, 318.123, 0, 0, 0, 0, 0, 0, 0, 0;
    0, 285.136, 314.961, 0, 0, 0, 0, 0, 0, 0;
    0, 0, 295.193, 323.801, 0, 0, 0, 0, 0, 0;
    0, 0, 0, 314.58, 326.752, 0, 0, 0, 0, 0;
    0, 0, 0, 0, 327.48, 303.389, 0, 0, 0, 0;
    0, 0, 0, 0, 0, 300.071, 297.117, 0, 0, 0;
    0, 0, 0, 0, 0, 0, 296.655, 342.781, 0, 0;
    0, 0, 0, 0, 0, 0, 0, 362.061, 399.364, 0;
    0, 0, 0, 0, 0, 0, 0, 0, 404.897, 310.569;
    0, 0, 0, 0, 0, 0, 0, 0, 0, 310.095
]*10^6
transpose(σI_r) = [
    0, 0, 0, 0, 0, 0, 0, 0, 0, 0;
    72.6466, 72.6466, 0, 0, 0, 0, 0, 0, 0, 0;
    0, 96.8555, 163.204, 0, 0, 0, 0, 0, 0, 0;
    0, 0, 167.801, 229.741, 0, 0, 0, 0, 0, 0;
    0, 0, 0, 164.848, 185.784, 0, 0, 0, 0, 0;
    0, 0, 0, 0, 167.045, 139.204, 0, 0, 0, 0;
    0, 0, 0, 0, 0, 68.0826, 68.0826, 0, 0, 0;
    0, 0, 0, 0, 0, 0, 48.0439, 72.0659, 0, 0;
    0, 0, 0, 0, 0, 0, 0, -154.299, -205.732, 0;
    0, 0, 0, 0, 0, 0, 0, 0, -245.015, -133.645;
    0, 0, 0, 0, 0, 0, 0, 0, 0, -168.47
]*10^6
transpose(σII_r) = [
    0, 0, 0, 0, 0, 0, 0, 0, 0, 0;
    81.6568, 81.6568, 0, 0, 0, 0, 0, 0, 0, 0;
    0, 114.644, 193.178, 0, 0, 0, 0, 0, 0, 0;
    0, 0, 212.947, 291.55, 0, 0, 0, 0, 0, 0;
    0, 0, 0, 300.77, 338.968, 0, 0, 0, 0, 0;
    0, 0, 0, 0, 338.24, 281.867, 0, 0, 0, 0;
    0, 0, 0, 0, 0, 285.185, 285.185, 0, 0, 0;
    0, 0, 0, 0, 0, 0, 285.647, 428.47, 0, 0;
    0, 0, 0, 0, 0, 0, 0, 409.191, 545.588, 0;
    0, 0, 0, 0, 0, 0, 0, 0, 540.055, 294.575;
    0, 0, 0, 0, 0, 0, 0, 0, 0, 295.049
]*10^6
# Коэф. Мора:
k_Мор := (P_m - σI_r[n - 1, n])/σII_r[n - 1, n] = 0.979738
[σ_r; σ_t] :=
    for i ∈ 1 .. n - 1
        σ_r[i, i] ← σI_r[i, i] + k_Мор*σII_r[i, i]
        σ_r[i, i + 1] ← σI_r[i, i + 1] + k_Мор*σII_r[i, i + 1]
        σ_t[i, i] ← σI_t[i, i] + k_Мор*σII_t[i, i]
        σ_t[i, i + 1] ← σI_t[i, i + 1] + k_Мор*σII_t[i, i + 1]
    [σ_r; σ_t]
[σI_r.ср, σII_r.ср, σ_r.ср; σI_t.ср, σII_t.ср, σ_t.ср] :=
    for i ∈ 1 .. n - 1
        σI_r.ср[i] ←
            σI_r[i, i] if i == 1
            0.5*(σI_r[i - 1, i] + σI_r[i, i]) otherwise
        σI_t.ср[i] ←
            σI_t[i, i] if i == 1
            0.5*(σI_t[i - 1, i] + σI_t[i, i]) otherwise
        σII_r.ср[i] ←
            σII_r[i, i] if i == 1
            0.5*(σII_r[i - 1, i] + σII_r[i, i]) otherwise
        σII_t.ср[i] ←
            σII_t[i, i] if i == 1
            0.5*(σII_t[i - 1, i] + σII_t[i, i]) otherwise
        σ_r.ср[i] ←
            σ_r[i, i] if i == 1
            0.5*(σ_r[i - 1, i] + σ_r[i, i]) otherwise
        σ_t.ср[i] ←
            σ_t[i, i] if i == 1
            0.5*(σ_t[i - 1, i] + σ_t[i, i]) otherwise
    [σI_r.ср[n], σII_r.ср[n], σ_r.ср[n]; σI_t.ср[n], σII_t.ср[n], σ_t.ср[n]] ← [σI_r[n - 1, n], σII_r[n - 1, n], σ_r[n - 1, n]; σI_t[n - 1, n], σII_t[n - 1, n], σ_t[n - 1, n]]
    [σI_r.ср, σII_r.ср, σ_r.ср; σI_t.ср, σII_t.ср, σ_t.ср]
transpose(σ_t) = [
    791.895, 0, 0, 0, 0, 0, 0, 0, 0, 0;
    622.333, 621.9, 0, 0, 0, 0, 0, 0, 0, 0;
    0, 544.287, 598.667, 0, 0, 0, 0, 0, 0, 0;
    0, 0, 532.142, 582.638, 0, 0, 0, 0, 0, 0;
    0, 0, 0, 428.253, 447.448, 0, 0, 0, 0, 0;
    0, 0, 0, 0, 413.192, 378.458, 0, 0, 0, 0;
    0, 0, 0, 0, 0, 239.195, 237.286, 0, 0, 0;
    0, 0, 0, 0, 0, 0, 199.428, 257.223, 0, 0;
    0, 0, 0, 0, 0, 0, 0, -113.208, -74.6254, 0;
    0, 0, 0, 0, 0, 0, 0, 0, -141.128, -185.681;
    0, 0, 0, 0, 0, 0, 0, 0, 0, -243.344
]*10^6
transpose(σ_r) = [
    0, 0, 0, 0, 0, 0, 0, 0, 0, 0;
    152.649, 152.649, 0, 0, 0, 0, 0, 0, 0, 0;
    0, 209.176, 352.468, 0, 0, 0, 0, 0, 0, 0;
    0, 0, 376.433, 515.383, 0, 0, 0, 0, 0, 0;
    0, 0, 0, 459.525, 517.884, 0, 0, 0, 0, 0;
    0, 0, 0, 0, 498.432, 415.36, 0, 0, 0, 0;
    0, 0, 0, 0, 0, 347.489, 347.489, 0, 0, 0;
    0, 0, 0, 0, 0, 0, 327.903, 491.855, 0, 0;
    0, 0, 0, 0, 0, 0, 0, 246.601, 328.802, 0;
    0, 0, 0, 0, 0, 0, 0, 0, 284.097, 154.962;
    0, 0, 0, 0, 0, 0, 0, 0, 0, 120.6
]*10^6
σ_экв :=
    for i ∈ 1 .. n
        σ_экв[i] ← sqrt(σ_t.ср[i]^2 - σ_t.ср[i]*σ_r.ср[i] + σ_r.ср[i]^2)
    σ_экв
transpose(σ_экв) = [791.895, 561.574, 494.938, 510.855, 465.366, 429.628, 307.768, 355.735, 344.402, 332.816, 321.104]*10^6
[σ_max; σ_min] := [max(σ_t.ср, σ_r.ср, σ_экв); min(σ_t.ср, σ_t.ср, σ_экв)] = [791895301; -243343695]
σ_экв(l) := interp(cspline(r, σ_экв), r, σ_экв, l)
[σI_t, σI_r; σII_t, σII_r; σ_t, σ_r] :=
    σI_t(l) ← interp(cspline(r, σI_t.ср), r, σI_t.ср, l)
    σII_t(l) ← interp(cspline(r, σII_t.ср), r, σII_t.ср, l)
    σ_t(l) ← interp(cspline(r, σ_t.ср), r, σ_t.ср, l)
    σI_r(l) ← interp(cspline(r, σI_r.ср), r, σI_r.ср, l)
    σII_r(l) ← interp(cspline(r, σII_r.ср), r, σII_r.ср, l)
    σ_r(l) ← interp(cspline(r, σ_r.ср), r, σ_r.ср, l)
    [σI_t, σI_r; σII_t, σII_r; σ_t, σ_r]
[σ_t(R_экс.отв); σ_r(R_экс.отв)] = [305.286; 360.558]*10^6
# Теоретический коэф. концентрации напряжений:
k_экс.отв := 3 - d_экс.отв/b_экс.отв - σ_r(R_экс.отв)/σ_t(R_экс.отв) = 1.7392
# Местное окружное напряжение
# заниженное на 10..15 % (Па):
σ_tм := k_экс.отв*σ_t(R_экс.отв) = 530.955*10^6
# Действительне местное окр. напряжение (Па):
σ_tм := σ_tм*1.15 = 610.598*10^6
l := R_0, R_0 + (R_m - R_0)/N_dis .. R_m
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