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h := 10
x := 0, 1/1000 .. 1
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y_сп(x) := h/100*(1/4*(-x - 17*x^2 - 6*x^3) + x^0.87*(1 - x)^0.56)
y_сл(x) := h/400*(-x - 17*x^2 - 6*x^3)
y_кор(x) := h/100*(1/4*(-x - 17*x^2 - 6*x^3) - x^0.87*(1 - x)^0.56)
# Начало профиля в хвостике
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# h = толщина
