# Исходные данные:
# Начальная температура измерений (К):
T_0 := 300
# Газовая постоянная воздуха (Дж/кг/К):
R_в := 287.4
# Атмосферное давление (Па):
P_атм := 101325
# Массовый расход воздуха (кг/с):
G_в := 40
# Полное давление после К (Па):
P*_К := 18*10^5
# Полная температура после Т (К):
T*_т := 280
# Полная температура после КС (К):
T*_г := 1400
# Показатель адиабаты воздуха:
k_в := 1.4
# Теплоемкость воздуха (Дж/кг/К):
Cp_в := 1000
# Теплоемкость чистых продуктов сгорания (Дж/кг/К):
Cp_чп := 1260
# Коэф. полноты сгорания:
η_г := 0.99
0.95 ≤ η_г ≤ 0.995 = 1
# Адиабатический КПД К:
η*_К := 0.86
200*10^3/3600 ≤ H_ГТУ ≤ 600*10^3/3600
# Теплонапряженность (Дж/м^3/с/Па):
H ≡ 4000/3600*10^3
4000*10^3/3600 ≤ H_ГТД ≤ 5000*10^3/3600
# Температура горючего (К):
T_гор := 280
# Горючее:
Fuel := "ДИЗЕЛЬ"
# Массовые доли компонентов горючего:
[C_р; H_р; S_р; A_p; O_р; W_p] :=
    [86.5; 13; 0.3; 0; 0.2; 0] if Fuel == "ДИЗЕЛЬ"
    [86; 13.7; 0.2; 0; 0.1; 0] if Fuel == "КЕРОСИН"
    NaN otherwise
    = [86.5; 13; 0.3; 0; 0.2; 0]
# Решение:
# Низшая теплота сгорания (Дж/кг):
Q_н := 4.19*(81*C_р + 246*H_р - 26*(O_р - S_р) - 6*W_p)*10^3
Q_н := Q_н explicit, ALL → 4.2*(81*86.5 + 246*13 - 26*(0.2 - 0.3) - 6*0)*10^3 = 42767.7*10^3
# Необходимое количество окислителя (кг_воздуха/кг_горючего):
L_о := 0.1149*C_р + 0.3348*H_р - 0.0431*(S_р - O_р)
L_о := L_о explicit, ALL → 0.115*86.5 + 0.335*13 - 0.043*(0.3 - 0.2) = 14.2869
# Степень повышения полного давления в К:
π_К := P*_К/P_атм explicit, ALL → 18*10^5/101325 = 17.7646
# Полное давление на входе в КС (Па):
P*_К := π_К*P_атм explicit, π_к, p_атм → π_К*P_атм = 1800*10^3
# Полная температура на входе в КС (К):
T*_к := T_0*(1 + (π_К^((k_в - 1)/k_в) - 1)/η*_К) explicit, ALL → 300*(1 + (17.76^((1.4 - 1)/1.4) - 1)/0.86) = 744.831
# Полная плотность на входе в КС (кг/м^3):
ρ*_к := P*_К/(R_в*T*_к) explicit, ALL → 1800000/(287.4*744.831) = 8.40869
# Суммарный коэф. избытка окислителя:
α_Σ := (η_г*Q_н - Cp_чп*(1 + L_о)*(T*_г - T_0) + Cp_в*L_о*(T*_г - T_0))/(Cp_в*L_о*(T*_г - T_0))
α_Σ := α_Σ explicit, ALL → (0.99*42767749 - 1260*(1 + 14.287)*(1400 - 300) + 1000*14.287*(1400 - 300))/(1000*14.287*(1400 - 300)) = 2.34594
# Расход топлива (кг/с):
G_т := G_в/(α_Σ*L_о) explicit, ALL → 40/(2.346*14.287) = 1.19345
α_г ≡ 1.1
1.05 ≤ α_г ≤ 1.2 = 1
# Ср. диаметр КС (м):
d_ср := 0.5
# Массовый расход в первичной зоне (кг/с):
G_I := G_в*α_г/α_Σ explicit, ALL → 40*1.1/2.346 = 18.7558
# Массовый расход во вторичной зоне (кг/с):
G_II := G_в - G_I explicit, ALL → 40 - 18.756 = 21.2442
# Скорость в перввичной зоне (м/с):
w_I := 12
5 ≤ w_I ≤ 12 = 1
# Площадь входа в первичную зону (м^2):
F_I := G_I/(ρ*_к*w_I) explicit, ALL → 18.756/(8.409*12) = 0.185877
# Объем жаровой трубы (м^3):
V_ж_тр := G_т*Q_н*η_г/(H*P*_К) explicit, ALL → 1.193*42767749*0.99/(4000/3600*10^3*1800000) = 0.0252653
# Длина жаровой трубы (м):
L_ж_тр := V_ж_тр/F_I explicit, ALL → 0.025/0.186 = 135.925*10^-3
L_ж_тр := L_ж_тр + 0.1 explicit, ALL → 0.136 + 0.1 = 235.925*10^-3
# Высота жаровой трубы (м):
h_ж_тр := F_I/(π*d_ср) explicit, ALL → 0.186/(π*0.5) = 118.333*10^-3
# Скорость во вторичной зоне (м/с):
w_II := 50
# Площадь входа во вторичную зону (м^2):
F_II := G_II/(ρ*_к*w_II) explicit, ALL → 21.244/(8.409*50) = 0.0505292
# Внешний диаметр первичной зоны (м):
d_перI := d_ср + h_ж_тр explicit, ALL → 0.5 + 0.118 = 618.333*10^-3
# Высота вторичной зоны (м):
Δh := F_II/(π*d_перI) explicit, ALL → 0.051/(π*0.618) = 26.0118*10^-3
# Внешний диаметр вторичной зоны (м):
d_перII := d_перI + 2*Δh explicit, ALL → 0.618 + 2*0.026 = 670.357*10^-3
# Распределение массового расхода (кг/с) вторичной зоны по ступеням:
G_II = 21.2442
G_II_2to4 := G_II/2 = 10.6221
G_II_5 := G_II_2to4 = 10.6221
G_II_2 := G_II_5/3 = 3.5407
G_II_3 := G_II_2 = 3.5407
G_II_4 := G_II_2 = 3.5407
# Коэф. избытка окислителя в сечениях:
α_2 := α_г*(G_I + G_II_2to4*1)/G_I explicit, ALL → 1.1*(18.756 + 10.622)/18.756 = 1.72297
α_3 := α_г*(G_I + G_II_2to4*2)/G_I explicit, ALL → 1.1*(18.756 + 10.622*2)/18.756 = 2.34594
α_4 := α_г*(G_I + G_II_2to4*3)/G_I explicit, ALL → 1.1*(18.756 + 10.622*3)/18.756 = 2.96892
α_5 := α_г*(G_I + G_II_2to4*3 + G_II_5)/G_I explicit, ALL → 1.1*(18.756 + 10.622*3 + 10.622)/18.756 = 3.59189
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