# [area: Список сокращений и условных обозначений]
# Список сокращений и условных обозначений
#
# ГДФ - газодинамическая функция
# ТА - теплообменный аппарат
# ТН - теплоноситель
# ТО - теплообмен
# К - компрессор
# КПД - коэффициент полезного действия
# Ном. - номинальный
# КС - камера сгорания
# Л - лопатка
# ЛМ - лопаточная машина
# ЛТ - линия тока
# Относ. - относительный
# Окр. - окружной
# ОК - осевой компрессор
# ВНА - входной направляющий аппарат
# НА - направляющий аппарат
# СА - спрямляющий аппарат
# Абс. - абсолютный
# З-н - закон
# Теор. - теоретический
# Пов-ть - поверхность
# Хар-ка - характеристика
# Ср. - средний
# Св-во - свойство
# Сост. - составляющий
# Коэф. - коэффициент
# Ур-е - уравнение
# ЦБК - центробежный компрессор
# ЦСТ - центростремительная турбина
# ЦД - центр давления
# В - винт
# Вл - вентилятор
# ФК - форсажная камера
#
# Зеленым цветом выделены исходные данные
# Желтым цветом выделены изменяемые области выбора (подбора)
# Красным цветом выделены области проверочных и важных результатов расчета
# Голубым цветом выделены известные константы,переменные, ур-я, выражения
#
# Значения индексов
# 1 - перед узлом, 2 - посередине узла, 3 - после узла
#
# I - первый контур
# II - второй контур
# [area: libraries]
# [component: outputs EXCEL_атм]
transpose(EXCEL_атм) =  # no stored result
H_атм := submatrix(EXCEL_атм, 2, rows(EXCEL_атм), 1, 1)
transpose(H_атм) = [
    -2000, -1950, -1900, -1850, -1800, -1750, -1700, -1650, -1600, -1550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]
T_атм := submatrix(EXCEL_атм, 2, rows(EXCEL_атм), 2, 2)
transpose(T_атм) = [
    301.154, 300.829, 300.504, 300.179, 299.853, 299.528, 299.203, 298.878, 298.553, 298.227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]
P_атм := submatrix(EXCEL_атм, 2, rows(EXCEL_атм), 3, 3)
transpose(P_атм) = [
    127.783, 127.059, 126.339, 125.622, 124.908, 124.198, 123.491, 122.787, 122.087, 121.39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]*10^3
P_атм(H) := interp(cspline(H_атм, P_атм), H_атм, P_атм, H)
T_атм(H) := interp(cspline(H_атм, T_атм), H_атм, T_атм, H)
# [component: outputs EXCEL_Сp.воздух]
PT_Cp.воздух[:, 1] := submatrix(EXCEL_Сp.воздух, 2, cols(EXCEL_Сp.воздух), 1, 1)
PT_Cp.воздух[:, 2] := transpose(submatrix(EXCEL_Сp.воздух, 1, 1, 2, cols(EXCEL_Сp.воздух)))
transpose(PT_Cp.воздух) = [
    99971, 99972, 99973, 99974, 99975, 99976, 99977, 99978, 99979, 99980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;
    75, 80, 85, 90, 95, 100, 105, 110, 115, 120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]
Cp_воздух := submatrix(EXCEL_Сp.воздух, 2, cols(EXCEL_Сp.воздух), 2, cols(EXCEL_Сp.воздух))
EXCEL_Сp.воздух =  # no stored result
Cp_воздух =  # no stored result
Cp_воздух(P, T) :=
    interp(cspline(PT_Cp.воздух, Cp_воздух), PT_Cp.воздух, Cp_воздух, [P; T]) if (10^5 ≤ P ≤ 10^8) and (75 ≤ T ≤ 1300)  # disabled
Cp_воздух(P, T) := 4187*{
    0.2407 + 0.0193*(2.5*10^-3*T - 0.875) + 2.0*10^-3*(2.5*10^-5*T^2 - 0.0275*T + 6.5625) if (0 < T < 750)
    0.26 + 0.032*(1.176*10^-3*T - 0.88235) - 0.374*10^-2*(5.5556*10^-6*T^2 - 1.3056*10^-2*T + 6.67) if (T ≥ 750)
}  # disabled
Cp_воздух(P, T) :=
    k ← transpose([0.2521923, -0.1186612, 0.3360775, -0.3073812, 0.1382207, -0.03090246, 0.002745383])
    4187*sum(k[i + ORIGIN]*(T/1000)^i, i = 0 .. 6)
# Визуализация зависимости теплоёмкости воздуха от давления и температуры:
Cp_воздух_3D := CreateMesh(Cp_воздух, 10^5, 10^8, 100, 1300, 40, 40)
# [component: inputs Cp_воздух_3D]
# [component: outputs EXCEL_Cp_ч.керосин]
T_Cp_ч.керосин := submatrix(EXCEL_Cp_ч.керосин, 2, 22, 1, 1)
transpose(T_Cp_ч.керосин) = [273, 373, 473, 573, 673, 773, 873, 973, 1073, 1173, 1273, 1373, 1473, 1573, 1673, 1773, 1873, 1973, 2073, 2173, 2273]
Cp_ч.керосин := submatrix(EXCEL_Cp_ч.керосин, 2, 22, 2, 2)
transpose(Cp_ч.керосин) = [1055.7, 1079, 1106.8, 1137.2, 1168.5, 1199.4, 1229.2, 1257, 1282.4, 1305.4, 1325.9, 1344, 1359.9, 1374, 1386.5, 1397.7, 1407.9, 1417.2, 1425.6, 1433.1, 1439.1]
Cp_ч.керосин(T) :=
    interp(cspline(T_Cp_ч.керосин, Cp_ч.керосин), T_Cp_ч.керосин, Cp_ч.керосин, T) if T_Cp_ч.керосин[ORIGIN] ≤ T ≤ T_Cp_ч.керосин[rows(T_Cp_ч.керосин)]
    NaN otherwise
# [component: outputs EXCEL_Cp_ч.дизель]
T_Cp_ч.дизель := submatrix(EXCEL_Cp_ч.дизель, 2, 22, 1, 1)
transpose(T_Cp_ч.дизель) = [273, 373, 473, 573, 673, 773, 873, 973, 1073, 1173, 1273, 1373, 1473, 1573, 1673, 1773, 1873, 1973, 2073, 2173, 2273]
Cp_ч.дизель := submatrix(EXCEL_Cp_ч.дизель, 2, 22, 2, 2)
transpose(Cp_ч.дизель) = [1050, 1073.6, 1101.6, 1132, 1163.3, 1194.1, 1223.6, 1251.2, 1276.4, 1299.2, 1319.4, 1337.2, 1352.9, 1366.7, 1379, 1390, 1400, 1409.2, 1417.5, 1424.9, 1430.9]
Cp_ч.дизель(T) :=
    interp(cspline(T_Cp_ч.дизель, Cp_ч.дизель), T_Cp_ч.дизель, Cp_ч.дизель, T) if T_Cp_ч.дизель[ORIGIN] ≤ T ≤ T_Cp_ч.дизель[rows(T_Cp_ч.дизель)]
    NaN otherwise
# [component: outputs EXCEL_Cp_ч.мазут]
T_Cp_ч.мазут := submatrix(EXCEL_Cp_ч.мазут, 2, rows(EXCEL_Cp_ч.мазут), 1, 1)
transpose(T_Cp_ч.мазут) = [273, 373, 473, 573, 673, 773, 873, 973, 1073, 1173, 1273, 1373, 1473, 1573, 1673, 1773, 1873, 1973, 2073, 2173, 2273]
Cp_ч.мазут := submatrix(EXCEL_Cp_ч.мазут, 2, rows(EXCEL_Cp_ч.мазут), 2, 2)
transpose(Cp_ч.мазут) = [1044.5, 1068.4, 1096.6, 1127.1, 1158.3, 1189, 1218.4, 1245.7, 1270.7, 1293.2, 1313.2, 1330.8, 1346.2, 1359.8, 1371.9, 1382.7, 1392.6, 1401.6, 1409.9, 1417.3, 1423.5]
Cp_ч.мазут(T) :=
    interp(cspline(T_Cp_ч.мазут, Cp_ч.мазут), T_Cp_ч.мазут, Cp_ч.мазут, T) if T_Cp_ч.мазут[ORIGIN] ≤ T ≤ T_Cp_ч.мазут[rows(T_Cp_ч.мазут)]
    NaN otherwise
# [component: outputs EXCEL_Cp_ч.пг]
T_Cp_ч.пг := submatrix(EXCEL_Cp_ч.пг, 2, rows(EXCEL_Cp_ч.пг), 1, 1)
transpose(T_Cp_ч.пг) = [273, 373, 473, 573, 673, 773, 873, 973, 1073, 1173, 1273, 1373, 1473, 1573, 1673, 1773, 1873, 1973, 2073, 2173, 2273]
Cp_ч.пг := submatrix(EXCEL_Cp_ч.пг, 2, rows(EXCEL_Cp_ч.пг), 2, 2)
transpose(Cp_ч.пг) = [1099.9, 1120.1, 1146.2, 1176, 1207.5, 1239.4, 1270.4, 1299.8, 1327.2, 1352.1, 1374.5, 1394.5, 1412.3, 1428.1, 1442.3, 1455, 1466.7, 1477.4, 1487.1, 1495.7, 1502.8]
Cp_ч.пг(T) :=
    interp(cspline(T_Cp_ч.пг, Cp_ч.пг), T_Cp_ч.пг, Cp_ч.пг, T) if T_Cp_ч.пг[ORIGIN] ≤ T ≤ T_Cp_ч.пг[rows(T_Cp_ч.пг)]
    NaN otherwise
# [component: outputs EXCEL_Cp_ч.кг]
T_Cp_ч.кг := submatrix(EXCEL_Cp_ч.кг, 2, rows(EXCEL_Cp_ч.кг), 1, 1)
transpose(T_Cp_ч.кг) = [273, 373, 473, 573, 673, 773, 873, 973, 1073, 1173, 1273, 1373, 1473, 1573, 1673, 1773, 1873, 1973, 2073, 2173, 2273]
Cp_ч.кг := submatrix(EXCEL_Cp_ч.кг, 2, rows(EXCEL_Cp_ч.кг), 2, 2)
transpose(Cp_ч.кг) = [1130.9, 1149.5, 1174.9, 1204.7, 1236.7, 1269.3, 1301.5, 1332.2, 1361, 1387.3, 1411.2, 1432.7, 1451.9, 1469, 1484.5, 1498.6, 1511.6, 1523.8, 1535.3, 1546.3, 1556.6]
Cp_ч.кг(T) :=
    interp(cspline(T_Cp_ч.кг, Cp_ч.кг), T_Cp_ч.кг, Cp_ч.кг, T) if T_Cp_ч.кг[ORIGIN] ≤ T ≤ T_Cp_ч.кг[rows(T_Cp_ч.кг)]
    NaN otherwise
# Теплоемкость чистых продуктов сгорания при α=1 [Дж/кг/К]:
Cp_ч.г(P, T, Fuel) :=
    Cp_ч.керосин(T) if (Fuel == "Керосин") or (Fuel == "Бензин")
    Cp_ч.дизель(T) if (Fuel == "Дизель")
    Cp_ч.мазут(T) if (Fuel == "Мазут")
    Cp_ч.пг(T) if (Fuel == "Природный газ")
    Cp_ч.кг(T) if (Fuel == "Коксовый газ")
    NaN if (Fuel == "Водород")
    NaN otherwise
# [component: outputs EXCEL_Cp_керосин]
T_Cp_керосин := submatrix(EXCEL_Cp_керосин, 2, rows(EXCEL_Cp_керосин), 2, 2)
transpose(T_Cp_керосин) = [293.15, 303.15, 313.15, 323.15, 333.15, 343.15, 353.15, 363.15, 373.15, 383.15, 393.15, 403.15, 413.15, 423.15, 433.15, 443.15, 453.15, 463.15, 473.15, 483.15, 493.15, 503.15, 513.15, 523.15, 533.15, 543.15]
Cp_керосин := submatrix(EXCEL_Cp_керосин, 2, rows(EXCEL_Cp_керосин), 3, 3)
transpose(Cp_керосин) = [2000, 2040, 2090, 2140, 2180, 2230, 2280, 2330, 2380, 2430, 2480, 2530, 2580, 2630, 2680, 2730, 2790, 2840, 2890, 2940, 3000, 3050, 3110, 3160, 3210, 3260]
Cp_керосин(T) := interp(pspline(T_Cp_керосин, Cp_керосин), T_Cp_керосин, Cp_керосин, T)
# [component: outputs EXCEL_Cp_бензин]
T_Cp_бензин := submatrix(EXCEL_Cp_бензин, 2, rows(EXCEL_Cp_бензин), 2, 2)
transpose(T_Cp_бензин) = [293.15, 303.15, 313.15, 323.15, 333.15, 343.15, 353.15, 363.15, 373.15, 383.15, 393.15, 403.15, 413.15, 423.15, 433.15, 443.15, 453.15, 463.15, 473.15, 483.15]
Cp_бензин := submatrix(EXCEL_Cp_бензин, 2, rows(EXCEL_Cp_бензин), 3, 3)
transpose(Cp_бензин) = [2060, 2110, 2150, 2200, 2240, 2300, 2350, 2410, 2460, 2510, 2570, 2620, 2680, 2740, 2800, 2860, 2920, 2980, 3040, 3110]
Cp_бензин(T) :=
    interp(pspline(T_Cp_бензин, Cp_бензин), T_Cp_бензин, Cp_бензин, T) if T_Cp_бензин[ORIGIN] ≤ T ≤ T_Cp_бензин[rows(T_Cp_бензин)]
    NaN otherwise
# [component: outputs EXCEL_Cp_ПГ]
T_Cp_ПГ := transpose(submatrix(EXCEL_Cp_ПГ, 1, 1, 2, cols(EXCEL_Cp_ПГ)))
transpose(T_Cp_ПГ) = [250, 260, 270, 280, 288.15, 293.15, 300, 320, 340, 360, 380, 400, 450]
Cp_ПГ := transpose(submatrix(EXCEL_Cp_ПГ, 6, 6, 2, cols(EXCEL_Cp_ПГ)))
transpose(Cp_ПГ) = [2255, 2252, 2253, 2258, 2266, 2271, 2280, 2314, 2357, 2407, 2464, 2525, 2690]
Cp_ПГ(T) := interp(pspline(T_Cp_ПГ, Cp_ПГ), T_Cp_ПГ, Cp_ПГ, T)
# Теплоемкость горючего [Дж/кг/К]:
Cp_гор(P, T, Fuel) :=
    Cp_керосин(T) if (Fuel == "Керосин")
    Cp_бензин(T) if (Fuel == "Бензин")
    NaN if (Fuel == "Дизель")
    NaN if (Fuel == "Мазут")
    Cp_ПГ(T) if (Fuel == "Природный газ")
    NaN if (Fuel == "Коксовый газ")
    NaN if (Fuel == "Водород")
    NaN otherwise
# Нисшая рабочая теплота сгорания топлива [Дж/кг] [1 с. 7-8]:
Q_нр(Fuel) := 10^3*{
    mean(43600, 42700) if (Fuel == "Керосин") or (Fuel == "Бензин")
    mean(42300, 43100) if (Fuel == "Дизель")
    42300 if (Fuel == "Соляровое масло")
    mean(41300, 40400) if (Fuel == "Мазут")
    mean(48630, 45850) if (Fuel == "Природный газ")
    mean(41500, 10000) if (Fuel == "Коксовый газ")
    121020 if (Fuel == "Водород")
    NaN otherwise
}
# Стехиометрический коэф. [1 с. 19]:
l_0(Fuel) :=
    14.61 if (Fuel == "Керосин") or (Fuel == "Бензин")
    14.35 if (Fuel == "Дизель")
    13.31 if (Fuel == "Мазут")
    14.35 if (Fuel == "Соляровое масло")
    16.683 if (Fuel == "Природный газ")
    9.908 if (Fuel == "Коксовый газ")
    34.29 if (Fuel == "Водород")
    NaN otherwise
ε_(b/t)=1(β_2(b/t)=1) :=
    (0.005*β_2(b/t)=1^2 - 0.05*β_2(b/t)=1 + 5) if 30 ≤ β_2(b/t)=1 ≤ 60
    -0.0016*β_2(b/t)=1^2 + 0.7031*β_2(b/t)=1 - 16.646 if 60 < β_2(b/t)=1 ≤ 120
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# c. 27 [1]
# [component: outputs EXCEL_b/t=1_ε/ε]
transpose(EXCEL_b/t=1_ε/ε) =  # error: Эта переменная не определена.
b/t=1_. := submatrix(EXCEL_b/t=1_ε/ε, 2, rows(EXCEL_b/t=1_ε/ε), ORIGIN, ORIGIN)
transpose(b/t=1_.) =  # error
ε/ε_. := submatrix(EXCEL_b/t=1_ε/ε, 2, rows(EXCEL_b/t=1_ε/ε), ORIGIN + 1, ORIGIN + 1)
transpose(ε/ε_.) =  # error
b/t=1(ε/ε) := interp(cspline(ε/ε_., b/t=1_.), ε/ε_., b/t=1_., ε/ε)
ε/ε(b/t=1) := interp(cspline(b/t=1_., ε/ε_.), b/t=1_., ε/ε_., b/t=1)
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# [component: outputs EXCEL_E.ВТ3_1]
T_E.ВТ3_1 := submatrix(EXCEL_E.ВТ3_1, 2, rows(EXCEL_E.ВТ3_1), ORIGIN + 1, ORIGIN + 1)
transpose(T_E.ВТ3_1) =  # error
E_ВТ3_1 := submatrix(EXCEL_E.ВТ3_1, 2, rows(EXCEL_E.ВТ3_1), ORIGIN + 3, ORIGIN + 3)
EXCEL_E.ВТ3_1 =  # error
transpose(E_ВТ3_1)/10^9 =  # error
E_ВТ3_1(T) := interp(cspline(T_E.ВТ3_1, E_ВТ3_1), T_E.ВТ3_1, E_ВТ3_1, T)
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# [area: Основные уравнения, алгоритмы, зависимости и ф-и]
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Error := "Ошибки, баги и предупреждения:"
# Начало отсчета начиная с:
ORIGIN ≡ 1
# Температура абс. нуля [К]:
T_0 := 273.15
# Гравитационая постоянная [Н*м^2/кг^2]:
G := 6.67*10^-11
# Масса Земли [кг]:
# Радиус Земли [м]:
[M_Земля; R_Земля] ≡ [5.97*10^24; 6371*10^3]
# Ускорение свободного падения [м/с^2]:
g(H) := G*M_Земля/(R_Земля + H)^2
# Погрешность:
eps(type, x0, x1) :=
    if type == "rel"
        (x1 - x0)/x0 if x0 ≠ 0
        1 otherwise
    x1 - x0 if type == "abs"
# Целая часть от деления:
div(dividend, divider) := (dividend - mod(dividend, divider))/divider
# Матрица переноса-поворота осей
# в точку против часовой стрелки:
Mx_ПереносПоворот(x, y, xc, yc, α) := (x - xc)*cos(α) + (y - yc)*sin(α)
My_ПереносПоворот(x, y, xc, yc, α) := -(x - xc)*sin(α) + (y - yc)*cos(α)
# Ф-я номера сечения по номеру ступени (i)
# и положению сечения в ступени (j):
st(i, j) :=
    2*i - 1 if j == 1
    2*i if j == 2
    2*i + 1 if j == 3
    NaN otherwise
# Ф-я ср. сечения:
av(N_r) := ceil(0.5*N_r)
# Относ. профиль NACA:
NACA(f̅, x̅_f, c̅, o) :=
    [i_minU, i_minL] ← [ORIGIN, ORIGIN]
    for i ∈ 1 .. N_dis
        β_i[i] ← 0 + (i - 1)*π/(2*N_dis)
        X_i[i] ← 1 - cos(β_i[i])
        Y_f[i] ← f̅*{
            x̅_f^-2*(2*x̅_f*X_i[i] - X_i[i]^2) if 0 ≤ X_i[i] < x̅_f
            (1 - x̅_f)^-2*(1 - 2*x̅_f + 2*x̅_f*X_i[i] - X_i[i]^2) if x̅_f ≤ X_i[i]
        }
        gradY_f[i] ← 2*f̅*{
            x̅_f^-2*(x̅_f - X_i[i]) if 0 ≤ X_i[i] < x̅_f
            (1 - x̅_f)^-2*(x̅_f - X_i[i]) if x̅_f ≤ X_i[i]
        }
        [a_0; a_1; a_2; a_3; a_4] ← [
            0.2969;
            -0.126;
            -0.3516;
            0.2843;
            {
                -0.1036 if o == 0
                -0.1015 if o == 1
            }
        ]
        Y_c[i] ← c̅/0.2*(a_0*sqrt(X_i[i]) + a_1*X_i[i] + a_2*X_i[i]^2 + a_3*X_i[i]^3 + a_4*X_i[i]^4)
        θ[i] ← atan(gradY_f[i])
        [X_U[i], Y_U[i]; X_L[i], Y_L[i]] ← [
            X_i[i] - Y_c[i]*sin(θ[i]), Y_f[i] + Y_c[i]*cos(θ[i]);
            X_i[i] + Y_c[i]*sin(θ[i]), Y_f[i] - Y_c[i]*cos(θ[i])
        ]
        i_minU ← i if (i ≠ ORIGIN) and (X_U[i] < X_U[i - 1])
        i_minL ← i if (i ≠ ORIGIN) and (X_L[i] < X_L[i - 1])
    X_U ← submatrix(X_U, i_minU, N_dis, ORIGIN, ORIGIN)
    Y_U ← submatrix(Y_U, i_minU, N_dis, ORIGIN, ORIGIN)
    X_L ← submatrix(X_L, i_minL, N_dis, ORIGIN, ORIGIN)
    Y_L ← submatrix(Y_L, i_minL, N_dis, ORIGIN, ORIGIN)
    [X_U, Y_U; X_L, Y_L]
# Ф-я формы ср. линии профиля:
y/b_ср.л(x/b, θ) := sqrt((2*sin(0.5*θ))^-2 - (x/b - 0.5)^2) - 0.5*cot(0.5*θ)
# Ф-я приведенной скорости:
λ_M(M, k) := sqrt((k + 1)/2*M^2/(1 + (k - 1)/2*M^2))
# Ф-я числа Маха:
M_λ(λ, k) := λ*sqrt(2/(k + 1))/sqrt(1 - (k - 1)/(k + 1)*λ^2)
# Газодинамические ф-и ГДФ:
ГДФ(parameter, λ, k) :=
    return (1 - λ^2*(k - 1)/(k + 1)) if parameter == "T"
    return (1 - λ^2*(k - 1)/(k + 1))^(k/(k - 1)) if parameter == "P"
    return (1 - λ^2*(k - 1)/(k + 1))^(1/(k - 1)) if parameter == "ρ"
    return λ*((k + 1)/2)^(1/(k - 1))*(1 - (k - 1)*λ^2/(k + 1))^(1/(k - 1)) if parameter == "G"
    return NaN otherwise
# Показатель адиабаты []:
k_ад(Cp, R) := Cp/(Cp - R)
# Коэф. расхода:
m_q(k, R_газовая) := (2/(k + 1))^((k + 1)/(2*(k - 1)))*sqrt(k/R_газовая)
# Число Рейнольдса:
Re(v, d, ρ, μ) := v*d*ρ/μ
# Число Прандтля:
Pr(μ, Cp, λ) := μ*Cp/λ
# Число Нуссельта:
Nu(α, d, λ) := α*d/λ
# Газовая постоянная продуктов сгорания [Дж/кг/К]:
# Газовая постоянная воздуха [Дж/кг/К]:
R_в := 287.14
R_газ(α, Fuel) :=
    288.1954313 + 0.69169588/α if (Fuel == "Керосин") or (Fuel == "Бензин")
    288.1856907 - 0.213996376/α if Fuel == "Т-1"
    288.190113 + 0.196844775/α if Fuel == "ТС-1"
    288.1792281 - 0.813445523/α if Fuel == "Дизель"
    288.1729604 - 1.432301634/α if Fuel == "Соляровое масло"
    288.1635509 - 2.254443192/α if Fuel == "Мазут"
    290.0288864 + 12.20796064/α if Fuel == "Природный газ"
    288.4860344 + 20.14625488/α if Fuel == "Коксовый газ"
    289.9681764 + 2.138861745/α if Fuel == "Биогаз"
    NaN otherwise
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# Ср. газовая постоянная продуктов сгорания [Дж/кг/К]:
R_газ.ср(α_1, α_3, Fuel) :=
    1/(α_3 - α_1)*integral(R_газ(α, Fuel), α = α_1 .. α_3) if (α_1 ≠ α_3)
    R_газ(mean(α_1, α_3), Fuel) otherwise
# Коэф. теплопроводности [Вт/м/К]:
λ(substance, T) :=
    244.2*10^-4*(T/273.15)^0.82 if substance == "воздух"
    147*10^-4*(T/273.15)^1.23 if substance == "газ"
    NaN otherwise
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# Динамичекая вязкость [Па*с]: | Вязкость продуктов сгорания [Па*с]:
μ(substance, T) :=
    17.16*10^-6*(T/273.15)^0.68 if substance == "воздух"
    13.65*10^-6*(T/273.15)^0.82 if substance == "газ"
    NaN otherwise
μ_газ(T, α_в) := 10^-5*(0.229*(T/1000)^3 - 1.333*(T/1000)^2 + 4.849*(T/1000) + 0.505 - 0.275/α_в)
μ_газ_3D := CreateMesh(μ_газ, 0, 3000, 1, 10, 40, 40)
# [component: inputs μ_газ_3D]
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# Ср. теплоемкость горючего [Дж/кг/К]:
Cp_гор.ср(P_1, P_2, T_1, T_2, Fuel) :=
    1/(P_2 - P_1)*1/(T_2 - T_1)*integral(integral(Cp_гор(P, T, Fuel), T = T_1 .. T_2), P = P_1 .. P_2) if (P_1 ≠ P_2) and (T_1 ≠ T_2)
    1/(P_2 - P_1)*integral(Cp_гор(P, mean(T_1, T_2), Fuel), P = P_1 .. P_2) if (P_1 ≠ P_2) and (T_1 == T_2)
    1/(T_2 - T_1)*integral(Cp_гор(mean(P_1, P_2), T, Fuel), T = T_1 .. T_2) if (P_1 == P_2) and (T_1 ≠ T_2)
    Cp_гор(mean(P_1, P_2), mean(T_1, T_2), Fuel) otherwise
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# Ср. теплоемкость чистых продуктов сгорания при α=1 [Дж/кг/К]:
Cp_ч.г.ср(P_1, P_2, T_1, T_2, Fuel) :=
    1/(P_2 - P_1)*1/(T_2 - T_1)*integral(integral(Cp_ч.г(P, T, Fuel), T = T_1 .. T_2), P = P_1 .. P_2) if (P_1 ≠ P_2) and (T_1 ≠ T_2)
    1/(P_2 - P_1)*integral(Cp_ч.г(P, mean(T_1, T_2), Fuel), P = P_1 .. P_2) if (P_1 ≠ P_2) and (T_1 == T_2)
    1/(T_2 - T_1)*integral(Cp_ч.г(mean(P_1, P_2), T, Fuel), T = T_1 .. T_2) if (P_1 == P_2) and (T_1 ≠ T_2)
    Cp_ч.г(mean(P_1, P_2), mean(T_1, T_2), Fuel) otherwise
# Теплоемкость продуктов сгорания [Дж/кг/К]:
Cp_газ(P, T, α, Fuel) := ((1 + l_0(Fuel))*Cp_ч.г(P, T, Fuel) + (α - 1)*l_0(Fuel)*Cp_воздух(P, T))/(1 + α*l_0(Fuel))
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# Ср. теплоемкость воздуха [Дж/кг/К]:
Cp_воздух.ср(P_1, P_2, T_1, T_2) :=
    1/(P_2 - P_1)*1/(T_2 - T_1)*integral(integral(Cp_воздух(P, T), T = T_1 .. T_2), P = P_1 .. P_2) if (P_1 ≠ P_2) and (T_1 ≠ T_2)
    1/(P_2 - P_1)*integral(Cp_воздух(P, mean(T_1, T_2)), P = P_1 .. P_2) if (P_1 ≠ P_2) and (T_1 == T_2)
    1/(T_2 - T_1)*integral(Cp_воздух(mean(P_1, P_2), T), T = T_1 .. T_2) if (P_1 == P_2) and (T_1 ≠ T_2)
    Cp_воздух(mean(P_1, P_2), mean(T_1, T_2)) otherwise
# Ср. теплоемкость продуктов сгорания [Дж/кг/К]:
Cp_газ.ср(P_1, P_2, T_1, T_2, α_1, α_2, Fuel) :=
    1/(α_2 - α_1)*1/(P_2 - P_1)*1/(T_2 - T_1)*integral(integral(integral(Cp_газ(P, T, α, Fuel), T = T_1 .. T_2), P = P_1 .. P_2), α = α_1 .. α_2) if (P_1 ≠ P_2) and (T_1 ≠ T_2) and (α_1 ≠ α_2)
    1/(P_2 - P_1)*1/(T_2 - T_1)*integral(integral(Cp_газ(P, T, mean(α_1, α_2), Fuel), T = T_1 .. T_2), P = P_1 .. P_2) if (P_1 ≠ P_2) and (T_1 ≠ T_2) and (α_1 == α_2)
    1/(α_2 - α_1)*1/(P_2 - P_1)*integral(integral(Cp_газ(P, mean(T_1, T_2), α, Fuel), P = P_1 .. P_2), α = α_1 .. α_2) if (P_1 ≠ P_2) and (T_1 == T_2) and (α_1 ≠ α_2)
    1/(α_2 - α_1)*1/(T_2 - T_1)*integral(integral(Cp_газ(mean(P_1, P_2), T, α, Fuel), T = T_1 .. T_2), α = α_1 .. α_2) if (P_1 == P_2) and (T_1 ≠ T_2) and (α_1 ≠ α_2)
    Cp_газ(mean(P_1, P_2), mean(T_1, T_2), mean(α_1, α_2), Fuel) otherwise
# Политропический КПД К и Т []:
η*_n(node, η*, π*, k) :=
    if node == "сжатие"
        1 if π* == 1
        ln((π*^((k - 1)/k) - 1)/η* + 1) otherwise
    if node == "расширение"
        1 if π* == 1
        -k/(k - 1)*ln(η**(π*^((1 - k)/k) - 1) + 1)/ln(π*) otherwise
    NaN otherwise
α_смешение(g_ок, g_add, g_гор, Fuel) := (g_ок + g_add)/(g_гор*l_0(Fuel))
T_смешение(P, T, g, α_ок1, P_add, T_add, g_add, α_ок3, Fuel) :=
    iteration ← 0
    T_см ← (g*T + g_add*T_add)/(g + g_add)
    while 1 > 0
        iteration ← iteration + 1
        trace(concat("            iteration Tсм = ", num2str(iteration)))
        T'_см ← (g*Cp_газ.ср(P_атм(0), P, T_атм(0), T, α_ок1, α_ок3, Fuel)*T + g_add*Cp_воздух.ср(P_атм(0), P_add, T_атм(0), T_add)*T_add)/(g*Cp_газ.ср(P_атм(0), P, T_атм(0), T_см, α_ок1, α_ок3, Fuel) + g_add*Cp_воздух.ср(P_атм(0), P_add, T_атм(0), T_см))
        return T'_см if |eps("rel", T_см, T'_см)| ≤ epsilon
        T_см ← T'_см
P_смешение(P, g, P_add, g_add) := (g*P + g_add*P_add)/(g + g_add)
COMPRESSOR3(π*, η*, k_1, P*_1, T*_1) :=
    P*_3 ← P*_1*π*
    iteration ← 0
    T*_3 ← T*_1
    while 1 > 0
        iteration ← iteration + 1
        trace(concat("        iteration К = ", num2str(iteration)))
        Cp ← Cp_воздух.ср(P*_1, P*_3, T*_1, T*_3)
        k ← k_ад(Cp, R_в)
        T*'_3 ← T*_1*(1 + (π*^((k - 1)/k) - 1)/η*)
        if |eps("rel", T*_3, T*'_3)| ≤ epsilon
            T*_3 ← T*'_3
            break
        T*_3 ← T*'_3
    Cp_3 ← Cp_воздух(P*_3, T*_3)
    k_3 ← k_ад(Cp_3, R_в)
    transpose([iteration, T*_3, P*_3, Cp_3, k_3])
POWERTURBINE3(π*, η*, k_1, P*_1, T*_1, α_ок3) :=
    P*_3 ← P*_1/π*
    iteration ← 0
    T*_3 ← T*_1
    while 1 > 0
        iteration ← iteration + 1
        trace(concat("        iteration СТ = ", num2str(iteration)))
        R ← R_газ.ср(α_ок3, α_ок3, Fuel)
        Cp ← Cp_газ.ср(P*_1, P*_3, T*_1, T*_3, α_ок3, α_ок3, Fuel)
        k ← k_ад(Cp, R)
        T*'_3 ← T*_1*(1 - (1 - π*^((1 - k)/k))*η*)
        if |eps("rel", T*_3, T*'_3)| ≤ epsilon
            T*_3 ← T*'_3
            break
        T*_3 ← T*'_3
    Cp_3 ← Cp_газ(P*_3, T*_3, α_ок3, Fuel)
    k_3 ← k_ад(Cp_3, R_газ(α_ок3, Fuel))
    transpose([iteration, T*_3, P*_3, Cp_3, k_3])
TURBINE3(η*, L, α_ок1, k_1, g_1, P*_1, T*_1, χ, g_охл, P*_охл, T*_охл, g_гор) :=
    α_СА3 ← α_смешение(g_1 - g_гор, χ*g_охл, g_гор, Fuel)
    R_СА3 ← R_газ(α_СА3, Fuel)
    P*_СА3 ← P_смешение(P*_1, g_1, P*_охл, χ*g_охл)
    T*_СА3 ← T_смешение(P*_1, T*_1, g_1, α_ок1, P*_охл, T*_охл, χ*g_охл, α_СА3, Fuel)
    Cp_СА3 ← Cp_газ(P*_СА3, T*_СА3, α_СА3, Fuel)
    k_СА3 ← k_ад(Cp_СА3, R_СА3)
    α_РК3 ← α_СА3
    R_РК3 ← R_газ(α_РК3, Fuel)
    iteration ← 0
    [P*_РК3, T*_РК3] ← [P*_СА3, T*_СА3]
    while 1 > 0
        iteration ← iteration + 1
        trace(concat("        iteration T = ", num2str(iteration)))
        R ← R_газ.ср(α_СА3, α_РК3, Fuel)
        Cp ← Cp_газ.ср(P*_СА3, P*_РК3, T*_СА3, T*_РК3, α_СА3, α_РК3, Fuel)
        k ← k_ад(Cp, R)
        π* ← (1 - L/(Cp*T*_СА3*η*))^(k/(1 - k))
        P*_РК3 ← P*_СА3/π*
        T*_РК3 ← T*_СА3 - L/Cp
        break if L == 0 or |eps("rel", L, Cp_газ.ср(P*_СА3, P*_РК3, T*_СА3, T*_РК3, α_СА3, α_РК3, Fuel)*(T*_СА3 - T*_РК3))| ≤ epsilon
    α_ок3 ← α_смешение(g_1 - g_гор, g_охл, g_гор, Fuel)
    R_3 ← R_газ(α_ок3, Fuel)
    P*_3 ← P_смешение(P*_РК3, g_1 + χ*g_охл, P*_охл, (1 - χ)*g_охл)
    T*_3 ← T_смешение(P*_РК3, T*_РК3, g_1 + χ*g_охл, α_РК3, P*_охл, T*_охл, (1 - χ)*g_охл, α_ок3, Fuel)
    Cp_3 ← Cp_газ(P*_3, T*_3, α_ок3, Fuel)
    k_3 ← k_ад(Cp_3, R_газ(α_ок3, Fuel))
    transpose([iteration, α_ок3, R_3, T*_3, P*_3, Cp_3, k_3, π*])
# Фор-ла Тихонова относ. массового расхода на охлаждение
# по максимальной и допустимой температуре,
# отнесенного к массовому расходу на выходе из КС:
g_Тихонов(T_г, T_доп) := 0.01 + 0.09*((T_г - T_доп)/1000) + 0.2*((T_г - T_доп)/1000)^2 + 0.16*((T_г - T_доп)/1000)^3
# Фор-ла ЦИАМ относ. массового расхода на охлаждение
# по температурам перед КС, после КС и допустимой,
# отнесенного к массовому расходу на выходе из КС:
g_ЦИАМ(T_КС3, T_доп, T_КС1) :=
    g ← 0.059*((T_КС3 - T_доп)/(T_КС3 - T_КС1))/(1 - 1.42*((T_КС3 - T_доп)/(T_КС3 - T_КС1)))
    g ← NaN if g < 0 or g > 1
# Постоянная Ларсона-Мюллера:
C_ЛМ ≡ 20
# Жаропрочность:
Ж(T_доп, τ) := T_доп*(log(τ/3600) + C_ЛМ)
# [area: Исходные данные]
# Высота движения [м]:
H_υ := 0
# Мах движения:
M_υ := 0
# Реактивная тяга движения [Н]:
R_υ := 80*10^3
# Частота дискритизации:
N_dis ≡ 21
# Дискритизация:
i := 1 .. N_dis
# Полная температура после КС [К]:
T*_КС3 := 1773
# Точность сходимости итераций:
epsilon ≡ 1 %
# Допустимая температура Л [К]:
T_Л.доп := 1373
# Допустимая температура деталей Т [К]:
T_Т.доп := 1273
Adress := ".\exports\"
# Температура горючего [К]:
T_гор := T_атм(H_υ) + 40 = 328.15
# Подогрев охл. от КС [К]:
ΔT_охлКС := 40
# Степень двухконтурности:
m2 ≡ 6
# Горючее:
Fuel ≡ "Керосин"
# [area: Выбор схемы ГТД или ГТУ]
# Р вала НД:
# Р вала СД:
[Р_ВНД; Р_ВСД; Р_ВВД] ≡ [0; 0; 0]
# Р вала ВД:
# Н ВД:
# Мощность Н ВД [Вт]:
N_НВД :=
    (50 + 100 + 20)*10^3
    0 if Н_ВД == 0
    = 170*10^3
# Редуктор привода Н ВД:
Р_НВД :=
    1
    0 if Н_ВД == 0
    = 1
# Н СД:
[Н_ВД; Н_СД; Н_НД] ≡ [1; 0; 0]
# Мощность Н СД [Вт]:
N_НСД :=
    1100*10^3
    0 if Н_СД == 0
    = 0*10^3
# Редуктор привода Н СД:
Р_НСД :=
    1
    0 if Н_СД == 0
    = 0
# Н НД:
# Мощность Н НД [Вт]:
N_ННД :=
    300*10^3
    0 if Н_НД == 0
    = 0*10^3
# Редуктор привода Н НД:
Р_ННД :=
    1
    0 if Н_НД == 0
    = 0
# СТ:
СТ := 0
# Мощность нагрузки СТ [Вт]:
N_НСТ :=
    32000*10^3
    0 if СТ == 0
    = 0*10^3
# Редуктор привода СТ:
Р_НСТ :=
    0
    0 if СТ == 0
    = 0
# СМ:
СМ := 0
# Реактивное С I контура:
СI := 1
# Реактивное С II контура:
СII :=
    1
    0 if m2 == 0
    = 1
# [area: Степени повышения/понижения давления]
# Степень повышения полного давления КНД:
[π*_КНДII[i]; π*_КНДI[i]] := [1.2 + (i - 1)/(N_dis - 1)*0.8; 3]
π*_ср^4 = 3.03596
# Степень повышения полного давления КСД:
[π*_КСДII[i]; π*_КСДI[i]] := [1; 1]
π*_ср ≡ 1.32
# Степень повышения полного давления КВД:
[π*_КВДII[i]; π*_КВДI[i]] := [1; 9]
π*_ср^9 = 12.1665
transpose(augment(π*_КНДII, π*_КНДI)) = [
    1.2, 1.24, 1.28, 1.32, 1.36, 1.4, 1.44, 1.48, 1.52, 1.56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;
    3, 3, 3, 3, 3, 3, 3, 3, 3, 3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]
transpose(augment(π*_КСДII, π*_КСДI)) = [
    1, 1, 1, 1, 1, 1, 1, 1, 1, 1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;
    1, 1, 1, 1, 1, 1, 1, 1, 1, 1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]
transpose(augment(π*_КВДII, π*_КВДI)) = [
    1, 1, 1, 1, 1, 1, 1, 1, 1, 1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;
    9, 9, 9, 9, 9, 9, 9, 9, 9, 9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]
# Суммарная степень повышения полного давления в I контуре:
# Суммарная степень повышения полного давления в II контуре:
[π*_КIΣ[i]; π*_КIIΣ[i]] := [π*_КНДI[i]*π*_КСДI[i]*π*_КВДI[i]; π*_КНДII[i]*π*_КСДII[i]*π*_КВДII[i]]
transpose(augment(π*_КIIΣ, π*_КIΣ)) = [
    1.2, 1.24, 1.28, 1.32, 1.36, 1.4, 1.44, 1.48, 1.52, 1.56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;
    27, 27, 27, 27, 27, 27, 27, 27, 27, 27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]
# [area: КПД]
# Механический КПД:
η_мех ≡ 0.99
0.99 ≤ η_мех ≤ 0.995 = 1
# КПД Р вала КНД:
η_РВНД :=
    0.97
    1 if Р_ВНД == 0
    = 1
[η*_КНДII; η*_КНДI] ≡ [87; 87]*%
# Адиабатные КПД К:
0.82 ≤ η*_ОК ≤ 0.89
0.89 ≤ η*_ОК.п ≤ 0.92
# КПД Р вала КСД:
η_РВСД :=
    0.97
    1 if Р_ВСД == 0
    = 1
[η*_КСДII; η*_КСДI] ≡ [87; 87]*%
0.75 ≤ η*_ЦБК ≤ 0.83
0.85 ≤ η*_ЦБК.п ≤ 0.87
# КПД Р вала КВД:
η_РВВД :=
    0.97
    1 if Р_ВВД == 0
    = 1
[η*_КВДII; η*_КВДI] ≡ [87; 87]*%
# Коэф. полноты горения:
η_г := 99 %
# КПД Р Н ВД:
η_РНВД :=
    0.97
    1 if Р_НВД == 0
    = 0.97
# Адиабатные КПД Т:
# КПД Р Н СД:
η_РНСД :=
    0.97
    1 if Р_НСД == 0
    = 1
[η*_ТВД; η*_ТСД; η*_ТНД] := [87; 88; 90]*%
# КПД Р Н НД:
η_РННД :=
    0.97
    1 if Р_ННД == 0
    = 1
η*_СТ :=
    91 %
    100 % if СТ == 0
    = 100 %
# КПД Р Н СТ:
η_РНСТ :=
    0.97
    1 if Р_НСТ == 0
    = 1
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# [area: Коэф]
# Коэф. сохранения полного давления на входе:
σ_вх := 0.985
0.93 ≤ σ_вх ≤ 0.99 = 1
# Коэф. сохранения полного давления переходного канала Вл->СII:
[σ_КНДII->КСДII; σ_КСДII->КВДII; σ_КВДII->] ≡
    [0.98; 1; 1]
    transpose([1, 1, 1]) if m2 == 0
    = [0.98; 1; 1]
# Коэф. сохранения полного давления переходного канала КНД->КСД:
# Коэф. сохранения полного давления переходного канала КСД->КВД:
[σ_КНДI->КСДI; σ_КСДI->КВДI; σ_КВДI->КС] ≡ [0.99; 1; 1]
# Коэф. сохранения полного давления переходного канала КСД->КВД:
# Коэф. сохранения полного давления в КС:
σ_КС := 0.96
0.96 ≤ σ_КС ≤ 0.97 = 1
# Коэф. сохранения полного давления охлаждения:
σ_охл := 0.97
σ_КС ≤ σ_охл = 1
# Коэф. сохранения полного давления переходного канала КС->ТВД:
# Коэф. сохранения полного давления переходного канала ТВД->ТСД:
[σ_КС->ТВД; σ_ТВД->ТСД; σ_ТСД->ТНД] ≡ [1; 1; 0.99]
# Коэф. сохранения полного давления переходного канала ТСД->ТНД:
# Коэф. сохранения полного давления переходного канала ТНД->СТ:
σ_ТНД->СТ :=
    0.99
    1 if СТ == 0
    = 1
# Коэф. сохранения полного давления переходного канала СТ->СI:
σ_СТ-> :=
    1
    1 if СI == 0 and СМ == 0
    = 1
# Коэф сохранения полного давления в СМ:
σ_СМ :=
    0.9
    1 if СМ == 0
    = 1
# Коэф сохранения полного давления на выходе:
σ_вых :=
    0.98
    1 if СI == 1
    = 1
0.98 ≤ σ_вых ≤ 0.99 = 0
# Коэф. скорости реактивного СI:
0.975 ≤ φ_Срегулируемое ≤ 0.985
# Коэф. скорости реактивного СII:
[φ_СI; φ_СII] ≡ [0.9925; 0.9925]
0.99 ≤ φ_Снерегулируемое ≤ 0.995
# [area: Относ. расходы утечек]
# Отношение массового расхода утечек к расходам на входе в соответствующий контур:
[
    g_утВхII, g_утКНДII, g_утКСДII, g_утКВДII, g_утКСII, g_утВыхII;
    g_утВхI, g_утКНДI, g_утКСДI, g_утКВДI, g_утКСI, g_утВыхI
] ≡ [0, 0.1, 0, 0, 0, 0; 0, 0.1, 0, 0.3, 0, 0]*%
[g_утKI; g_утКСI; g_утТI] := [g_утКНДI + g_утКСДI + g_утКВДI; g_утКСI; g_утТВД + g_утТСД + g_утТНД + g_утСТ] = [0.4; 0; 0.4] %
[g_утТВД, g_утТСД, g_утТНД, g_утСТ] ≡ [0.3, 0, 0.1, 0]*%
g_утСМ :=
    0.2 %
    0 if СМ == 0
    = 0 %
g_утСI :=
    0*% if СI == 1
    0 otherwise
    = 0 %
g_утСII :=
    0*% if СII == 1
    0 otherwise
    = 0 %
# Отношение суммарного массового расхода утечек контура к расходу на входе в соответствующий контур:
g_утI := g_утВхI + g_утKI + g_утКСI + g_утТI + g_утСI = 0.8 %
g_утII :=
    g_утВхII + g_утКНДII + g_утСII
    0 if m2 == 0
    = 0.1 %
0.5*% ≤ g_утI ≤ 1*% = 1
g_утII == 0 if m2 == 0
0.5*% ≤ g_утII ≤ 1*% otherwise
= 0
# [area: Начальные невозмущенные параметры]
# Начальное невозмущенное давление [Па]:
[P*_н; P_н] := [P_атм(H_υ); P_атм(H_υ)] = [101.325; 101.325]*10^3
# Начальная невозмущенная температура [К]:
[T*_н; T_н] := [T_атм(H_υ); T_атм(H_υ)] = [288.15; 288.15]
# Начальная невозмущенная плотность (кг/м^3):
[ρ*_н; ρ_н] := [P*_н/(R_в*T*_н); P*_н/(R_в*T*_н)] = [1.22463; 1.22463]
# Начальная невозмущенная темлоемкость [Дж/кг/К]:
Сp_н := Cp_воздух(P_н, T_н) = 1002.55
# Начальный невозмущенный показатель адиабаты:
k_н := k_ад(Сp_н, R_в) = 1.40136
# [area: Входное устройство]
# Скорость полета [м/с]:
υ := M_υ*sqrt(k_н*R_в*T_н) = 0
υ*3.6 = 0  # [км/ч]
# Полное давление на входе [Па]:
P*_вх := P*_н*(1 + (k_н - 1)/2*M_υ^2)^(k_н/(k_н - 1)) = 101.325*10^3
# Полная температура на входе [К]:
T*_вх := T*_н*(1 + (k_н - 1)/2*M_υ^2) = 288.15
# Полная плотность на входе (кг/м^3):
ρ*_вх := P*_вх/(R_в*T*_вх) = 1.22463
# Теплоемкоть на входе [Дж/кг/К]:
Cp_вх := Cp_воздух(P*_вх, T*_вх) = 1002.55
# Показатель адиабаты на входе:
k_вх := k_ад(Cp_вх, R_в) = 1.40136
# Степень повышения полного давления на входе []:
π*_вх := P*_вх/P*_н = 1
# [area: Расчет К группы]
[
    T*_КНДI1, P*_КНДI1, k_КНДI1, Cp_КНДI1, L_КНДI, iteration_КНДI;
    T*_КНДII1, P*_КНДII1, k_КНДII1, Cp_КНДII1, L_КНДII, iteration_КНДII;
    T*_КНДI3, P*_КНДI3, k_КНДI3, Cp_КНДI3, L_КНД, iteration_КНДI;
    T*_КНДII3, P*_КНДII3, k_КНДII3, Cp_КНДII3, L_КНД, iteration_КНДII;
    T*_КСДI1, P*_КСДI1, k_КСДI1, Cp_КСДI1, L_КСДI, iteration_КСДI;
    T*_КСДII1, P*_КСДII1, k_КСДII1, Cp_КСДII1, L_КСДII, iteration_КСДII;
    T*_КСДI3, P*_КСДI3, k_КСДI3, Cp_КСДI3, L_КСД, iteration_КСДI;
    T*_КСДII3, P*_КСДII3, k_КСДII3, Cp_КСДII3, L_КСД, iteration_КСДII;
    T*_КВДI1, P*_КВДI1, k_КВДI1, Cp_КВДI1, L_КВДI, iteration_КВДI;
    T*_КВДII1, P*_КВДII1, k_КВДII1, Cp_КВДII1, L_КВДII, iteration_КВДII;
    T*_КВДI3, P*_КВДI3, k_КВДI3, Cp_КВДI3, L_КВД, iteration_КВДI;
    T*_КВДII3, P*_КВДII3, k_КВДII3, Cp_КВДII3, L_КВД, iteration_КВДII
] :=
    for i ∈ 1 .. N_dis
        trace(concat("i = ", num2str(i)))
        trace("    КНД")
        [T*_КНДI1[i]; T*_КНДII1[i]] ← [T*_вх; T*_вх]
        [P*_КНДI1[i]; P*_КНДII1[i]] ← [
            P*_вх*σ_вх;
            {
                P*_вх*σ_вх if m2 ≠ 0
                P*_н otherwise
            }
        ]
        [k_КНДI1[i]; k_КНДII1[i]] ← [k_ад(Cp_воздух(P*_КНДI1[i], T*_КНДI1[i]), R_в); k_ад(Cp_воздух(P*_КНДII1[i], T*_КНДII1[i]), R_в)]
        [Cp_КНДI1[i]; Cp_КНДII1[i]] ← [Cp_воздух(P*_КНДI1[i], T*_КНДI1[i]); Cp_воздух(P*_КНДII1[i], T*_КНДII1[i])]
        [iteration_КНДI[i]; T*_КНДI3[i]; P*_КНДI3[i]; Cp_КНДI3[i]; k_КНДI3[i]] ← COMPRESSOR3(π*_КНДI[i], η*_КНДI, k_КНДI1[i], P*_КНДI1[i], T*_КНДI1[i])
        [iteration_КНДII[i]; T*_КНДII3[i]; P*_КНДII3[i]; Cp_КНДII3[i]; k_КНДII3[i]] ← COMPRESSOR3(π*_КНДII[i], η*_КНДII, k_КНДII1[i], P*_КНДII1[i], T*_КНДII1[i])
        [L_КНДI[i]; L_КНДII[i]] ← [
            Cp_воздух.ср(P*_КНДI1[i], P*_КНДI3[i], T*_КНДI1[i], T*_КНДI3[i])*(T*_КНДI3[i] - T*_КНДI1[i]);
            Cp_воздух.ср(P*_КНДII1[i], P*_КНДII3[i], T*_КНДII1[i], T*_КНДII3[i])*(T*_КНДII3[i] - T*_КНДII1[i])
        ]
        L_КНД[i] ← (1*L_КНДI[i] + m2*L_КНДII[i])/(1 + m2)
        trace("    КСД")
        [T*_КСДI1[i]; T*_КСДII1[i]] ← [T*_КНДI3[i]; T*_КНДII3[i]]
        [P*_КСДI1[i]; P*_КСДII1[i]] ← [P*_КНДI3[i]*σ_КНДI->КСДI; P*_КНДII3[i]*σ_КНДII->КСДII]
        [k_КСДI1[i]; k_КСДII1[i]] ← [k_ад(Cp_воздух(P*_КСДI1[i], T*_КСДI1[i]), R_в); k_ад(Cp_воздух(P*_КСДII1[i], T*_КСДII1[i]), R_в)]
        [Cp_КСДI1[i]; Cp_КСДII1[i]] ← [Cp_воздух(P*_КСДI1[i], T*_КСДI1[i]); Cp_воздух(P*_КСДII1[i], T*_КСДII1[i])]
        [iteration_КСДI[i]; T*_КСДI3[i]; P*_КСДI3[i]; Cp_КСДI3[i]; k_КСДI3[i]] ← COMPRESSOR3(π*_КСДI[i], η*_КСДI, k_КСДI1[i], P*_КСДI1[i], T*_КСДI1[i])
        [iteration_КСДII[i]; T*_КСДII3[i]; P*_КСДII3[i]; Cp_КСДII3[i]; k_КСДII3[i]] ← COMPRESSOR3(π*_КСДII[i], η*_КСДII, k_КСДII1[i], P*_КСДII1[i], T*_КСДII1[i])
        [L_КСДI[i]; L_КСДII[i]] ← [
            Cp_воздух.ср(P*_КСДI1[i], P*_КСДI3[i], T*_КСДI1[i], T*_КСДI3[i])*(T*_КСДI3[i] - T*_КСДI1[i]);
            Cp_воздух.ср(P*_КСДII1[i], P*_КСДII3[i], T*_КСДII1[i], T*_КСДII3[i])*(T*_КСДII3[i] - T*_КСДII1[i])
        ]
        L_КСД[i] ← (1*L_КСДI[i] + m2*L_КСДII[i])/(1 + m2)
        trace("    КВД")
        [T*_КВДI1[i]; T*_КВДII1[i]] ← [T*_КНДI3[i]; T*_КНДII3[i]]
        [P*_КВДI1[i]; P*_КВДII1[i]] ← [P*_КСДI3[i]*σ_КСДI->КВДI; P*_КСДII3[i]*σ_КСДII->КВДII]
        [k_КВДI1[i]; k_КВДII1[i]] ← [k_ад(Cp_воздух(P*_КВДI1[i], T*_КВДI1[i]), R_в); k_ад(Cp_воздух(P*_КВДII1[i], T*_КВДII1[i]), R_в)]
        [Cp_КВДI1[i]; Cp_КВДII1[i]] ← [Cp_воздух(P*_КВДI1[i], T*_КВДI1[i]); Cp_воздух(P*_КВДII1[i], T*_КВДII1[i])]
        [iteration_КВДI[i]; T*_КВДI3[i]; P*_КВДI3[i]; Cp_КВДI3[i]; k_КВДI3[i]] ← COMPRESSOR3(π*_КВДI[i], η*_КВДI, k_КВДI1[i], P*_КВДI1[i], T*_КВДI1[i])
        [iteration_КВДII[i]; T*_КВДII3[i]; P*_КВДII3[i]; Cp_КВДII3[i]; k_КВДII3[i]] ← COMPRESSOR3(π*_КВДII[i], η*_КВДII, k_КВДII1[i], P*_КВДII1[i], T*_КВДII1[i])
        [L_КВДI[i]; L_КВДII[i]] ← [
            Cp_воздух.ср(P*_КВДI1[i], P*_КВДI3[i], T*_КВДI1[i], T*_КВДI3[i])*(T*_КВДI3[i] - T*_КВДI1[i]);
            Cp_воздух.ср(P*_КВДII1[i], P*_КВДII3[i], T*_КВДII1[i], T*_КВДII3[i])*(T*_КВДII3[i] - T*_КВДII1[i])
        ]
        L_КВД[i] ← (1*L_КВДI[i] + m2*L_КВДII[i])/(1 + m2)
    [
        T*_КНДI1, P*_КНДI1, k_КНДI1, Cp_КНДI1, L_КНДI, iteration_КНДI;
        T*_КНДII1, P*_КНДII1, k_КНДII1, Cp_КНДII1, L_КНДII, iteration_КНДII;
        T*_КНДI3, P*_КНДI3, k_КНДI3, Cp_КНДI3, L_КНД, iteration_КНДI;
        T*_КНДII3, P*_КНДII3, k_КНДII3, Cp_КНДII3, L_КНД, iteration_КНДII;
        T*_КСДI1, P*_КСДI1, k_КСДI1, Cp_КСДI1, L_КСДI, iteration_КСДI;
        T*_КСДII1, P*_КСДII1, k_КСДII1, Cp_КСДII1, L_КСДII, iteration_КСДII;
        T*_КСДI3, P*_КСДI3, k_КСДI3, Cp_КСДI3, L_КСД, iteration_КСДI;
        T*_КСДII3, P*_КСДII3, k_КСДII3, Cp_КСДII3, L_КСД, iteration_КСДII;
        T*_КВДI1, P*_КВДI1, k_КВДI1, Cp_КВДI1, L_КВДI, iteration_КВДI;
        T*_КВДII1, P*_КВДII1, k_КВДII1, Cp_КВДII1, L_КВДII, iteration_КВДII;
        T*_КВДI3, P*_КВДI3, k_КВДI3, Cp_КВДI3, L_КВД, iteration_КВДI;
        T*_КВДII3, P*_КВДII3, k_КВДII3, Cp_КВДII3, L_КВД, iteration_КВДII
    ]
# [area: КНД]
# Полная температура перед КНД [К]:
transpose(augment(T*_КНДII1, T*_КНДI1)) =  # no stored result
# Температура после КНД [К]:
transpose(augment(T*_КНДII3, T*_КНДI3)) =  # no stored result
# Полное давление перед КНД [Па]:
transpose(augment(P*_КНДI1, P*_КНДII1)) = 10^3
# Полное давление после КНД [Па]:
transpose(augment(P*_КНДII3, P*_КНДI3)) = 10^3
# Показатель адиабаты перед КНД:
transpose(augment(k_КНДII1, k_КНДI1)) =  # no stored result
# Показатель адиабаты после КНД:
transpose(augment(k_КНДII3, k_КНДI3)) =  # no stored result
# Теплоемкость перед КНД [Дж/кг/К]:
transpose(augment(Cp_КНДII1, Cp_КНДI1)) = 10^3
# Теплоемкость после КНД [Дж/кг/К]:
transpose(augment(Cp_КНДII3, Cp_КНДI3)) = 10^3
# Количество итераций:
transpose(augment(iteration_КНДII, iteration_КНДI)) =  # no stored result
# Ср. теплоемкость КНД [Дж/кг/К]:
[Cp_КНДI[i]; Cp_КНДII[i]] := [
    Cp_воздух.ср(P*_КНДI1[i], P*_КНДI3[i], T*_КНДI1[i], T*_КНДI3[i]);
    Cp_воздух.ср(P*_КНДII1[i], P*_КНДII3[i], T*_КНДII1[i], T*_КНДII3[i])
]
transpose(augment(Cp_КНДII, Cp_КНДI)) = 10^3
# Ср. показатель адиабаты КНД:
[k_КНДII[i]; k_КНДI[i]] := [k_ад(Cp_КНДII[i], R_в); k_ад(Cp_КНДI[i], R_в)]
transpose(augment(k_КНДII, k_КНДI)) =  # no stored result
# Удельная работа КНД [Дж/кг]:
transpose(augment(L_КНДII, L_КНДI)) = 10^3
# Суммарная удельная работа КНД [Дж/кг]:
transpose(L_КНД) = 10^3
# Общий адиабатический КПД КНД:
η*_КНД := (η*_КНДI + m2*η*_КНДII)/(m2 + 1) = 86 %
# [area: КСД]
# Полная температура перед КСД [К]:
transpose(augment(T*_КСДII1, T*_КСДI1)) =  # no stored result
# Температура после КСД [К]:
transpose(augment(T*_КСДII3, T*_КСДI3)) =  # no stored result
# Полное давление перед КСД [Па]:
transpose(augment(P*_КСДII1, P*_КСДI1)) = 10^3
# Полное давление после КСД [Па]:
transpose(augment(P*_КСДII3, P*_КСДI3)) = 10^3
# Показатель адиабаты перед КСД:
transpose(augment(k_КСДII1, k_КСДI1)) =  # no stored result
# Показатель адиабаты после КСД:
transpose(augment(k_КСДII3, k_КСДI3)) =  # no stored result
# Теплоемкость перед КСД [Дж/кг/К]:
transpose(augment(Cp_КСДII1, Cp_КСДI1)) = 10^3
# Теплоемкость после КСД [Дж/кг/К]:
transpose(augment(Cp_КСДII3, Cp_КСДI3)) = 10^3
# Количество итераций:
transpose(augment(iteration_КСДII, iteration_КСДI)) =  # no stored result
# Ср. теплоемкость КСД [Дж/кг/К]:
[Cp_КСДII[i]; Cp_КСДI[i]] := [
    Cp_воздух.ср(P*_КСДII1[i], P*_КСДII3[i], T*_КСДII1[i], T*_КСДII3[i]);
    Cp_воздух.ср(P*_КСДI1[i], P*_КСДI3[i], T*_КСДI1[i], T*_КСДI3[i])
]
transpose(augment(Cp_КСДII, Cp_КСДI)) = 10^3
# Ср. показатель адиабаты КСД:
[k_КСДII[i]; k_КСДI[i]] := [k_ад(Cp_КСДII[i], R_в); k_ад(Cp_КСДI[i], R_в)]
transpose(augment(k_КСДII, k_КСДI)) =  # no stored result
# Удельная работа КСД [Дж/кг]:
transpose(augment(L_КСДII, L_КСДI)) = 10^3
# Суммарная удельная работа КСД [Дж/кг]:
transpose(L_КСД) = 10^3
# Общий адиабатический КПД КСД:
η*_КСД := (η*_КСДI + m2*η*_КСДII)/(m2 + 1) = 86 %
# [area: КВД]
# Полная температура перед КВД [К]:
transpose(augment(T*_КВДII1, T*_КВДI1)) =  # no stored result
# Температура после КВД [К]:
transpose(augment(T*_КВДII3, T*_КВДI3)) =  # no stored result
# Полное давление перед КВД [Па]:
transpose(augment(P*_КВДII1, P*_КВДI1)) = 10^3
# Полное давление после КВД [Па]:
transpose(augment(P*_КВДII3, P*_КВДI3)) = 10^3
# Показатель адиабаты перед КВД:
transpose(augment(k_КВДII1, k_КВДI1)) =  # no stored result
# Показатель адиабаты после КВД:
transpose(augment(k_КВДII3, k_КВДI3)) =  # no stored result
# Теплоемкость перед КВД [Дж/кг/К]:
transpose(augment(Cp_КВДII1, Cp_КВДI1)) = 10^3
# Теплоемкость после КВД [Дж/кг/К]:
transpose(augment(Cp_КВДII3, Cp_КВДI3)) = 10^3
# Количество итераций:
transpose(augment(iteration_КВДII, iteration_КВДI)) =  # no stored result
# Ср. теплоемкость КВД [Дж/кг/К]:
[Cp_КВДII[i]; Cp_КВДI[i]] := [
    Cp_воздух.ср(P*_КВДII1[i], P*_КВДII3[i], T*_КВДII1[i], T*_КВДII3[i]);
    Cp_воздух.ср(P*_КВДI1[i], P*_КВДI3[i], T*_КВДI1[i], T*_КВДI3[i])
]
transpose(augment(Cp_КВДII, Cp_КВДI)) = 10^3
# Ср. показатель адиабаты КВД:
[k_КВДII[i]; k_КВДI[i]] := [k_ад(Cp_КВДII[i], R_в); k_ад(Cp_КВДI[i], R_в)]
transpose(augment(k_КВДII, k_КВДI)) =  # no stored result
# Удельная работа КВД [Дж/кг]:
transpose(augment(L_КВДII, L_КВДI)) = 10^3
# Суммарная удельная работа КВД [Дж/кг]:
transpose(L_КВД) = 10^3
# Общий адиабатический КПД КВД:
η*_КВД := (η*_КВДI + m2*η*_КВДII)/(m2 + 1) = 87 %
# [area: КС]
# Полное давление перед КС [Па]:
P*_КС1[i] := P*_КВДI3[i]*σ_КВДI->КС
transpose(P*_КС1) = 10^3
# Полное давление после КС [Па]:
P*_КС3[i] := P*_КС1[i]*σ_КС
transpose(P*_КС3) = 10^3
# Полная температура перед КС [К]:
T*_КС1[i] := T*_КВДI3[i]
transpose(T*_КС1) =  # no stored result
# Полная температура после КС [К]:
T*_КС3[i] := T*_КС3
transpose(T*_КС3) = [1773, 1773, 1773, 1773, 1773, 1773, 1773, 1773, 1773, 1773, 1773, 1773, 1773, 1773, 1773, 1773, 1773, 1773, 1773, 1773, 1773]
# Отношение массового расхода горючего к расходу РТ на входе в КС:
g_гор_КС1[i] := Cp_воздух.ср(P*_КС1[i], P*_КС3[i], T*_КС1[i], T*_КС3[i])*(T*_КС3[i] - T*_КС1[i])/(Q_нр(Fuel)*η_г + (-1)*(1 + l_0(Fuel))*(Cp_ч.г.ср(P_атм(0), P*_КС3[i], T_0 + 15, T*_КС3[i], Fuel)*(T*_КС3[i] - (T_0 + 15))) + l_0(Fuel)*(Cp_воздух.ср(P_атм(0), P*_КС3[i], T_0 + 15, T*_КС3[i])*(T*_КС3[i] - (T_0 + 15))) + (Cp_гор.ср(P_атм(H_υ), P_атм(H_υ), T_0 + 15, T_гор, Fuel)*(T_гор - (T_0 + 15))))
transpose(g_гор_КС1) =  # no stored result
# Отношение массового расхода горючего к расходу на входе в I контур:
g_гор[i] := g_гор_КС1[i]*(1 - g_утВхI - g_утKI)/(1 + g_Тихонов(T*_КС3[i], T_Т.доп)*(1 + g_гор_КС1[i]))
transpose(g_гор) =  # no stored result
# Относ. массовый расход на охл. Т,
# отнесенный к расходу на выходе из КС:
transpose(g_Тихонов(T*_КС3, T_Т.доп)) = [12.5, 12.5, 12.5, 12.5, 12.5, 12.5, 12.5, 12.5, 12.5, 12.5, 12.5, 12.5, 12.5, 12.5, 12.5, 12.5, 12.5, 12.5, 12.5, 12.5, 12.5] %
# Относ. массовый расход на охлаждение Т,
# отнесенный к расходу на входе в I контур:
g_охлТ[i] := g_ЦИАМ(T*_КС3[i], T_Т.доп, T*_КС1[i])*(1 - (g_утВхI + g_утKI + g_утКСI) + g_гор[i])/(1 + g_ЦИАМ(T*_КС3[i], T_Т.доп, T*_КС1[i]))
transpose(g_охлТ) =  # no stored result
# Относ. массовый расход на охлаждение Т,
# отнесенный к расходу на входе в I контур:
g_охлТ[i] := g_Тихонов(T*_КС3[i], T_Т.доп)*(1 - (g_утВхI + g_утKI + g_утКСI) + g_гор[i])/(1 + g_Тихонов(T*_КС3[i], T_Т.доп))
transpose(g_охлТ) =  # no stored result
# Относ. массовый расход на охлаждение Л Т,
# отнесенный к расходу на входе в I контур:
g_охлЛ[i] := g_ЦИАМ(T*_КС3[i], T_Л.доп, T*_КС1[i])*(1 - (g_утВхI + g_утKI + g_утКСI) + g_гор[i])/(1 + g_ЦИАМ(T*_КС3[i], T_Л.доп, T*_КС1[i]))
transpose(g_охлЛ) =  # no stored result
# Относ. массовый расход на охлаждение Л Т,
# отнесенный к расходу на входе в I контур:
g_охлЛ[i] := g_Тихонов(T*_КС3[i], T_Л.доп)*(1 - (g_утВхI + g_утKI + g_утКСI) + g_гор[i])/(1 + g_Тихонов(T*_КС3[i], T_Л.доп))
transpose(g_охлЛ) =  # no stored result
# Относ. массовые расходы на охл, отнесенные к расходу на входе в I контур:
[g_охлТВД, g_охлЛВД; g_охлТСД, g_охлЛСД; g_охлТНД, g_охлЛНД] :=
    for i ∈ 1 .. N_dis
        [g_охл.Т; g_охл.Л] ← [g_охлТ[i]; g_охлЛ[i]]
        [g_охлТВД[i]; g_охлЛВД[i]] ←
            [g_охл.Т; g_охл.Л]*100*% if (π*_КВДI[i] ≠ 1) and ((π*_КСДI[i] == 1) and (π*_КНДI[i] == 1))
            [g_охл.Т; g_охл.Л]*80*% if (π*_КВДI[i] ≠ 1) and ((π*_КСДI[i] ≠ 1) or (π*_КНДI[i] ≠ 1))
            [0; 0] otherwise
        [g_охл.Т; g_охл.Л] ← [g_охл.Т; g_охл.Л] - [g_охлТВД[i]; g_охлЛВД[i]]
        [g_охлТСД[i]; g_охлЛСД[i]] ←
            [g_охл.Т; g_охл.Л]*100*% if (π*_КСДI[i] ≠ 1) and (π*_КНДI[i] == 1)
            [g_охл.Т; g_охл.Л]*80*% if (π*_КСДI[i] ≠ 1) and (π*_КНДI[i] ≠ 1)
            [0; 0] otherwise
        [g_охл.Т; g_охл.Л] ← [g_охл.Т; g_охл.Л] - [g_охлТСД[i]; g_охлЛСД[i]]
        [g_охлТНД[i]; g_охлЛНД[i]] ← [g_охл.Т; g_охл.Л]
    [g_охлТВД, g_охлЛВД; g_охлТСД, g_охлЛСД; g_охлТНД, g_охлЛНД]
# Отношение расхода на охл. СА к общему расходу []:
χ ≡ 2/3 = 0.666667
transpose(augment(g_охлТВД, g_охлТСД, g_охлТНД)) =  # no stored result
transpose(augment(g_охлЛВД, g_охлЛСД, g_охлЛНД)) =  # no stored result
transpose(g_охлТВД) + transpose(g_охлТСД) + transpose(g_охлТНД) ≤ transpose(g_охлТ) =  # no stored result
transpose(g_охлЛВД) + transpose(g_охлЛСД) + transpose(g_охлЛНД) ≤ transpose(g_охлЛ) =  # no stored result
# Коэф. избытка воздуха после КС []:
α_КС3[i] := 1/(g_гор_КС1[i]*l_0(Fuel))
transpose(α_КС3) =  # no stored result
# Коэф. избытка воздуха после КС []:
α_КС3[i] := (1 - (g_утВхI + g_утKI) - g_охлТ[i])/(g_гор[i]*l_0(Fuel))
transpose(α_КС3) =  # no stored result
# Газовая постоянная продуктов сгорания [Дж/кг/К]:
R_газ(transpose(α_КС3), Fuel) =  # no stored result
# Теплоемкость перед и после КС [Дж/кг/К]:
[Cp_КС1[i]; Cp_КС3[i]] := [Cp_воздух(P*_КС1[i], T*_КС1[i]); Cp_газ(P*_КС3[i], T*_КС3[i], α_КС3[i], Fuel)]
transpose(Cp_КС1) = 10^3
transpose(Cp_КС3) = 10^3
# Показатель адиабаты перед и после КС:
[k_КС1[i]; k_КС3[i]] := [k_ад(Cp_КС1[i], R_в); k_ад(Cp_КС3[i], R_газ(α_КС3[i], Fuel))]
transpose(k_КС1) =  # no stored result
transpose(k_КС3) =  # no stored result
# [area: Относительные массовые расходы, отнесенные к расходу на входе в I контур]
# Относ. расход перед Вх:
[g_ВхII1[i]; g_ВхI1[i]] := [m2*1; 1*1]
g_Вх1[i] := g_ВхI1[i] + g_ВхII1[i]
transpose(augment(g_ВхII1, g_ВхI1, g_Вх1)) = [
    600, 600, 600, 600, 600, 600, 600, 600, 600, 600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;
    100, 100, 100, 100, 100, 100, 100, 100, 100, 100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;
    700, 700, 700, 700, 700, 700, 700, 700, 700, 700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] %
# Относ. расход после Вх:
[g_ВхII3[i]; g_ВхI3[i]] := [g_ВхII1[i] - m2*g_утВхII; g_ВхI1[i] - 1*g_утВхI]
g_Вх3[i] := g_ВхI3[i] + g_ВхII3[i]
transpose(augment(g_ВхII3, g_ВхI3, g_Вх3)) = [
    600, 600, 600, 600, 600, 600, 600, 600, 600, 600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;
    100, 100, 100, 100, 100, 100, 100, 100, 100, 100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;
    700, 700, 700, 700, 700, 700, 700, 700, 700, 700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] %
# Относ. расход перед КНД:
[g_КНДII1[i]; g_КНДI1[i]] := [g_ВхII3[i]; g_ВхI3[i]]
g_КНД1[i] := g_КНДI1[i] + g_КНДII1[i]
transpose(augment(g_КНДII1, g_КНДI1, g_КНД1)) = [
    600, 600, 600, 600, 600, 600, 600, 600, 600, 600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;
    100, 100, 100, 100, 100, 100, 100, 100, 100, 100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;
    700, 700, 700, 700, 700, 700, 700, 700, 700, 700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] %
# Относ. расход после КНД:
[g_КНДII3[i]; g_КНДI3[i]] := [g_КНДII1[i] - m2*g_утКНДII; g_КНДI1[i] - 1*g_утКНДI]
g_КНД3[i] := g_КНДI3[i] + g_КНДII3[i]
transpose(augment(g_КНДII3, g_КНДI3, g_КНД3)) = [
    599.4, 599.4, 599.4, 599.4, 599.4, 599.4, 599.4, 599.4, 599.4, 599.4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;
    99.9, 99.9, 99.9, 99.9, 99.9, 99.9, 99.9, 99.9, 99.9, 99.9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;
    699.3, 699.3, 699.3, 699.3, 699.3, 699.3, 699.3, 699.3, 699.3, 699.3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] %
# Относ. расход перед КСД:
[g_КСДII1[i]; g_КСДI1[i]] := [g_КНДII3[i]; g_КНДI3[i] - g_охлТНД[i]]
g_КСД1[i] := g_КСДI1[i] + g_КСДII1[i]
transpose(augment(g_КСДII1, g_КСДI1, g_КСД1)) =  # no stored result
# Относ. расход после КСД:
[g_КСДII3[i]; g_КСДI3[i]] := [g_КСДII1[i] - m2*g_утКСДII; g_КСДI1[i] - 1*g_утКСДI]
g_КСД3[i] := g_КСДI3[i] + g_КСДII3[i]
transpose(augment(g_КСДII3, g_КСДI3, g_КСД3)) =  # no stored result
# Относ. расход перед КВД:
[g_КВДII1[i]; g_КВДI1[i]] := [g_КСДII3[i]; g_КСДI3[i] - g_охлТСД[i]]
g_КВД1[i] := g_КВДI1[i] + g_КВДII1[i]
transpose(augment(g_КВДII1, g_КВДI1, g_КВД1)) =  # no stored result
# Относ. расход после КВД:
[g_КВДII3[i]; g_КВДI3[i]] := [g_КВДII1[i] - m2*g_утКВДII; g_КВДI1[i] - 1*g_утКВДI]
g_КВД3[i] := g_КВДI3[i] + g_КВДII3[i]
transpose(augment(g_КВДII3, g_КВДI3, g_КВД3)) =  # no stored result
g_КС1[i] := g_КВДI3[i] - g_охлТВД[i] - g_утКВДI
# Относ. расход КC:
g_КС3[i] := g_КС1[i] - g_утКСI + g_гор[i]
transpose(augment(g_КС1, g_КС3)) =  # no stored result
g_ТВД1[i] := g_КС3[i]
# Относ. расход ТВД:
g_ТВД3[i] := g_ТВД1[i] + g_охлТВД[i] - g_утТВД
transpose(augment(g_ТВД1, g_ТВД3)) =  # no stored result
# Относ. расход ТСД:
g_ТСД1[i] := g_ТВД3[i]
g_ТСД3[i] := g_ТСД1[i] + g_охлТСД[i] - g_утТСД
transpose(augment(g_ТСД1, g_ТСД3)) =  # no stored result
g_ТНД1[i] := g_ТСД3[i]
# Относ. расход ТНД:
g_ТНД3[i] := g_ТНД1[i] + g_охлТНД[i] - g_утТНД
transpose(augment(g_ТНД1, g_ТНД3)) =  # no stored result
g_СТ1[i] := g_ТНД3[i]
# Относ. расход СТ:
g_СТ3[i] := g_СТ1[i] - g_утСТ
transpose(augment(g_СТ1, g_СТ3)) =  # no stored result
[g_СМII1[i]; g_СМI1[i]] := [g_КВДII3[i]; g_СТ3[i]]
# Относ. расход СМ:
g_СМ3[i] := (g_СМI1[i] + g_СМII1[i]) - g_утСМ
transpose(augment(g_СМI1, g_СМII1, g_СМ3)) =  # no stored result
# Относ. расход С I контура:
g_СI1[i] :=
    g_СТ3[i]
    0 if СМ == 1
g_СI3[i] := g_СI1[i]
transpose(augment(g_СI1, g_СI3)) =  # no stored result
# Относ. расход С II контура:
g_СII1[i] :=
    0 if СII == 0
    otherwise
        g_КВДII3[i]
        g_СМ3[i] if СМ == 1
g_СII3[i] := g_СII1[i]
transpose(augment(g_СII1, g_СII3)) =  # no stored result
# [area: Расчет горячей группы]
[
    T*_ТВД1, P*_ТВД1, R_ТВД1, α_ТВД1, k_ТВД1, Cp_ТВД1, L_ТВД, iteration_ТВД;
    T*_ТВД3, P*_ТВД3, R_ТВД3, α_ТВД3, k_ТВД3, Cp_ТВД3, π*_ТВД, iteration_ТВД;
    T*_ТСД1, P*_ТСД1, R_ТСД1, α_ТСД1, k_ТСД1, Cp_ТСД1, L_ТСД, iteration_ТСД;
    T*_ТСД3, P*_ТСД3, R_ТСД3, α_ТСД3, k_ТСД3, Cp_ТСД3, π*_ТСД, iteration_ТСД;
    T*_ТНД1, P*_ТНД1, R_ТНД1, α_ТНД1, k_ТНД1, Cp_ТНД1, L_ТНД, iteration_ТНД;
    T*_ТНД3, P*_ТНД3, R_ТНД3, α_ТНД3, k_ТНД3, Cp_ТНД3, π*_ТНД, iteration_ТНД;
    T*_СТ1, P*_СТ1, R_СТ1, α_СТ1, k_СТ1, Cp_СТ1, L_СТ, iteration_СТ;
    T*_СТ3, P*_СТ3, R_СТ3, α_СТ3, k_СТ3, Cp_СТ3, π*_СТ, iteration_СТ;
    T*_СМI1, P*_СМI1, R_СМI1, α_СМI1, None, Cp_СМI1, None, None;
    T*_СМII1, P*_СМII1, R_СМII1, α_СМII1, None, Cp_СМII1, None, None;
    T*_СМ3, P*_СМ3, None, α_СМ3, None, None, None, None;
    T*_СI1, P*_СI1, R_СI1, α_СI1, k_СI1, Cp_СI1, π*_кр.СI, c_СI3;
    T*_СI3, P*_СI3, R_СI3, α_СI3, k_СI3, Cp_СI3, π*_СI, T_СI3;
    T*_СII1, P*_СII1, R_СII1, α_СII1, k_СII1, Cp_СII1, π*_кр.СII, c_СII3;
    T*_СII3, P*_СII3, R_СII3, α_СII3, k_СII3, Cp_СII3, π*_СII, T_СII3;
    G_I, R_удI, None, c_СI3full, None, None, None, iteration_G;
    G_II, R_удII, None, c_СII3full, None, None, None, iteration_G;
    G_Σ, R_удΣ, None, None, None, None, None, iteration_G
] :=
    None ← -1
    for i ∈ 1 .. N_dis
        trace(concat("i = ", num2str(i)))
        G_I[i] ← ∞
        iteration_G[i] ← 0
        while 1 > 0
            iteration_G[i] ← iteration_G[i] + 1
            trace(concat("    iteration G = ", num2str(iteration_G[i])))
            trace("    ТВД")
            T*_ТВД1[i] ← T*_КС3[i]
            P*_ТВД1[i] ← P*_КС3[i]*σ_КС->ТВД
            L_ТВД[i] ← (L_КВД[i]*g_КВД1[i]/η_РВВД + N_НВД/(G_I[i]*η_РНВД))/(η_мех*(g_ТВД1[i] + χ*g_охлТВД[i]))
            α_ТВД1[i] ← α_смешение(g_ТВД1[i] - g_гор[i], 0, g_гор[i], Fuel)
            R_ТВД1[i] ← R_газ(α_ТВД1[i], Fuel)
            Cp_ТВД1[i] ← Cp_газ(P*_ТВД1[i], T*_ТВД1[i], α_ТВД1[i], Fuel)
            k_ТВД1[i] ← k_ад(Cp_ТВД1[i], R_ТВД1[i])
            [T*_охлТВД[i]; P*_охлТВД[i]] ← [T*_КВДI3[i] + ΔT_охлКС; P*_КВДI3[i]*σ_охл]
            [iteration_ТВД[i]; α_ТВД3[i]; R_ТВД3[i]; T*_ТВД3[i]; P*_ТВД3[i]; Cp_ТВД3[i]; k_ТВД3[i]; π*_ТВД[i]] ← TURBINE3(η*_ТВД, L_ТВД[i], α_ТВД1[i], k_ТВД1[i], g_ТВД1[i], P*_ТВД1[i], T*_ТВД1[i], χ, g_охлТВД[i], P*_охлТВД[i], T*_охлТВД[i], g_гор[i])
            trace("    ТСД")
            T*_ТСД1[i] ← T*_ТВД3[i]
            P*_ТСД1[i] ← P*_ТВД3[i]*σ_ТВД->ТСД
            L_ТСД[i] ← (L_КСД[i]*g_КСД1[i]/η_РВСД + N_НСД/(G_I[i]*η_РНСД))/(η_мех*(g_ТСД1[i] + χ*g_охлТСД[i]))
            α_ТСД1[i] ← α_смешение(g_ТСД1[i] - g_гор[i], 0, g_гор[i], Fuel)
            R_ТСД1[i] ← R_газ(α_ТСД1[i], Fuel)
            Cp_ТСД1[i] ← Cp_газ(P*_ТСД1[i], T*_ТСД1[i], α_ТСД1[i], Fuel)
            k_ТСД1[i] ← k_ад(Cp_ТСД1[i], R_ТСД1[i])
            [T*_охлТСД[i]; P*_охлТСД[i]] ← [T*_КСДI3[i] + ΔT_охлКС; P*_КСДI3[i]*σ_охл]
            [iteration_ТСД[i]; α_ТСД3[i]; R_ТСД3[i]; T*_ТСД3[i]; P*_ТСД3[i]; Cp_ТСД3[i]; k_ТСД3[i]; π*_ТСД[i]] ← TURBINE3(η*_ТСД, L_ТСД[i], α_ТСД1[i], k_ТСД1[i], g_ТСД1[i], P*_ТСД1[i], T*_ТСД1[i], χ, g_охлТСД[i], P*_охлТСД[i], T*_охлТСД[i], g_гор[i])
            trace("    ТНД")
            T*_ТНД1[i] ← T*_ТСД3[i]
            P*_ТНД1[i] ← P*_ТСД3[i]*σ_ТСД->ТНД
            L_ТНД[i] ← (L_КНД[i]*g_КНД1[i]/η_РВНД + N_ННД/(G_I[i]*η_РННД))/(η_мех*(g_ТНД1[i] + χ*g_охлТНД[i]))
            α_ТНД1[i] ← α_смешение(g_ТНД1[i] - g_гор[i], 0, g_гор[i], Fuel)
            R_ТНД1[i] ← R_газ(α_ТНД1[i], Fuel)
            Cp_ТНД1[i] ← Cp_газ(P*_ТНД1[i], T*_ТНД1[i], α_ТНД1[i], Fuel)
            k_ТНД1[i] ← k_ад(Cp_ТНД1[i], R_ТНД1[i])
            [T*_охлТНД[i]; P*_охлТНД[i]] ← [T*_КНДI3[i] + ΔT_охлКС; P*_КНДI3[i]*σ_охл]
            [iteration_ТНД[i]; α_ТНД3[i]; R_ТНД3[i]; T*_ТНД3[i]; P*_ТНД3[i]; Cp_ТНД3[i]; k_ТНД3[i]; π*_ТНД[i]] ← TURBINE3(η*_ТНД, L_ТНД[i], α_ТНД1[i], k_ТНД1[i], g_ТНД1[i], P*_ТНД1[i], T*_ТНД1[i], χ, g_охлТНД[i], P*_охлТНД[i], T*_охлТНД[i], g_гор[i])
            trace("    СТ")
            T*_СТ1[i] ← T*_ТНД3[i]
            P*_СТ1[i] ← P*_ТНД3[i]*σ_ТНД->СТ
            P*_СТ3[i] ←
                P*_н/(σ_СТ->*σ_вых) if СТ == 1
                P*_СТ1[i] otherwise
            π*_СТ[i] ← P*_СТ1[i]/P*_СТ3[i]
            [α_СТ1[i]; α_СТ3[i]] ← [α_ТНД3[i]; α_ТНД3[i]]
            [R_СТ1[i]; R_СТ3[i]] ← [R_газ(α_СТ1[i], Fuel); R_газ(α_СТ3[i], Fuel)]
            Cp_СТ1[i] ← Cp_газ(P*_СТ1[i], T*_СТ1[i], α_СТ1[i], Fuel)
            k_СТ1[i] ← k_ад(Cp_СТ1[i], R_СТ1[i])
            [iteration_СТ[i]; T*_СТ3[i]; P*_СТ3[i]; Cp_СТ3[i]; k_СТ3[i]] ← POWERTURBINE3(π*_СТ[i], η*_СТ, k_СТ1[i], P*_СТ1[i], T*_СТ1[i], α_СТ3[i])
            L_СТ[i] ← Cp_газ.ср(P*_СТ3[i], P*_СТ1[i], T*_СТ3[i], T*_СТ1[i], α_СТ3[i], α_СТ1[i], Fuel)*(T*_СТ1[i] - T*_СТ3[i])
            trace("    СМ")
            [T*_СМI1[i]; T*_СМII1[i]] ← [T*_СТ3[i]; T*_КВДII3[i]]
            [P*_СМI1[i]; P*_СМII1[i]] ← σ_СТ->*[P*_СТ3[i]; P*_КВДII3[i]]
            [α_СМI1[i]; α_СМII1[i]] ← [α_СТ3[i]; ∞]
            [R_СМI1[i]; R_СМII1[i]] ← [R_газ(α_СМI1[i], Fuel); R_газ(α_СМII1[i], Fuel)]
            [Cp_СМI1[i]; Cp_СМII1[i]] ← [Cp_СТ3[i]; Cp_КВДII3[i]]
            α_СМ3[i] ← α_смешение(g_СМI1[i] - g_гор[i], g_СМII1[i], g_гор[i], Fuel)
            T*_СМ3[i] ←
                T_смешение(P*_СМI1[i], T*_СМI1[i], g_СМI1[i], α_СМI1[i], P*_СМII1[i], T*_СМII1[i], g_СМII1[i], α_СМ3[i], Fuel) if СМ == 1
                T*_СМI1[i] otherwise
            P*_СМ3[i] ← σ_СМ*{
                P_смешение(P*_СМI1[i], g_СМI1[i], P*_СМII1[i], g_СМII1[i]) if СМ == 1
                P*_СМI1[i] otherwise
            }
            trace("    СI")
            [T*_СI1[i]; T*_СI3[i]] ← [T*_СТ3[i]; T*_СТ3[i]]
            P*_СI1[i] ← P*_СТ3[i]*σ_СТ->
            P*_СI3[i] ←
                P*_н/σ_вых if СМ == 0
                P*_СI1[i] otherwise
            [α_СI1[i]; α_СI3[i]] ← [α_СТ3[i]; α_СТ3[i]]
            [R_СI1[i]; R_СI3[i]] ← [R_газ(α_СI1[i], Fuel); R_газ(α_СI3[i], Fuel)]
            [Cp_СI1[i]; Cp_СI[i]; Cp_СI3[i]] ← [
                Cp_газ(P*_СI1[i], T*_СI1[i], α_СI1[i], Fuel);
                Cp_газ.ср(P*_СI1[i], P*_СI3[i], T*_СI1[i], T*_СI3[i], α_СI1[i], α_СI3[i], Fuel);
                Cp_газ(P*_СI3[i], T*_СI3[i], α_СI3[i], Fuel)
            ]
            [k_СI1[i]; k_СI[i]; k_СI3[i]] ← [
                k_ад(Cp_СI1[i], R_СI1[i]);
                k_ад(Cp_СI[i], R_газ.ср(α_СI1[i], α_СI3[i], Fuel));
                k_ад(Cp_СI3[i], R_СI3[i])
            ]
            [π*_кр.СI[i]; π*_СI[i]] ← [((k_СI[i] + 1)/2)^(k_СI[i]/(k_СI[i] - 1)); P*_СI1[i]/P*_СI3[i]]
            c_СI3full[i] ← φ_СI*sqrt(2*Cp_СI[i]*T*_СI3[i])*sqrt(1 - π*_СI[i]^((1 - k_СI[i])/k_СI[i]))
            c_СI3full[i] ←
                c_СI3full[i] if Im(c_СI3full[i]) == 0
                NaN otherwise
            c_СI3[i] ← φ_СI*{
                sqrt(2*Cp_СI[i]*T*_СI3[i])*sqrt(1 - π*_СI[i]^((1 - k_СI[i])/k_СI[i])) if СI == "Лаваль"
                otherwise
                    sqrt(2*Cp_СI[i]*T*_СI3[i])*sqrt(1 - π*_СI[i]^((1 - k_СI[i])/k_СI[i])) if π*_СI[i] ≤ π*_кр.СI[i]
                    sqrt(2*k_СI3[i]/(k_СI3[i] + 1)*R_СI3[i]*T*_СI3[i]) otherwise
            }
            c_СI3[i] ←
                c_СI3[i] if Im(c_СI3[i]) == 0
                NaN otherwise
            T_СI3[i] ← T*_СI3[i] - c_СI3[i]^2/(2*Cp_СI3[i])
            R_удI[i] ← c_СI3[i]*g_СI3[i] - {
                υ*1 if СI == "Лаваль"
                otherwise
                    υ*1 if π*_СI[i] ≤ π*_кр.СI[i]
                    υ*1 - R_СI3[i]*T_СI3[i]/c_СI3[i]*(1 - P*_н*π*_кр.СI[i]/P*_СI1[i])*g_СI3[i] otherwise
            }
            trace("    СII")
            T*_СII1[i] ←
                T*_н if СII == 0
                otherwise
                    T*_КВДII3[i] if СМ == 0
                    T*_СМ3[i] otherwise
            T*_СII3[i] ← T*_СII1[i]
            P*_СII1[i] ←
                P*_н if СII == 0
                otherwise
                    P*_КВДII3[i]*σ_КВДII-> if СМ == 0
                    P*_СМ3[i] otherwise
            P*_СII3[i] ←
                P*_СII1[i] if СII == 0
                P*_н/σ_вых otherwise
            α_СII1[i] ←
                NaN if СII == 0
                otherwise
                    NaN if СМ == 0
                    α_СМ3[i] otherwise
            α_СII3[i] ← α_СII1[i]
            R_СII1[i] ←
                R_в if СII == 0
                otherwise
                    R_в if СМ == 0
                    R_газ(α_СМ3[i], Fuel) otherwise
            R_СII3[i] ← R_СII1[i]
            [Cp_СII1[i]; Cp_СII[i]; Cp_СII3[i]] ←
                if СМ == 0
                    [
                        Cp_воздух(P*_СII1[i], T*_СII1[i]);
                        Cp_воздух.ср(P*_СII1[i], P*_СII3[i], T*_СII1[i], T*_СII3[i]);
                        Cp_воздух(P*_СII3[i], T*_СII3[i])
                    ]
                otherwise
                    [
                        Cp_газ(P*_СII1[i], T*_СII1[i], α_СII1[i], Fuel);
                        Cp_газ.ср(P*_СII1[i], P*_СII3[i], T*_СII1[i], T*_СII3[i], α_СII1[i], α_СII3[i], Fuel);
                        Cp_газ(P*_СII3[i], T*_СII3[i], α_СII3[i], Fuel)
                    ]
            [k_СII1[i]; k_СII[i]; k_СII3[i]] ←
                [k_ад(Cp_СII1[i], R_в); k_ад(Cp_СII[i], R_в); k_ад(Cp_СII3[i], R_в)] if СМ == 0
                otherwise
                    [
                        k_ад(Cp_СII1[i], R_СII1[i]);
                        k_ад(Cp_СII[i], R_газ.ср(α_СII1[i], α_СII3[i], Fuel));
                        k_ад(Cp_СII3[i], R_СII3[i])
                    ]
            [π*_кр.СII[i]; π*_СII[i]] ← [((k_СII[i] + 1)/2)^(k_СII[i]/(k_СII[i] - 1)); P*_СII1[i]/P*_СII3[i]]
            c_СII3full[i] ← φ_СII*sqrt(2*Cp_СII[i]*T*_СII3[i])*sqrt(1 - π*_СII[i]^((1 - k_СII[i])/k_СII[i]))
            c_СII3full[i] ←
                c_СII3full[i] if Im(c_СII3full[i]) == 0
                NaN otherwise
            c_СII3[i] ← φ_СII*{
                sqrt(2*Cp_СII[i]*T*_СII3[i])*sqrt(1 - π*_СII[i]^((1 - k_СII[i])/k_СII[i])) if СII == "Лаваль"
                otherwise
                    sqrt(2*Cp_СII[i]*T*_СII3[i])*sqrt(1 - π*_СII[i]^((1 - k_СII[i])/k_СII[i])) if π*_СII[i] ≤ π*_кр.СII[i]
                    sqrt(2*k_СII3[i]/(k_СII3[i] + 1)*R_СII3[i]*T*_СII3[i]) otherwise
            }
            c_СII3[i] ←
                c_СII3[i] if Im(c_СII3[i]) == 0
                NaN otherwise
            T_СII3[i] ← T*_СII3[i] - c_СII3[i]^2/(2*Cp_СII3[i])
            R_удII[i] ← c_СII3[i]*g_СII3[i] - {
                υ*m2 if СII == "Лаваль"
                otherwise
                    υ*m2 if π*_СII[i] ≤ π*_кр.СII[i]
                    υ*m2 - R_СII3[i]*T_СII3[i]/c_СII3[i]*(1 - P*_н*π*_кр.СII[i]/P*_СII1[i])*g_СII3[i] otherwise
            }
            R_удΣ[i] ← R_удI[i] + R_удII[i]
            GI ←
                R_υ/R_удΣ[i] if (R_υ > 0)
                (N_НВД/η_РНВД + N_НСД/η_РНСД + N_ННД/η_РННД + N_НСТ/η_РНСТ)/(((L_ТВД[i]*(g_ТВД1[i] + χ*g_охлТВД[i]) + L_ТСД[i]*(g_ТСД1[i] + χ*g_охлТСД[i]) + L_ТНД[i]*(g_ТНД1[i] + χ*g_охлТНД[i]) + L_СТ[i]*g_СТ1[i])*η_мех) - (L_КВД[i]*g_КВД1[i]/η_РВВД + L_КСД[i]*g_КСД1[i]/η_РВСД + L_КНД[i]*g_КНД1[i]/η_РВНД)) otherwise
            trace(concat("    GI = ", num2str(GI)))
            trace(concat("    eps = ", num2str(|eps("rel", G_I[i], GI)|)))
            if IsNaN(GI) or |eps("rel", G_I[i], GI)| ≤ epsilon
                G_I[i] ← GI
                break
            G_I[i] ← GI
        G_II[i] ← m2*G_I[i]
        G_Σ[i] ← G_I[i] + G_II[i]
    [
        T*_ТВД1, P*_ТВД1, R_ТВД1, α_ТВД1, k_ТВД1, Cp_ТВД1, L_ТВД, iteration_ТВД;
        T*_ТВД3, P*_ТВД3, R_ТВД3, α_ТВД3, k_ТВД3, Cp_ТВД3, π*_ТВД, iteration_ТВД;
        T*_ТСД1, P*_ТСД1, R_ТСД1, α_ТСД1, k_ТСД1, Cp_ТСД1, L_ТСД, iteration_ТСД;
        T*_ТСД3, P*_ТСД3, R_ТСД3, α_ТСД3, k_ТСД3, Cp_ТСД3, π*_ТСД, iteration_ТСД;
        T*_ТНД1, P*_ТНД1, R_ТНД1, α_ТНД1, k_ТНД1, Cp_ТНД1, L_ТНД, iteration_ТНД;
        T*_ТНД3, P*_ТНД3, R_ТНД3, α_ТНД3, k_ТНД3, Cp_ТНД3, π*_ТНД, iteration_ТНД;
        T*_СТ1, P*_СТ1, R_СТ1, α_СТ1, k_СТ1, Cp_СТ1, L_СТ, iteration_СТ;
        T*_СТ3, P*_СТ3, R_СТ3, α_СТ3, k_СТ3, Cp_СТ3, π*_СТ, iteration_СТ;
        T*_СМI1, P*_СМI1, R_СМI1, α_СМI1, None, Cp_СМI1, None, None;
        T*_СМII1, P*_СМII1, R_СМII1, α_СМII1, None, Cp_СМII1, None, None;
        T*_СМ3, P*_СМ3, None, α_СМ3, None, None, None, None;
        T*_СI1, P*_СI1, R_СI1, α_СI1, k_СI1, Cp_СI1, π*_кр.СI, c_СI3;
        T*_СI3, P*_СI3, R_СI3, α_СI3, k_СI3, Cp_СI3, π*_СI, T_СI3;
        T*_СII1, P*_СII1, R_СII1, α_СII1, k_СII1, Cp_СII1, π*_кр.СII, c_СII3;
        T*_СII3, P*_СII3, R_СII3, α_СII3, k_СII3, Cp_СII3, π*_СII, T_СII3;
        G_I, R_удI, None, c_СI3full, None, None, None, iteration_G;
        G_II, R_удII, None, c_СII3full, None, None, None, iteration_G;
        G_Σ, R_удΣ, None, None, None, None, None, iteration_G
    ]
transpose(iteration_G) =  # no stored result
# Относ. погрешность бланса мощностей []:
iter_eps[i] := |eps("rel", (N_НВД/η_РНВД + N_НСД/η_РНСД + N_ННД/η_РННД + N_НСТ/η_РНСТ) + G_I[i]*(L_КВД[i]*g_КВД1[i]/η_РВВД + L_КСД[i]*g_КСД1[i]/η_РВСД + L_КНД[i]*g_КНД1[i]/η_РВНД), G_I[i]*(L_ТВД[i]*(g_ТВД1[i] + χ*g_охлТВД[i]) + L_ТСД[i]*(g_ТСД1[i] + χ*g_охлТСД[i]) + L_ТНД[i]*(g_ТНД1[i] + χ*g_охлТНД[i]) + L_СТ[i]*g_СТ1[i])*η_мех)|
transpose(iter_eps) =  # no stored result
# [area: ТВД]
# Полная температура перед и после ТВД [К]:
transpose(augment(T*_ТВД1, T*_ТВД3)) =  # no stored result
# Полное давление перед и после ТВД [Па]:
transpose(augment(P*_ТВД1, P*_ТВД3)) = 10^3
# Коэф. избытка воздуха перед и после ТВД []:
transpose(augment(α_ТВД1, α_ТВД3)) =  # no stored result
# Газовая постоянная продуктов сгорания перед и после ТВД [Дж/кг/К]:
transpose(augment(R_ТВД1, R_ТВД3)) =  # no stored result
# Теплоемкость перед и после ТВД [Дж/кг/К]:
transpose(augment(Cp_ТВД1, Cp_ТВД3)) = 10^3
# Показатель адиабаты перед и после ТВД []:
transpose(augment(k_ТВД1, k_ТВД3)) =  # no stored result
# Удельная работа ТВД [Дж/кг]:
transpose(L_ТВД) = 10^3
# Степень понижения полного давления ТВД:
transpose(π*_ТВД) =  # no stored result
# Количество итераций:
transpose(iteration_ТВД) =  # no stored result
# Ср. теплоемкость ТВД [Дж/кг/К]:
Cp_ТВД[i] := Cp_газ.ср(P*_ТВД1[i], P*_ТВД3[i], T*_ТВД1[i], T*_ТВД3[i], α_ТВД1[i], α_ТВД3[i], Fuel)
transpose(Cp_ТВД) = 10^3
# Ср. показатель адиабаты ТВД:
k_ТВД[i] := k_ад(Cp_ТВД[i], R_газ.ср(α_ТВД1[i], α_ТВД3[i], Fuel))
transpose(k_ТВД) =  # no stored result
# [area: ТСД]
# Полная температура перед и после ТСД [К]:
transpose(augment(T*_ТСД1, T*_ТСД3)) =  # no stored result
# Полное давление перед и после ТСД [Па]:
transpose(augment(P*_ТСД1, P*_ТСД3)) = 10^3
# Коэф. избытка воздуха перед и после ТСД []:
transpose(augment(α_ТСД1, α_ТСД3)) =  # no stored result
# Газовая постоянная продуктов сгорания перед и после ТСД [Дж/кг/К]:
transpose(augment(R_ТСД1, R_ТСД3)) =  # no stored result
# Теплоемкость перед и после ТСД [Дж/кг/К]:
transpose(augment(Cp_ТСД1, Cp_ТСД3)) = 10^3
# Показатель адиабаты перед и после ТСД []:
transpose(augment(k_ТСД1, k_ТСД3)) =  # no stored result
# Удельная работа ТСД [Дж/кг]:
transpose(L_ТСД) = 10^3
# Степень понижения полного давления ТСД:
transpose(π*_ТСД) =  # no stored result
# Количество итераций:
transpose(iteration_ТСД) =  # no stored result
# Ср. теплоемкость ТСД [Дж/кг/К]:
Cp_ТСД[i] := Cp_газ.ср(P*_ТСД1[i], P*_ТСД3[i], T*_ТСД1[i], T*_ТСД3[i], α_ТСД1[i], α_ТСД3[i], Fuel)
transpose(Cp_ТСД) = 10^3
# Ср. показатель адиабаты ТСД:
k_ТСД[i] := k_ад(Cp_ТСД[i], R_газ.ср(α_ТСД1[i], α_ТСД3[i], Fuel))
transpose(k_ТСД) =  # no stored result
# [area: ТНД]
# Полная температура перед и после ТНД [К]:
transpose(augment(T*_ТНД1, T*_ТНД3)) =  # no stored result
# Полное давление перед и после ТНД [Па]:
transpose(augment(P*_ТНД1, P*_ТНД3)) = 10^3
# Коэф. избытка воздуха перед и после ТНД []:
transpose(augment(α_ТНД1, α_ТНД3)) =  # no stored result
# Газовая постоянная продуктов сгорания перед и после ТНД [Дж/кг/К]:
transpose(augment(R_ТНД1, R_ТНД3)) =  # no stored result
# Теплоемкость перед и после ТНД [Дж/кг/К]:
transpose(augment(Cp_ТНД1, Cp_ТНД3)) = 10^3
# Показатель адиабаты перед и после ТНД []:
transpose(augment(k_ТНД1, k_ТНД3)) =  # no stored result
# Удельная работа ТНД [Дж/кг]:
transpose(L_ТНД) = 10^3
# Степень понижения полного давления ТНД []:
transpose(π*_ТНД) =  # no stored result
# Количество итераций:
transpose(iteration_ТНД) =  # no stored result
# Ср. теплоемкость ТНД [Дж/кг/К]:
Cp_ТНД[i] := Cp_газ.ср(P*_ТНД1[i], P*_ТНД3[i], T*_ТНД1[i], T*_ТНД3[i], α_ТНД1[i], α_ТНД3[i], Fuel)
transpose(Cp_ТНД) = 10^3
# Ср. показатель адиабаты ТНД:
k_ТНД[i] := k_ад(Cp_ТНД[i], R_газ.ср(α_ТНД1[i], α_ТНД3[i], Fuel))
transpose(k_ТНД) =  # no stored result
# [area: СТ]
# Полная температура перед и после СТ [К]:
transpose(augment(T*_СТ1, T*_СТ3)) =  # no stored result
# Полное давление перед и после  СТ [Па]:
transpose(augment(P*_СТ1, P*_СТ1)) = 10^3
# Коэф. избытка воздуха перед и после СТ []:
transpose(augment(α_СТ1, α_СТ3)) =  # no stored result
# Теплоемкость перед и после СТ [Дж/кг/К]:
transpose(augment(Cp_СТ1, Cp_СТ3)) = 10^3
# Показатель адиабаты перед и после СТ []:
transpose(augment(k_СТ1, k_СТ3)) =  # no stored result
# Количество итераций:
transpose(iteration_СТ) =  # no stored result
# Удельная работа СТ [Дж/кг]:
transpose(L_СТ) = 10^3
# Степень понижения полного давления в СТ:
transpose(π*_СТ) =  # no stored result
# Ср. теплоемкость СТ [Дж/кг/К]:
Cp_СТ[i] := Cp_газ.ср(P*_СТ1[i], P*_СТ3[i], T*_СТ1[i], T*_СТ3[i], α_СТ1[i], α_СТ3[i], Fuel)
transpose(Cp_СТ) = 10^3
# Ср. показатель адиабаты СТ:
k_СТ[i] := k_ад(Cp_СТ[i], R_газ.ср(α_СТ1[i], α_СТ3[i], Fuel))
transpose(k_СТ) =  # no stored result
# Суммарная степень понижения полного давления в Т:
π*_ТΣ[i] := π*_ТВД[i]*π*_ТСД[i]*π*_ТНД[i]*π*_СТ[i]
transpose(π*_ТΣ) =  # no stored result
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# [area: СМ]
# Полная температура перед СМ [К]:
transpose(augment(T*_СМII1, T*_СМI1)) =  # no stored result
# Полная температура после СМ [К]:
transpose(T*_СМ3) =  # no stored result
# Полное давление перед СМ [Па]:
transpose(augment(P*_СМII1, P*_СМI1)) = 10^3
transpose(P*_СМII1)/transpose(P*_СМI1) =  # no stored result
# Полное давление после СМ [Па]:
transpose(P*_СМ3) = 10^3
# Теплоемкость перед СМ [Дж/кг/К]:
transpose(augment(Cp_СМII1, Cp_СМI1)) = 10^3
# Коэф. избытка воздуха:
transpose(α_СМ3) =  # no stored result
# [area: СI]
# Полная температура после С I контура [К]:
transpose(augment(T*_СI1, T*_СI3)) =  # no stored result
# Полное давление после С I контура [Па]:
transpose(augment(P*_СI1, P*_СI3)) = 10^3
# Коэф. избытка воздуха перед и после СI []:
transpose(augment(α_СI1, α_СI3)) =  # no stored result
# Газовая постоянная продуктов сгорания перед и после СI [Дж/кг/К]:
transpose(augment(R_СI1, R_СI3)) =  # no stored result
# Ср. теплоемкость С I контура [Дж/кг/К]:
Cp_СI[i] := Cp_газ.ср(P*_СI1[i], P*_СI3[i], T*_СI1[i], T*_СI3[i], α_СI1[i], α_СI3[i], Fuel)
# Теплоемкость С I контура [Дж/кг/К]:
transpose(augment(Cp_СI1, Cp_СI, Cp_СI3)) = 10^3
# Ср. показатель адиабаты С I контура []:
k_СI[i] := k_ад(Cp_СI[i], R_газ.ср(α_СI1[i], α_СI3[i], Fuel))
# Показатель адиабаты С I контура []:
transpose(augment(k_СI1, k_СI, k_СI3)) =  # no stored result
# Критическая степень понижения полного давления С I контура:
# Степень понижения полного давления С I контура:
transpose(π*_СI) > 1 =  # no stored result
transpose(augment(π*_кр.СI, π*_СI)) =  # no stored result
transpose(π*_СI) ≤ transpose(π*_кр.СI) =  # no stored result
# Скорость истечения после С I контура:
transpose(c_СI3) =  # no stored result
# Статическая температура после С I контура [К]:
transpose(T_СI3) =  # no stored result
# Удельная реактивная тяга I контура, отнесенная к массовому расходу на входе в I конутр []:
transpose(R_удI) =  # no stored result
# [area: СII]
# Полная температура после С II контура [К]:
transpose(augment(T*_СII1, T*_СII3)) =  # no stored result
# Полное давление после С II контура [Па]:
transpose(augment(P*_СII1, P*_СII3)) = 10^3
# Коэф. избытка воздуха перед и после СII []:
transpose(augment(α_СII1, α_СII3)) =  # no stored result
# Газовая постоянная продуктов сгорания перед и после СII [Дж/кг/К]:
transpose(augment(R_СII1, R_СII3)) =  # no stored result
# Ср. теплоемкость С II контура [Дж/кг/К]:
Cp_СII[i] :=
    Cp_воздух.ср(P*_СII1[i], P*_СII3[i], T*_СII1[i], T*_СII3[i]) if СМ == 0
    Cp_газ.ср(P*_СII1[i], P*_СII3[i], T*_СII1[i], T*_СII3[i], α_СII1[i], α_СII3[i], Fuel) otherwise
# Теплоемкость С II контура [Дж/кг/К]:
transpose(augment(Cp_СII1, Cp_СII, Cp_СII3)) = 10^3
# Ср. показатель адиабаты С II контура []:
k_СII[i] :=
    k_ад(Cp_СII[i], R_в) if СМ == 0
    k_ад(Cp_СII[i], R_газ.ср(α_СII1[i], α_СII3[i], Fuel)) otherwise
# Показатель адиабаты С II контура []:
transpose(augment(k_СII1, k_СII, k_СII3)) =  # no stored result
# Критическая степень понижения полного давления С II контура:
# Степень понижения полного давления С II контура:
transpose(π*_СII) > 1 =  # no stored result
transpose(augment(π*_кр.СII, π*_СII)) =  # no stored result
transpose(π*_СII) ≤ transpose(π*_кр.СII) =  # no stored result
# Скорость истечения после С II контура [м/с]:
transpose(c_СII3) =  # no stored result
# Статическая температура после С II контура [К]:
transpose(T_СII3) =  # no stored result
# Удельная реактивная тяга II контура, отнесенная к массовому расходу на входе в I конутр []:
transpose(R_удII) =  # no stored result
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# [area: Удельная реактивная тяга, отнесенная к массовому расходу на входе в I контур]
# Удельные силы тяги, отнесенные к массовому расходу на входе в I контур:
transpose(augment(R_удI, R_удII, R_удΣ)) =  # no stored result
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# [area: Массовые расходы]
# Массовые расходы [кг/с]:
transpose(augment(G_I, G_II, G_Σ)) =  # no stored result
# Массовый расход входа [кг/с]:
[G_вхII1[i], G_вхII3[i]; G_вхI1[i], G_вхI3[i]; G_вх1[i], G_вх3[i]] := G_I[i]*[g_ВхII1[i], g_ВхII3[i]; g_ВхI1[i], g_ВхI3[i]; g_Вх1[i], g_Вх3[i]]
transpose(augment(G_вхII1, G_вхI1, G_вх1)) =  # no stored result
transpose(augment(G_вхII3, G_вхI3, G_вх3)) =  # no stored result
# Массовый расход КНД [кг/с]:
[G_КНДII1[i], G_КНДII3[i]; G_КНДI1[i], G_КНДI3[i]; G_КНД1[i], G_КНД3[i]] := G_I[i]*[g_КНДII1[i], g_КНДII3[i]; g_КНДI1[i], g_КНДI3[i]; g_КНД1[i], g_КНД3[i]]
transpose(augment(G_КНДII1, G_КНДI1, G_КНД1)) =  # no stored result
transpose(augment(G_КНДII3, G_КНДI3, G_КНД3)) =  # no stored result
# Массовый расход КСД [кг/с]:
[G_КСДII1[i], G_КСДII3[i]; G_КСДI1[i], G_КСДI3[i]; G_КСД1[i], G_КСД3[i]] := G_I[i]*[g_КСДII1[i], g_КСДII3[i]; g_КСДI1[i], g_КСДI3[i]; g_КСД1[i], g_КСД3[i]]
transpose(augment(G_КСДII1, G_КСДI1, G_КСД1)) =  # no stored result
transpose(augment(G_КСДII3, G_КСДI3, G_КСД3)) =  # no stored result
# Массовый расход КВД [кг/с]:
[G_КВДII1[i], G_КВДII3[i]; G_КВДI1[i], G_КВДI3[i]; G_КВД1[i], G_КВД3[i]] := G_I[i]*[g_КВДII1[i], g_КВДII3[i]; g_КВДI1[i], g_КВДI3[i]; g_КВД1[i], g_КВД3[i]]
transpose(augment(G_КВДII1, G_КВДI1, G_КВД1)) =  # no stored result
transpose(augment(G_КВДII3, G_КВДI3, G_КВД3)) =  # no stored result
# Массовый расход КС [кг/с]:
[G_КС1[i]; G_КС3[i]] := G_I[i]*[g_КС1[i]; g_КС3[i]]
transpose(augment(G_КС1, G_КС3)) =  # no stored result
# Массовый расход горючего [кг/с]:
G_гор[i] := G_I[i]*g_гор[i]
transpose(G_гор) = 10^-3
# Массовый расход ТВД [кг/с]:
[G_ТВД1[i]; G_ТВД3[i]] := G_I[i]*[g_ТВД1[i]; g_ТВД3[i]]
transpose(augment(G_ТВД1, G_ТВД3)) =  # no stored result
# Массовый расход ТСД [кг/с]:
[G_ТСД1[i]; G_ТСД3[i]] := G_I[i]*[g_ТСД1[i]; g_ТСД3[i]]
transpose(augment(G_ТСД1, G_ТСД3)) =  # no stored result
# Массовый расход ТНД [кг/с]:
[G_ТНД1[i]; G_ТНД3[i]] := G_I[i]*[g_ТНД1[i]; g_ТНД3[i]]
transpose(augment(G_ТНД1, G_ТНД3)) =  # no stored result
# Массовый расход СТ [кг/с]:
[G_СТ1[i]; G_СТ3[i]] := G_I[i]*[g_СТ1[i]; g_СТ3[i]]
transpose(augment(G_СТ1, G_СТ3)) =  # no stored result
# Массовый расход СМ [кг/с]:
[G_СМI1[i]; G_СМII1[i]; G_СМ3[i]] := G_I[i]*[g_СМI1[i]; g_СМII1[i]; g_СМ3[i]]
transpose(augment(G_СМI1, G_СМII1, G_СМ3)) =  # no stored result
# Массовый расход С I контура [кг/с]:
[G_СI1[i]; G_СI3[i]] := G_I[i]*[g_СI1[i]; g_СI3[i]]
transpose(augment(G_СI1, G_СI3)) =  # no stored result
# Массовый расход С II контура [кг/с]:
[G_СII1[i]; G_СII3[i]] := G_I[i]*[g_СII1[i]; g_СII3[i]]
transpose(augment(G_СII1, G_СII3)) =  # no stored result
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# Массовый расход утечек на входе II контура [кг/с]:
# Массовый расход утечек на входе I контура [кг/с]:
[G_утВхII[i]; G_утВхI[i]] := [G_II[i]*g_утВхII; G_I[i]*g_утВхI]
transpose(augment(G_утВхII, G_утВхI)) = 10^-3
# Массовый расход утечек КНД II контура [кг/с]:
# Массовый расход утечек КНД I контура [кг/с]:
[G_утКНДII[i]; G_утКНДI[i]] := [G_II[i]*g_утКНДII; G_I[i]*g_утКНДI]
transpose(augment(G_утКНДII, G_утКНДI)) = 10^-3
# Массовый расход утечек КСД II контура [кг/с]:
# Массовый расход утечек КСД I контура [кг/с]:
[G_утКСДII[i]; G_утКСДI[i]] := [G_II[i]*g_утКСДII; G_I[i]*g_утКСДI]
transpose(augment(G_утКСДII, G_утКСДI)) = 10^-3
# Массовый расход утечек КВД II контура [кг/с]:
# Массовый расход утечек КВД I контура [кг/с]:
[G_утКВДII[i]; G_утКВДI[i]] := [G_II[i]*g_утКВДII; G_I[i]*g_утКВДI]
transpose(augment(G_утКВДII, G_утКВДI)) = 10^-3
# Массовый расход утечек КС [кг/с]:
G_утКС[i] := G_I[i]*g_утКСI
transpose(G_утКС) = 10^-3
# Массовый расход утечек ТВД [кг/с]:
G_утТВД[i] := G_I[i]*g_утТВД
transpose(G_утТВД) = 10^-3
# Массовый расход утечек ТСД [кг/с]:
G_утТСД[i] := G_I[i]*g_утТСД
transpose(G_утТСД) = 10^-3
# Массовый расход утечек ТНД [кг/с]:
G_утТНД[i] := G_I[i]*g_утТНД
transpose(G_утТНД) = 10^-3
# Массовый расход утечек СТ [кг/с]:
G_утСТ[i] := G_I[i]*g_утСТ
transpose(G_утСТ) = 10^-3
# Массовый расход утечек СМ [кг/с]:
G_утСМ[i] := G_I[i]*g_утСМ
transpose(G_утСМ) = 10^-3
# Массовый расход утечек С I контура [кг/с]:
G_утСI[i] := G_I[i]*g_утСI
transpose(G_утСI) = 10^-3
# Массовый расход утечек С II контура [кг/с]:
G_утСII[i] := G_II[i]*g_утСII
transpose(G_утСII) = 10^-3
# Массовый расход охл ТВД [кг/с]:
G_охлТВД[i] := G_I[i]*g_охлТВД[i]
transpose(G_охлТВД) = 10^-3
# Массовый расход охл ТСД [кг/с]:
G_охлТСД[i] := G_I[i]*g_охлТСД[i]
transpose(G_охлТСД) = 10^-3
# Массовый расход охл ТНД [кг/с]:
G_охлТНД[i] := G_I[i]*g_охлТНД[i]
transpose(G_охлТНД) = 10^-3
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# [area: Мощность]
# Мощность КНД [Вт]:
N_КНД[i] := G_КНД1[i]*L_КНД[i]
transpose(N_КНД) = 10^6
# Мощность КСД [Вт]:
N_КСД[i] := G_КСД1[i]*L_КСД[i]
transpose(N_КСД) = 10^6
# Мощность КВД [Вт]:
N_КВД[i] := G_КВД1[i]*L_КВД[i]
transpose(N_КВД) = 10^6
# Мощность ТВД [Вт]:
N_ТВД[i] := (G_ТВД1[i] + χ*G_охлТВД[i])*L_ТВД[i]
transpose(N_ТВД) = 10^6
# Мощность ТСД [Вт]:
N_ТСД[i] := (G_ТСД1[i] + χ*G_охлТСД[i])*L_ТСД[i]
transpose(N_ТСД) = 10^6
# Мощность ТНД [Вт]:
N_ТНД[i] := (G_ТНД1[i] + χ*G_охлТНД[i])*L_ТНД[i]
transpose(N_ТНД) = 10^6
# Мощность СТ [Вт]:
N_СТ[i] := G_СТ1[i]*L_СТ[i]
transpose(N_СТ) = 10^6
# Мощность цикла [Вт]:
N_e[i] := ((N_ТВД[i] + N_ТСД[i] + N_ТНД[i] + N_СТ[i])*η_мех - (N_КНД[i]/η_РВНД + N_КСД[i]/η_РВСД + N_КВД[i]/η_РВВД)) + ((G_СI3[i]*c_СI3full[i]^2 - G_I[i]*υ^2)/2 + (G_СII3[i]*c_СII3full[i]^2 - G_II[i]*υ^2)/2)
transpose(N_e) = 10^6
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# [area: Удельный расход горючего и КПД]
# Удельный расход горючего (кг/Вт/с):
C_e[i] := G_гор[i]/N_e[i]
transpose(C_e) = 10^-3/3600
# Удельный расход горючего (кг/Н/с):
C_R[i] :=
    G_гор[i]/R_υ if R_υ ≠ 0
    0 otherwise
transpose(C_R) = 10^-3/3600
transpose(C_R) = 10^-1/3600
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# Действительная работа цикла [Дж/кг]:
Le[i] := (g_СI3[i]*c_СI3[i]^2 + g_СII3[i]*c_СII3[i]^2 - (1 + m2)*υ^2)/2
transpose(Le) = 10^3
# Показатель адиабаты сжатия []:
k_КIΣ[i] := k_ад(Cp_воздух.ср(P*_н, P*_КВДI3[i], T*_н, T*_КВДI3[i]), R_в)
transpose(k_КIΣ) =  # no stored result
# Термический КПД цикла []:
η*_t[i] := 1 - (P*_КВДI3[i]/P*_н)^((1 - k_КIΣ[i])/k_КIΣ[i])
transpose(η*_t) =  # no stored result
# КПД цикла []:
η*_e[i] := 1/(C_e[i]*Q_нр(Fuel)*η_г)
transpose(η*_e) =  # no stored result
# Полетный КПД []:
η*_R[i] := R_υ*υ/N_e[i]
transpose(η*_R) =  # no stored result
# Общий КПД []:
η*_0[i] := η*_e[i]*η*_R[i]
transpose(η*_0) =  # no stored result
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# [area: Сопротивление]
F_вх[i] :=
    G_Σ[i]/(ρ*_вх*υ) if υ ≠ 0
    NaN otherwise
transpose(F_вх) =  # no stored result
D_вх[i] := sqrt(4*F_вх[i]/π)
transpose(D_вх) =  # no stored result
Cx1(m2) := 2.0005/10^2*m2^0 - 0.1879/10^3*m2^1 + 2.8571/10^5*m2^2 - 3.4667/10^7*m2^3
Cx2(m2) := 3.5606/10^2*m2^0 - 1.2744/10^3*m2^1 + 3.3429/10^5*m2^2 - 3.6667/10^7*m2^3
Cx(m2) := Cx1(m2) + Cx2(m2)
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# Сопротивление газогенератора:
# Сопротивление обечайки ГТД:
[Cx1(m2); Cx2(m2)] = [0.0198313; 0.0290838]
Cx := Cx(m2) = 0.0489151
# [area: Вывод результатов расчета цикла]
ПОЧТА :=
    for i ∈ 1 .. N_dis
        j ← 1
        [what[j], СИ[j], ПОЧТА[i, j]] ← ["H.υ", "км", round(H_υ*10^-3, 2)]
        j ← j + 1
        [what[j], СИ[j], ПОЧТА[i, j]] ← ["M.υ", "-", round(M_υ, 4)]
        j ← j + 1
        [what[j], СИ[j], ПОЧТА[i, j]] ← ["R.υ", "кН", round(R_υ*10^-3, 2)]
        j ← j + 1
        [what[j], СИ[j], ПОЧТА[i, j]] ← ["T.Л.доп", "К", round(T_Л.доп)]
        j ← j + 1
        [what[j], СИ[j], ПОЧТА[i, j]] ← ["T.Т.доп", "К", round(T_Т.доп)]
        j ← j + 1
        [what[j], СИ[j], ПОЧТА[i, j]] ← ["m2", "-", round(m2, 4)]
        j ← j + 1
        [what[j], СИ[j], ПОЧТА[i, j]] ← ["Cx", "-", round(Cx, 4)]
        j ← j + 1
        [what[j], СИ[j], ПОЧТА[i, j]] ← ["Fuel", "-", Fuel]
        j ← j + 1
        [what[j], СИ[j], ПОЧТА[i, j]] ← ["R.удII", "м/с", round(R_удII[i], 1)]
        j ← j + 1
        [what[j], СИ[j], ПОЧТА[i, j]] ← ["R.удI", "м/с", round(R_удI[i], 1)]
        j ← j + 1
        [what[j], СИ[j], ПОЧТА[i, j]] ← ["R.удΣ", "м/с", round(R_удΣ[i], 1)]
        j ← j + 1
        [what[j], СИ[j], ПОЧТА[i, j]] ← ["c.СII3", "м/с", round(c_СII3[i], 1)]
        j ← j + 1
        [what[j], СИ[j], ПОЧТА[i, j]] ← ["c.СI3", "м/с", round(c_СI3[i], 1)]
        j ← j + 1
        [what[j], СИ[j], ПОЧТА[i, j]] ← ["η*.t", "%", round(η*_t[i]*100, 2)]
        j ← j + 1
        [what[j], СИ[j], ПОЧТА[i, j]] ← ["η*.e", "%", round(η*_e[i]*100, 2)]
        j ← j + 1
        [what[j], СИ[j], ПОЧТА[i, j]] ← ["η*.R", "%", round(η*_R[i]*100, 2)]
        j ← j + 1
        [what[j], СИ[j], ПОЧТА[i, j]] ← ["η*.0", "%", round(η*_0[i]*100, 2)]
        j ← j + 1
        [what[j], СИ[j], ПОЧТА[i, j]] ← ["η*.КНДII", "%", round(η*_КНДII*100, 2)]
        j ← j + 1
        [what[j], СИ[j], ПОЧТА[i, j]] ← ["η*.КНДI", "%", round(η*_КНДI*100, 2)]
        j ← j + 1
        [what[j], СИ[j], ПОЧТА[i, j]] ← ["η*.КСДII", "%", round(η*_КСДII*100, 2)]
        j ← j + 1
        [what[j], СИ[j], ПОЧТА[i, j]] ← ["η*.КСДI", "%", round(η*_КСДI*100, 2)]
        j ← j + 1
        [what[j], СИ[j], ПОЧТА[i, j]] ← ["η*.КВДII", "%", round(η*_КВДII*100, 2)]
        j ← j + 1
        [what[j], СИ[j], ПОЧТА[i, j]] ← ["η*.КВДI", "%", round(η*_КВДI*100, 2)]
        j ← j + 1
        [what[j], СИ[j], ПОЧТА[i, j]] ← ["η.г", "%", round(η_г*100, 2)]
        j ← j + 1
        [what[j], СИ[j], ПОЧТА[i, j]] ← ["η*.ТВД", "%", round(η*_ТВД*100, 2)]
        j ← j + 1
        [what[j], СИ[j], ПОЧТА[i, j]] ← ["η*.ТСД", "%", round(η*_ТСД*100, 2)]
        j ← j + 1
        [what[j], СИ[j], ПОЧТА[i, j]] ← ["η*.ТНД", "%", round(η*_ТНД*100, 2)]
        j ← j + 1
        [what[j], СИ[j], ПОЧТА[i, j]] ← ["η*.СТ", "%", round(η*_СТ*100, 2)]
        j ← j + 1
        [what[j], СИ[j], ПОЧТА[i, j]] ← ["η.РВНД", "%", round(η_РВНД*100, 2)]
        j ← j + 1
        [what[j], СИ[j], ПОЧТА[i, j]] ← ["η.РВСД", "%", round(η_РВСД*100, 2)]
        j ← j + 1
        [what[j], СИ[j], ПОЧТА[i, j]] ← ["η.РВВД", "%", round(η_РВВД*100, 2)]
        j ← j + 1
        [what[j], СИ[j], ПОЧТА[i, j]] ← ["η.мех", "%", round(η_мех*100, 2)]
        j ← j + 1
        [what[j], СИ[j], ПОЧТА[i, j]] ← ["η.РНВД", "%", round(η_РНВД*100, 2)]
        j ← j + 1
        [what[j], СИ[j], ПОЧТА[i, j]] ← ["η.РНСД", "%", round(η_РНСД*100, 2)]
        j ← j + 1
        [what[j], СИ[j], ПОЧТА[i, j]] ← ["η.РННД", "%", round(η_РННД*100, 2)]
        j ← j + 1
        [what[j], СИ[j], ПОЧТА[i, j]] ← ["η.РНСТ", "%", round(η_РНСТ*100, 2)]
        j ← j + 1
        [what[j], СИ[j], ПОЧТА[i, j]] ← ["σ.вх", "-", round(σ_вх, 4)]
        j ← j + 1
        [what[j], СИ[j], ПОЧТА[i, j]] ← ["σ.КНДII->КСДII", "-", round(σ_КНДII->КСДII, 4)]
        j ← j + 1
        [what[j], СИ[j], ПОЧТА[i, j]] ← ["σ.КСДII->КВДII", "-", round(σ_КСДII->КВДII, 4)]
        j ← j + 1
        [what[j], СИ[j], ПОЧТА[i, j]] ← ["σ.КВДII->", "-", round(σ_КВДII->, 4)]
        j ← j + 1
        [what[j], СИ[j], ПОЧТА[i, j]] ← ["σ.КНДI->КСДI", "-", round(σ_КНДI->КСДI, 4)]
        j ← j + 1
        [what[j], СИ[j], ПОЧТА[i, j]] ← ["σ.КСДI->КВДI", "-", round(σ_КСДI->КВДI, 4)]
        j ← j + 1
        [what[j], СИ[j], ПОЧТА[i, j]] ← ["σ.КВДI->КС", "-", round(σ_КВДI->КС, 4)]
        j ← j + 1
        [what[j], СИ[j], ПОЧТА[i, j]] ← ["σ.КС", "-", round(σ_КС, 4)]
        j ← j + 1
        [what[j], СИ[j], ПОЧТА[i, j]] ← ["σ.КС->ТВД", "-", round(σ_КС->ТВД, 4)]
        j ← j + 1
        [what[j], СИ[j], ПОЧТА[i, j]] ← ["σ.ТВД->ТСД", "-", round(σ_ТВД->ТСД, 4)]
        j ← j + 1
        [what[j], СИ[j], ПОЧТА[i, j]] ← ["σ.ТСД->ТНД", "-", round(σ_ТСД->ТНД, 4)]
        j ← j + 1
        [what[j], СИ[j], ПОЧТА[i, j]] ← ["σ.ТНД->СТ", "-", round(σ_ТНД->СТ, 4)]
        j ← j + 1
        [what[j], СИ[j], ПОЧТА[i, j]] ← ["σ.СТ->", "-", round(σ_СТ->, 4)]
        j ← j + 1
        [what[j], СИ[j], ПОЧТА[i, j]] ← ["σ.СМ", "-", round(σ_СМ, 4)]
        j ← j + 1
        [what[j], СИ[j], ПОЧТА[i, j]] ← ["σ.вых", "-", round(σ_вых, 4)]
        j ← j + 1
        [what[j], СИ[j], ПОЧТА[i, j]] ← ["φ.СI", "-", round(φ_СI, 4)]
        j ← j + 1
        [what[j], СИ[j], ПОЧТА[i, j]] ← ["φ.СII", "-", round(φ_СII, 4)]
        j ← j + 1
        [what[j], СИ[j], ПОЧТА[i, j]] ← ["π*.КIΣ", "-", round(π*_КIΣ[i], 2)]
        j ← j + 1
        [what[j], СИ[j], ПОЧТА[i, j]] ← ["π*.КIIΣ", "-", round(π*_КIIΣ[i], 2)]
        j ← j + 1
        [what[j], СИ[j], ПОЧТА[i, j]] ← ["π*.ТΣ", "-", round(π*_ТΣ[i], 2)]
        j ← j + 1
        [what[j], СИ[j], ПОЧТА[i, j]] ← ["π*.КНДII", "-", round(π*_КНДII[i], 2)]
        j ← j + 1
        [what[j], СИ[j], ПОЧТА[i, j]] ← ["π*.КНДI", "-", round(π*_КНДI[i], 2)]
        j ← j + 1
        [what[j], СИ[j], ПОЧТА[i, j]] ← ["π*.КСДII", "-", round(π*_КСДII[i], 2)]
        j ← j + 1
        [what[j], СИ[j], ПОЧТА[i, j]] ← ["π*.КСДI", "-", round(π*_КСДI[i], 2)]
        j ← j + 1
        [what[j], СИ[j], ПОЧТА[i, j]] ← ["π*.КВДII", "-", round(π*_КВДII[i], 2)]
        j ← j + 1
        [what[j], СИ[j], ПОЧТА[i, j]] ← ["π*.КВДI", "-", round(π*_КВДI[i], 2)]
        j ← j + 1
        [what[j], СИ[j], ПОЧТА[i, j]] ← ["π*.ТВД", "-", round(π*_ТВД[i], 2)]
        j ← j + 1
        [what[j], СИ[j], ПОЧТА[i, j]] ← ["π*.ТСД", "-", round(π*_ТСД[i], 2)]
        j ← j + 1
        [what[j], СИ[j], ПОЧТА[i, j]] ← ["π*.ТНД", "-", round(π*_ТНД[i], 2)]
        j ← j + 1
        [what[j], СИ[j], ПОЧТА[i, j]] ← ["π*.СТ", "-", round(π*_СТ[i], 2)]
        j ← j + 1
        [what[j], СИ[j], ПОЧТА[i, j]] ← ["π*.СII", "-", round(π*_СII[i], 2)]
        j ← j + 1
        [what[j], СИ[j], ПОЧТА[i, j]] ← ["π*.СI", "-", round(π*_СI[i], 2)]
        j ← j + 1
        [what[j], СИ[j], ПОЧТА[i, j]] ← ["G.Σ", "кг/с", round(G_Σ[i], 3)]
        j ← j + 1
        [what[j], СИ[j], ПОЧТА[i, j]] ← ["G.I", "кг/с", round(G_I[i], 3)]
        j ← j + 1
        [what[j], СИ[j], ПОЧТА[i, j]] ← ["G.II", "кг/с", round(G_II[i], 3)]
        j ← j + 1
        [what[j], СИ[j], ПОЧТА[i, j]] ← ["G.гор", "г/с", round(G_гор[i]*10^3, 2)]
        j ← j + 1
        [what[j], СИ[j], ПОЧТА[i, j]] ← ["G.охлТВД", "г/с", round(G_охлТВД[i]*10^3, 2)]
        j ← j + 1
        [what[j], СИ[j], ПОЧТА[i, j]] ← ["G.охлТСД", "г/с", round(G_охлТСД[i]*10^3, 2)]
        j ← j + 1
        [what[j], СИ[j], ПОЧТА[i, j]] ← ["G.охлТНД", "г/с", round(G_охлТНД[i]*10^3, 2)]
        j ← j + 1
        [what[j], СИ[j], ПОЧТА[i, j]] ← ["C.e", "кг/кВт/ч", round(C_e[i]*10^3*3600, 4)]
        j ← j + 1
        [what[j], СИ[j], ПОЧТА[i, j]] ← ["C.R", "кг/кH/ч", round(C_R[i]*10^3*3600, 4)]
        j ← j + 1
        [what[j], СИ[j], ПОЧТА[i, j]] ← ["N.КНД", "МВт", round(N_КНД[i]*10^-6, 3)]
        j ← j + 1
        [what[j], СИ[j], ПОЧТА[i, j]] ← ["N.КСД", "МВт", round(N_КСД[i]*10^-6, 3)]
        j ← j + 1
        [what[j], СИ[j], ПОЧТА[i, j]] ← ["N.КВД", "МВт", round(N_КВД[i]*10^-6, 3)]
        j ← j + 1
        [what[j], СИ[j], ПОЧТА[i, j]] ← ["N.ТВД", "МВт", round(N_ТВД[i]*10^-6, 3)]
        j ← j + 1
        [what[j], СИ[j], ПОЧТА[i, j]] ← ["N.ТСД", "МВт", round(N_ТСД[i]*10^-6, 3)]
        j ← j + 1
        [what[j], СИ[j], ПОЧТА[i, j]] ← ["N.ТНД", "МВт", round(N_ТНД[i]*10^-6, 3)]
        j ← j + 1
        [what[j], СИ[j], ПОЧТА[i, j]] ← ["N.СТ", "МВт", round(N_СТ[i]*10^-6, 3)]
        j ← j + 1
        [what[j], СИ[j], ПОЧТА[i, j]] ← ["N.НВД", "МВт", round(N_НВД*10^-6, 3)]
        j ← j + 1
        [what[j], СИ[j], ПОЧТА[i, j]] ← ["N.НСД", "МВт", round(N_НСД*10^-6, 3)]
        j ← j + 1
        [what[j], СИ[j], ПОЧТА[i, j]] ← ["N.ННД", "МВт", round(N_ННД*10^-6, 3)]
        j ← j + 1
        [what[j], СИ[j], ПОЧТА[i, j]] ← ["N.НСТ", "МВт", round(N_НСТ*10^-6, 3)]
        j ← j + 1
        [what[j], СИ[j], ПОЧТА[i, j]] ← ["N.e", "МВт", round(N_e[i]*10^-6, 3)]
        j ← j + 1
        [what[j], СИ[j], ПОЧТА[i, j]] ← ["L.КНД", "кДж/кг", round(L_КНД[i]*10^-3, 1)]
        j ← j + 1
        [what[j], СИ[j], ПОЧТА[i, j]] ← ["L.КСД", "кДж/кг", round(L_КСД[i]*10^-3, 1)]
        j ← j + 1
        [what[j], СИ[j], ПОЧТА[i, j]] ← ["L.КВД", "кДж/кг", round(L_КВД[i]*10^-3, 1)]
        j ← j + 1
        [what[j], СИ[j], ПОЧТА[i, j]] ← ["L.ТВД", "кДж/кг", round(L_ТВД[i]*10^-3, 1)]
        j ← j + 1
        [what[j], СИ[j], ПОЧТА[i, j]] ← ["L.ТСД", "кДж/кг", round(L_ТСД[i]*10^-3, 1)]
        j ← j + 1
        [what[j], СИ[j], ПОЧТА[i, j]] ← ["L.ТНД", "кДж/кг", round(L_ТНД[i]*10^-3, 1)]
        j ← j + 1
        [what[j], СИ[j], ПОЧТА[i, j]] ← ["L.СТ", "кДж/кг", round(L_СТ[i]*10^-3, 1)]
        j ← j + 1
        [what[j], СИ[j], ПОЧТА[i, j]] ← ["Le", "кДж/кг", round(Le[i]*10^-3, 1)]
        j ← j + 1
        [what[j], СИ[j], ПОЧТА[i, j]] ← ["Cp.КНДII1", "Дж/кг/К", round(Cp_КНДII1[i], 1)]
        j ← j + 1
        [what[j], СИ[j], ПОЧТА[i, j]] ← ["Cp.КНДII3", "Дж/кг/К", round(Cp_КНДII3[i], 1)]
        j ← j + 1
        [what[j], СИ[j], ПОЧТА[i, j]] ← ["Cp.КНДI1", "Дж/кг/К", round(Cp_КНДI1[i], 1)]
        j ← j + 1
        [what[j], СИ[j], ПОЧТА[i, j]] ← ["Cp.КНДI3", "Дж/кг/К", round(Cp_КНДI3[i], 1)]
        j ← j + 1
        [what[j], СИ[j], ПОЧТА[i, j]] ← ["Cp.КСДII1", "Дж/кг/К", round(Cp_КСДII1[i], 1)]
        j ← j + 1
        [what[j], СИ[j], ПОЧТА[i, j]] ← ["Cp.КСДII3", "Дж/кг/К", round(Cp_КСДII3[i], 1)]
        j ← j + 1
        [what[j], СИ[j], ПОЧТА[i, j]] ← ["Cp.КСДI1", "Дж/кг/К", round(Cp_КСДI1[i], 1)]
        j ← j + 1
        [what[j], СИ[j], ПОЧТА[i, j]] ← ["Cp.КСДI3", "Дж/кг/К", round(Cp_КСДI3[i], 1)]
        j ← j + 1
        [what[j], СИ[j], ПОЧТА[i, j]] ← ["Cp.КВДII1", "Дж/кг/К", round(Cp_КВДII1[i], 1)]
        j ← j + 1
        [what[j], СИ[j], ПОЧТА[i, j]] ← ["Cp.КВДII3", "Дж/кг/К", round(Cp_КВДII3[i], 1)]
        j ← j + 1
        [what[j], СИ[j], ПОЧТА[i, j]] ← ["Cp.КВДI1", "Дж/кг/К", round(Cp_КВДI1[i], 1)]
        j ← j + 1
        [what[j], СИ[j], ПОЧТА[i, j]] ← ["Cp.КВДI3", "Дж/кг/К", round(Cp_КВДI3[i], 1)]
        j ← j + 1
        [what[j], СИ[j], ПОЧТА[i, j]] ← ["Cp.КС1", "Дж/кг/К", round(Cp_КС1[i], 1)]
        j ← j + 1
        [what[j], СИ[j], ПОЧТА[i, j]] ← ["Cp.КС3", "Дж/кг/К", round(Cp_КС3[i], 1)]
        j ← j + 1
        [what[j], СИ[j], ПОЧТА[i, j]] ← ["Cp.ТВД1", "Дж/кг/К", round(Cp_ТВД1[i], 1)]
        j ← j + 1
        [what[j], СИ[j], ПОЧТА[i, j]] ← ["Cp.ТВД3", "Дж/кг/К", round(Cp_ТВД3[i], 1)]
        j ← j + 1
        [what[j], СИ[j], ПОЧТА[i, j]] ← ["Cp.ТСД1", "Дж/кг/К", round(Cp_ТСД1[i], 1)]
        j ← j + 1
        [what[j], СИ[j], ПОЧТА[i, j]] ← ["Cp.ТСД3", "Дж/кг/К", round(Cp_ТСД3[i], 1)]
        j ← j + 1
        [what[j], СИ[j], ПОЧТА[i, j]] ← ["Cp.ТНД1", "Дж/кг/К", round(Cp_ТНД1[i], 1)]
        j ← j + 1
        [what[j], СИ[j], ПОЧТА[i, j]] ← ["Cp.ТНД3", "Дж/кг/К", round(Cp_ТНД3[i], 1)]
        j ← j + 1
        [what[j], СИ[j], ПОЧТА[i, j]] ← ["Cp.СТ1", "Дж/кг/К", round(Cp_СТ1[i], 1)]
        j ← j + 1
        [what[j], СИ[j], ПОЧТА[i, j]] ← ["Cp.СТ3", "Дж/кг/К", round(Cp_СТ3[i], 1)]
        j ← j + 1
        [what[j], СИ[j], ПОЧТА[i, j]] ← ["Cp.СII1", "Дж/кг/К", round(Cp_СII1[i], 1)]
        j ← j + 1
        [what[j], СИ[j], ПОЧТА[i, j]] ← ["Cp.СII3", "Дж/кг/К", round(Cp_СII3[i], 1)]
        j ← j + 1
        [what[j], СИ[j], ПОЧТА[i, j]] ← ["Cp.СI1", "Дж/кг/К", round(Cp_СI1[i], 1)]
        j ← j + 1
        [what[j], СИ[j], ПОЧТА[i, j]] ← ["Cp.СI3", "Дж/кг/К", round(Cp_СI3[i], 1)]
        j ← j + 1
        [what[j], СИ[j], ПОЧТА[i, j]] ← ["k.КНДII1", "-", round(k_КНДII1[i], 3)]
        j ← j + 1
        [what[j], СИ[j], ПОЧТА[i, j]] ← ["k.КНДII3", "-", round(k_КНДII3[i], 3)]
        j ← j + 1
        [what[j], СИ[j], ПОЧТА[i, j]] ← ["k.КНДI1", "-", round(k_КНДI1[i], 3)]
        j ← j + 1
        [what[j], СИ[j], ПОЧТА[i, j]] ← ["k.КНДI3", "-", round(k_КНДI3[i], 3)]
        j ← j + 1
        [what[j], СИ[j], ПОЧТА[i, j]] ← ["k.КСДII1", "-", round(k_КСДII1[i], 3)]
        j ← j + 1
        [what[j], СИ[j], ПОЧТА[i, j]] ← ["k.КСДII3", "-", round(k_КСДII3[i], 3)]
        j ← j + 1
        [what[j], СИ[j], ПОЧТА[i, j]] ← ["k.КСДI1", "-", round(k_КСДI1[i], 3)]
        j ← j + 1
        [what[j], СИ[j], ПОЧТА[i, j]] ← ["k.КСДI3", "-", round(k_КСДI3[i], 3)]
        j ← j + 1
        [what[j], СИ[j], ПОЧТА[i, j]] ← ["k.КВДII1", "-", round(k_КВДII1[i], 3)]
        j ← j + 1
        [what[j], СИ[j], ПОЧТА[i, j]] ← ["k.КВДII3", "-", round(k_КВДII3[i], 3)]
        j ← j + 1
        [what[j], СИ[j], ПОЧТА[i, j]] ← ["k.КВДI1", "-", round(k_КВДI1[i], 3)]
        j ← j + 1
        [what[j], СИ[j], ПОЧТА[i, j]] ← ["k.КВДI3", "-", round(k_КВДI3[i], 3)]
        j ← j + 1
        [what[j], СИ[j], ПОЧТА[i, j]] ← ["k.КС1", "-", round(k_КС1[i], 3)]
        j ← j + 1
        [what[j], СИ[j], ПОЧТА[i, j]] ← ["k.КС3", "-", round(k_КС3[i], 3)]
        j ← j + 1
        [what[j], СИ[j], ПОЧТА[i, j]] ← ["k.ТВД1", "-", round(k_ТВД1[i], 3)]
        j ← j + 1
        [what[j], СИ[j], ПОЧТА[i, j]] ← ["k.ТВД3", "-", round(k_ТВД3[i], 3)]
        j ← j + 1
        [what[j], СИ[j], ПОЧТА[i, j]] ← ["k.ТСД1", "-", round(k_ТСД1[i], 3)]
        j ← j + 1
        [what[j], СИ[j], ПОЧТА[i, j]] ← ["k.ТСД3", "-", round(k_ТСД3[i], 3)]
        j ← j + 1
        [what[j], СИ[j], ПОЧТА[i, j]] ← ["k.ТНД1", "-", round(k_ТНД1[i], 3)]
        j ← j + 1
        [what[j], СИ[j], ПОЧТА[i, j]] ← ["k.ТНД3", "-", round(k_ТНД3[i], 3)]
        j ← j + 1
        [what[j], СИ[j], ПОЧТА[i, j]] ← ["k.СТ1", "-", round(k_СТ1[i], 3)]
        j ← j + 1
        [what[j], СИ[j], ПОЧТА[i, j]] ← ["k.СТ3", "-", round(k_СТ3[i], 3)]
        j ← j + 1
        [what[j], СИ[j], ПОЧТА[i, j]] ← ["k.СII1", "-", round(k_СII1[i], 3)]
        j ← j + 1
        [what[j], СИ[j], ПОЧТА[i, j]] ← ["k.СII3", "-", round(k_СII3[i], 3)]
        j ← j + 1
        [what[j], СИ[j], ПОЧТА[i, j]] ← ["k.СI1", "-", round(k_СI1[i], 3)]
        j ← j + 1
        [what[j], СИ[j], ПОЧТА[i, j]] ← ["k.СI3", "-", round(k_СI3[i], 3)]
        j ← j + 1
        [what[j], СИ[j], ПОЧТА[i, j]] ← ["α.КС3", "-", round(α_КС3[i], 3)]
        j ← j + 1
        [what[j], СИ[j], ПОЧТА[i, j]] ← ["α.ТВД1", "-", round(α_ТВД1[i], 3)]
        j ← j + 1
        [what[j], СИ[j], ПОЧТА[i, j]] ← ["α.ТВД3", "-", round(α_ТВД3[i], 3)]
        j ← j + 1
        [what[j], СИ[j], ПОЧТА[i, j]] ← ["α.ТСД1", "-", round(α_ТСД1[i], 3)]
        j ← j + 1
        [what[j], СИ[j], ПОЧТА[i, j]] ← ["α.ТСД3", "-", round(α_ТСД3[i], 3)]
        j ← j + 1
        [what[j], СИ[j], ПОЧТА[i, j]] ← ["α.ТНД1", "-", round(α_ТНД1[i], 3)]
        j ← j + 1
        [what[j], СИ[j], ПОЧТА[i, j]] ← ["α.ТНД3", "-", round(α_ТНД3[i], 3)]
        j ← j + 1
        [what[j], СИ[j], ПОЧТА[i, j]] ← ["α.СТ1", "-", round(α_СТ1[i], 3)]
        j ← j + 1
        [what[j], СИ[j], ПОЧТА[i, j]] ← ["α.СТ3", "-", round(α_СТ3[i], 3)]
        j ← j + 1
        [what[j], СИ[j], ПОЧТА[i, j]] ← ["α.СII1", "-", round(α_СII1[i], 3)]
        j ← j + 1
        [what[j], СИ[j], ПОЧТА[i, j]] ← ["α.СII3", "-", round(α_СII3[i], 3)]
        j ← j + 1
        [what[j], СИ[j], ПОЧТА[i, j]] ← ["α.СI1", "-", round(α_СI1[i], 3)]
        j ← j + 1
        [what[j], СИ[j], ПОЧТА[i, j]] ← ["α.СI3", "-", round(α_СI3[i], 3)]
        j ← j + 1
        [what[j], СИ[j], ПОЧТА[i, j]] ← ["T*.н", "К", round(T*_н, 1)]
        j ← j + 1
        [what[j], СИ[j], ПОЧТА[i, j]] ← ["T*.вх", "К", round(T*_вх, 1)]
        j ← j + 1
        [what[j], СИ[j], ПОЧТА[i, j]] ← ["T*.КНДII1", "К", round(T*_КНДII1[i], 1)]
        j ← j + 1
        [what[j], СИ[j], ПОЧТА[i, j]] ← ["T*.КНДII3", "К", round(T*_КНДII3[i], 1)]
        j ← j + 1
        [what[j], СИ[j], ПОЧТА[i, j]] ← ["T*.КНДI1", "К", round(T*_КНДI1[i], 1)]
        j ← j + 1
        [what[j], СИ[j], ПОЧТА[i, j]] ← ["T*.КНДI3", "К", round(T*_КНДI3[i], 1)]
        j ← j + 1
        [what[j], СИ[j], ПОЧТА[i, j]] ← ["T*.КСДII1", "К", round(T*_КСДII1[i], 1)]
        j ← j + 1
        [what[j], СИ[j], ПОЧТА[i, j]] ← ["T*.КСДII3", "К", round(T*_КСДII3[i], 1)]
        j ← j + 1
        [what[j], СИ[j], ПОЧТА[i, j]] ← ["T*.КСДI1", "К", round(T*_КСДI1[i], 1)]
        j ← j + 1
        [what[j], СИ[j], ПОЧТА[i, j]] ← ["T*.КСДI3", "К", round(T*_КСДI3[i], 1)]
        j ← j + 1
        [what[j], СИ[j], ПОЧТА[i, j]] ← ["T*.КВДII1", "К", round(T*_КВДII1[i], 1)]
        j ← j + 1
        [what[j], СИ[j], ПОЧТА[i, j]] ← ["T*.КВДII3", "К", round(T*_КВДII3[i], 1)]
        j ← j + 1
        [what[j], СИ[j], ПОЧТА[i, j]] ← ["T*.КВДI1", "К", round(T*_КВДI1[i], 1)]
        j ← j + 1
        [what[j], СИ[j], ПОЧТА[i, j]] ← ["T*.КВДI3", "К", round(T*_КВДI3[i], 1)]
        j ← j + 1
        [what[j], СИ[j], ПОЧТА[i, j]] ← ["T*.КС1", "К", round(T*_КС1[i], 1)]
        j ← j + 1
        [what[j], СИ[j], ПОЧТА[i, j]] ← ["T*.КС3", "К", round(T*_КС3[i], 1)]
        j ← j + 1
        [what[j], СИ[j], ПОЧТА[i, j]] ← ["T*.ТВД1", "К", round(T*_ТВД1[i], 1)]
        j ← j + 1
        [what[j], СИ[j], ПОЧТА[i, j]] ← ["T*.ТВД3", "К", round(T*_ТВД3[i], 1)]
        j ← j + 1
        [what[j], СИ[j], ПОЧТА[i, j]] ← ["T*.ТСД1", "К", round(T*_ТСД1[i], 1)]
        j ← j + 1
        [what[j], СИ[j], ПОЧТА[i, j]] ← ["T*.ТСД3", "К", round(T*_ТСД3[i], 1)]
        j ← j + 1
        [what[j], СИ[j], ПОЧТА[i, j]] ← ["T*.ТНД1", "К", round(T*_ТНД1[i], 1)]
        j ← j + 1
        [what[j], СИ[j], ПОЧТА[i, j]] ← ["T*.ТНД3", "К", round(T*_ТНД3[i], 1)]
        j ← j + 1
        [what[j], СИ[j], ПОЧТА[i, j]] ← ["T*.СТ1", "К", round(T*_СТ1[i], 1)]
        j ← j + 1
        [what[j], СИ[j], ПОЧТА[i, j]] ← ["T*.СТ3", "К", round(T*_СТ3[i], 1)]
        j ← j + 1
        [what[j], СИ[j], ПОЧТА[i, j]] ← ["T*.СМII1", "К", round(T*_СМII1[i], 1)]
        j ← j + 1
        [what[j], СИ[j], ПОЧТА[i, j]] ← ["T*.СМI1", "К", round(T*_СМI1[i], 1)]
        j ← j + 1
        [what[j], СИ[j], ПОЧТА[i, j]] ← ["T*.СМ3", "К", round(T*_СМ3[i], 1)]
        j ← j + 1
        [what[j], СИ[j], ПОЧТА[i, j]] ← ["T*.СII1", "К", round(T*_СII1[i], 1)]
        j ← j + 1
        [what[j], СИ[j], ПОЧТА[i, j]] ← ["T*.СII3", "К", round(T*_СII3[i], 1)]
        j ← j + 1
        [what[j], СИ[j], ПОЧТА[i, j]] ← ["T*.СI1", "К", round(T*_СI1[i], 1)]
        j ← j + 1
        [what[j], СИ[j], ПОЧТА[i, j]] ← ["T*.СI3", "К", round(T*_СI3[i], 1)]
        j ← j + 1
        [what[j], СИ[j], ПОЧТА[i, j]] ← ["P*.н", "кПа", round(P*_н*10^-3, 2)]
        j ← j + 1
        [what[j], СИ[j], ПОЧТА[i, j]] ← ["P*.вх", "кПа", round(P*_вх*10^-3, 2)]
        j ← j + 1
        [what[j], СИ[j], ПОЧТА[i, j]] ← ["P*.КНДII1", "кПа", round(P*_КНДII1[i]*10^-3, 2)]
        j ← j + 1
        [what[j], СИ[j], ПОЧТА[i, j]] ← ["P*.КНДII3", "кПа", round(P*_КНДII3[i]*10^-3, 2)]
        j ← j + 1
        [what[j], СИ[j], ПОЧТА[i, j]] ← ["P*.КНДI1", "кПа", round(P*_КНДI1[i]*10^-3, 2)]
        j ← j + 1
        [what[j], СИ[j], ПОЧТА[i, j]] ← ["P*.КНДI3", "кПа", round(P*_КНДI3[i]*10^-3, 2)]
        j ← j + 1
        [what[j], СИ[j], ПОЧТА[i, j]] ← ["P*.КСДII1", "кПа", round(P*_КСДII1[i]*10^-3, 2)]
        j ← j + 1
        [what[j], СИ[j], ПОЧТА[i, j]] ← ["P*.КСДII3", "кПа", round(P*_КСДII3[i]*10^-3, 2)]
        j ← j + 1
        [what[j], СИ[j], ПОЧТА[i, j]] ← ["P*.КСДI1", "кПа", round(P*_КСДI1[i]*10^-3, 2)]
        j ← j + 1
        [what[j], СИ[j], ПОЧТА[i, j]] ← ["P*.КСДI3", "кПа", round(P*_КСДI3[i]*10^-3, 2)]
        j ← j + 1
        [what[j], СИ[j], ПОЧТА[i, j]] ← ["P*.КВДII1", "кПа", round(P*_КВДII1[i]*10^-3, 2)]
        j ← j + 1
        [what[j], СИ[j], ПОЧТА[i, j]] ← ["P*.КВДII3", "кПа", round(P*_КВДII3[i]*10^-3, 2)]
        j ← j + 1
        [what[j], СИ[j], ПОЧТА[i, j]] ← ["P*.КВДI1", "кПа", round(P*_КВДI1[i]*10^-3, 2)]
        j ← j + 1
        [what[j], СИ[j], ПОЧТА[i, j]] ← ["P*.КВДI3", "кПа", round(P*_КВДI3[i]*10^-3, 2)]
        j ← j + 1
        [what[j], СИ[j], ПОЧТА[i, j]] ← ["P*.КС1", "кПа", round(P*_КС1[i]*10^-3, 2)]
        j ← j + 1
        [what[j], СИ[j], ПОЧТА[i, j]] ← ["P*.КС3", "кПа", round(P*_КС3[i]*10^-3, 2)]
        j ← j + 1
        [what[j], СИ[j], ПОЧТА[i, j]] ← ["P*.ТВД1", "кПа", round(P*_ТВД1[i]*10^-3, 2)]
        j ← j + 1
        [what[j], СИ[j], ПОЧТА[i, j]] ← ["P*.ТВД3", "кПа", round(P*_ТВД3[i]*10^-3, 2)]
        j ← j + 1
        [what[j], СИ[j], ПОЧТА[i, j]] ← ["P*.ТСД1", "кПа", round(P*_ТСД1[i]*10^-3, 2)]
        j ← j + 1
        [what[j], СИ[j], ПОЧТА[i, j]] ← ["P*.ТСД3", "кПа", round(P*_ТСД3[i]*10^-3, 2)]
        j ← j + 1
        [what[j], СИ[j], ПОЧТА[i, j]] ← ["P*.ТНД1", "кПа", round(P*_ТНД1[i]*10^-3, 2)]
        j ← j + 1
        [what[j], СИ[j], ПОЧТА[i, j]] ← ["P*.ТНД3", "кПа", round(P*_ТНД3[i]*10^-3, 2)]
        j ← j + 1
        [what[j], СИ[j], ПОЧТА[i, j]] ← ["P*.СТ1", "кПа", round(P*_СТ1[i]*10^-3, 2)]
        j ← j + 1
        [what[j], СИ[j], ПОЧТА[i, j]] ← ["P*.СТ3", "кПа", round(P*_СТ3[i]*10^-3, 2)]
        j ← j + 1
        [what[j], СИ[j], ПОЧТА[i, j]] ← ["P*.СМII1", "кПа", round(P*_СМII1[i]*10^-3, 2)]
        j ← j + 1
        [what[j], СИ[j], ПОЧТА[i, j]] ← ["P*.СМI1", "кПа", round(P*_СМI1[i]*10^-3, 2)]
        j ← j + 1
        [what[j], СИ[j], ПОЧТА[i, j]] ← ["P*.СМ3", "кПа", round(P*_СМ3[i]*10^-3, 2)]
        j ← j + 1
        [what[j], СИ[j], ПОЧТА[i, j]] ← ["P*.СII1", "кПа", round(P*_СII1[i]*10^-3, 2)]
        j ← j + 1
        [what[j], СИ[j], ПОЧТА[i, j]] ← ["P*.СII3", "кПа", round(P*_СII3[i]*10^-3, 2)]
        j ← j + 1
        [what[j], СИ[j], ПОЧТА[i, j]] ← ["P*.СI1", "кПа", round(P*_СI1[i]*10^-3, 2)]
        j ← j + 1
        [what[j], СИ[j], ПОЧТА[i, j]] ← ["P*.СI3", "кПа", round(P*_СI3[i]*10^-3, 2)]
    augment(what, СИ, transpose(ПОЧТА))
ПОЧТА :=
    for row ∈ 1 .. rows(ПОЧТА)
        for col ∈ 1 .. cols(ПОЧТА)
            ПОЧТА[row, col] ← "" if IsNaN(ПОЧТА[row, col]) == 1
    ПОЧТА
transpose(ПОЧТА) =  # no stored result
output2excel :=
    OUTPUT ← 1
    WRITEEXCEL(transpose(ПОЧТА), concat(Adress, "cycle", "_m", num2str(m2), "_T", num2str(T*_КС3[1]), ".xlsx"), "A1") if OUTPUT == 1
    NaN otherwise
# [area: Выбор точки]
[i_GΣ; i_Gгор; i_Ce; i_CR; i_ηe; i_ηR; i_R.удΣ] :=
    [i_GΣ, i_Gгор, i_Ce, i_CR, i_ηe, i_ηR, i_R.удΣ] ← [1, 1, 1, 1, 1, 1, 1]
    for i ∈ 1 + 1 .. N_dis
        i_GΣ ← i if (IsNaN(G_Σ[i - 1]) == 0) and (IsNaN(G_Σ[i]) == 0) and (G_Σ[i] < G_Σ[i - 1]) and (G_Σ[i] > 0)
        i_Gгор ← i if (IsNaN(G_гор[i - 1]) == 0) and (IsNaN(G_гор[i]) == 0) and (G_гор[i] < G_гор[i - 1]) and (G_гор[i] > 0)
        i_Ce ← i if (IsNaN(C_e[i - 1]) == 0) and (IsNaN(C_e[i]) == 0) and (C_e[i] < C_e[i - 1]) and (C_e[i] > 0)
        i_CR ← i if (IsNaN(C_R[i - 1]) == 0) and (IsNaN(C_R[i]) == 0) and (C_R[i] < C_R[i - 1]) and (C_R[i] > 0)
        i_ηe ← i if (IsNaN(η*_e[i - 1]) == 0) and (IsNaN(η*_e[i]) == 0) and (η*_e[i] > η*_e[i - 1]) and (η*_e[i] > 0)
        i_ηR ← i if (IsNaN(η*_R[i - 1]) == 0) and (IsNaN(η*_R[i]) == 0) and (η*_R[i] > η*_R[i - 1]) and (η*_R[i] > 0)
        i_R.удΣ ← i if (IsNaN(R_удΣ[i - 1]) == 0) and (IsNaN(R_удΣ[i]) == 0) and (R_удΣ[i] > R_удΣ[i - 1]) and (R_удΣ[i] > 0)
    transpose([i_GΣ, i_Gгор, i_Ce, i_CR, i_ηe, i_ηR, i_R.удΣ])
    = [17; 17; 1; 17; 1; 1; 17]
# Выбранная точка:
i := i_GΣ = 17
N_e[i] = 10^6
Fuel = "Керосин"
[C_e[i]; C_R[i]]*10^3*3600 =  # no stored result
g_гор[i] =  # no stored result
[π*_КIIΣ[i]; π*_КIΣ[i]] =  # no stored result
[η*_t[i]; η*_e[i]; η*_R[i]; η*_0[i]] =  # no stored result
[G_Σ[i]; G_I[i]; G_II[i]] =  # no stored result
G_гор[i] = 10^-3
m2 = 6
π*_ТΣ[i] =  # no stored result
Cx = 0.0489151
[
    G_утКНДII[i];
    G_утКНДI[i];
    G_утКСДII[i];
    G_утКСДI[i];
    G_утКВДII[i];
    G_утКВДI[i];
    G_утКС[i];
    G_утТВД[i];
    G_утТСД[i];
    G_утТНД[i];
    G_утСТ[i];
    G_утСII[i];
    G_утСI[i]
] = 10^-3
[
    π*_вх;
    π*_КНДII[i];
    π*_КНДI[i];
    π*_КСДII[i];
    π*_КСДI[i];
    π*_КВДII[i];
    π*_КВДI[i];
    π*_ТВД[i];
    π*_ТСД[i];
    π*_ТНД[i];
    π*_СТ[i];
    π*_СII[i];
    π*_СI[i]
] =  # no stored result
[
    G_КНДII1[i], G_КНДII3[i];
    G_КНДI1[i], G_КНДI3[i];
    G_КСДII1[i], G_КСДII3[i];
    G_КСДI1[i], G_КСДI3[i];
    G_КВДII1[i], G_КВДII3[i];
    G_КВДI1[i], G_КВДI3[i];
    G_КС1[i], G_КС3[i];
    G_ТВД1[i], G_ТВД3[i];
    G_ТСД1[i], G_ТСД3[i];
    G_ТНД1[i], G_ТНД3[i];
    G_СТ1[i], G_СТ3[i];
    NaN, G_СМ3[i];
    G_СII1[i], G_СII3[i];
    G_СI1[i], G_СI3[i]
] =  # no stored result
[G_охлТВД[i]; G_охлТСД[i]; G_охлТНД[i]] = 10^-3
[g_охлТВД[i]; g_охлТСД[i]; g_охлТНД[i]] =  # no stored result
[N_КНД[i]; N_КСД[i]; N_КВД[i]; N_ТВД[i]; N_ТСД[i]; N_ТНД[i]; N_СТ[i]] = 10^6
[L_КНД[i]; L_КСД[i]; L_КВД[i]; L_ТВД[i]; L_ТСД[i]; L_ТНД[i]; L_СТ[i]] = 10^3
[
    Cp_КНДII1[i], Cp_КНДII3[i];
    Cp_КНДI1[i], Cp_КНДI3[i];
    Cp_КСДII1[i], Cp_КСДII3[i];
    Cp_КСДI1[i], Cp_КСДI3[i];
    Cp_КВДII1[i], Cp_КВДII3[i];
    Cp_КВДI1[i], Cp_КВДI3[i];
    Cp_КС1[i], Cp_КС3[i];
    Cp_ТВД1[i], Cp_ТВД3[i];
    Cp_ТСД1[i], Cp_ТСД3[i];
    Cp_ТНД1[i], Cp_ТНД3[i];
    Cp_СТ1[i], Cp_СТ3[i];
    Cp_СII1[i], Cp_СII3[i];
    Cp_СI1[i], Cp_СI3[i]
] =  # no stored result
[
    k_КНДII1[i], k_КНДII3[i];
    k_КНДI1[i], k_КНДI3[i];
    k_КСДII1[i], k_КСДII3[i];
    k_КСДI1[i], k_КСДI3[i];
    k_КВДII1[i], k_КВДII3[i];
    k_КВДI1[i], k_КВДI3[i];
    k_КС1[i], k_КС3[i];
    k_ТВД1[i], k_ТВД3[i];
    k_ТСД1[i], k_ТСД3[i];
    k_ТНД1[i], k_ТНД3[i];
    k_СТ1[i], k_СТ3[i];
    k_СII1[i], k_СII3[i];
    k_СI1[i], k_СI3[i]
] =  # no stored result
[
    NaN, α_КС3[i];
    α_ТВД1[i], α_ТВД3[i];
    α_ТСД1[i], α_ТСД3[i];
    α_ТНД1[i], α_ТНД3[i];
    α_СТ1[i], α_СТ3[i];
    α_СII1[i], α_СII3[i];
    α_СI1[i], α_СI3[i]
] =  # no stored result
[
    P*_КНДII1[i], P*_КНДII3[i];
    P*_КНДI1[i], P*_КНДI3[i];
    P*_КСДII1[i], P*_КСДII3[i];
    P*_КСДI1[i], P*_КСДI3[i];
    P*_КВДII1[i], P*_КВДII3[i];
    P*_КВДI1[i], P*_КВДI3[i];
    P*_КС1[i], P*_КС3[i];
    P*_ТВД1[i], P*_ТВД3[i];
    P*_ТСД1[i], P*_ТСД3[i];
    P*_ТНД1[i], P*_ТНД3[i];
    P*_СТ1[i], P*_СТ3[i];
    P*_СII1[i], P*_СII3[i];
    P*_СI1[i], P*_СI3[i]
] = 10^3
[
    T*_КНДII1[i], T*_КНДII3[i];
    T*_КНДI1[i], T*_КНДI3[i];
    T*_КСДII1[i], T*_КСДII3[i];
    T*_КСДI1[i], T*_КСДI3[i];
    T*_КВДII1[i], T*_КВДII3[i];
    T*_КВДI1[i], T*_КВДI3[i];
    T*_КС1[i], T*_КС3[i];
    T*_ТВД1[i], T*_ТВД3[i];
    T*_ТСД1[i], T*_ТСД3[i];
    T*_ТНД1[i], T*_ТНД3[i];
    T*_СТ1[i], T*_СТ3[i];
    T*_СII1[i], T*_СII3[i];
    T*_СI1[i], T*_СI3[i]
] =  # no stored result
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