# Список сокращений и условных обозначений
#
# К - компрессор
# ОК - осевой компрессор
# ЦБК - центробежный компрессор
# НА - направляющий аппарат
# ВУ - входное устройство
# ЗУ - заборное устройство
# Л - лопатка
# ЛТ - линия тока
# М - Мах
# Т - тело
# РК - рабочее колесо
# КПД - коэффициент полезного действия
# ГДФ - газодинамическая функция
# З-н - закон
# Раб - рабочий
# Ср. - средний
# СЛ - средняя линия
# Относ. - относительный
# Ном. - номинальный
# Абс. - абсолютный
# Коэф. - коэффициент
# Св-во - свойство
# Ур-е - уравнение
# Ф-я - функция
# Примечание: при выполнении пользоваться В.С. Бекнев, А.Ф. Куфтов, Р.З. Тумашев "Расчет и проектирование центробежных компрессоров", методические указания, 1996
# [area: Исходные данные]
# Общий адрес вывода вайлов:
Adress := "D:\Учеба\ЛМ (Лопаточные машины)\ЛМ Ч1 К\ЛМ Ч1 К ЦБК\"
# Рабочее тело: | воздух
# Показатель адиабаты:
k := 1.4
# Газовая постоянная рабочего тела (Дж/ кг/К):
R_г := 287.4
# Теплоемкость рабочго тела (Дж/кг/К):
Cp := 1006
# Полная температура (К) и давление (Па) на входе:
T*_н ≡ 298
P*_н ≡ 101300
# Массовый расход (кг/с):
G ≡ 4
# Степень повышения давления в РК:
π*_РК ≡ 4.5
# Изоэнтропический КПД РК:
η*_РК := 0.872
# Температура среды (К):
Т_окр.ср. := 273.15 + 5 = 278.15
# Коэф. трения диска РК:
α_f := 0.04
# Угол наклона ЛТ в ср. сечении при входе в РК:
γ_ср1 := 5 °
# Теплообменом с окруающей средой пренебречь:
Q_вн == 0
# Угол Л:
β_Л2 := 70 °
# Угол потока перед РК:
α_1 := 65 °
# Относительный диамер втулки на входе в РК:
d̅ := 0.45
# Относительный диамер периферии на входе в РК:
D̅ := 0.5
# Сторонность РК:
side := 1
(side == 1) or (side == 2) = 1
# Степень дискритизации:
N_dis ≡ 100
# ГДФ температуры:
τ_т(λ) := 1 - λ^2*(k - 1)/(k + 1)
# ГДФ давления:
π_p(λ) := (1 - λ^2*(k - 1)/(k + 1))^(k/(k - 1))
# ГДФ плотности:
ε_ρ(λ) := (1 - λ^2*(k - 1)/(k + 1))^(1/(k - 1))
# [area: Подключаемые библиотеки]
# Русское начало отсчета:
ORIGIN := 1
# Оптимальная густота решетки ЗУ от относ. угла поворота
# [component: outputs EXCEL_(b/t)опт]
N_(b/t)опт := 7
EXCEL_(b/t)опт = ["Δβ Л.ЗУ", "(b/t)опт"; 0.8, 0.6; 1, 1; 1.2, 1.5; 1.4, 2.02; 1.6, 2.55; 1.8, 3.2]
Δβ_Л.ЗУ := submatrix(EXCEL_(b/t)опт, 2, N_(b/t)опт, 1, 1)
(b/t)опт := submatrix(EXCEL_(b/t)опт, 2, N_(b/t)опт, 2, 2)
(b/t)опт(Δβ_Л.ЗY) := interp(lspline(Δβ_Л.ЗУ, (b/t)опт), Δβ_Л.ЗУ, (b/t)опт, Δβ_Л.ЗY)
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# [area: Газодинамический расчет]
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# Рисунок 1 - Изменение относ. КПД РК
# Число Л:
Z_Л := 28
# Фактическое число Л:
Z_Л.РК := Z_Л*sin(β_Л2) explicit, ALL → 28*sin(70*°) = 26.3114
# Целое четное фактическое число Л:
Z_Л.РК := 2*round(0.5*Z_Л.РК) = 26
# Оптимальной диапазон числа Л:
16 ≤ Z_Л.РК ≤ 32 = 1
# Обобщенный коэф. расхода на выходе из РК:
C_m0.2.отн := 0.3
# Диапазон второго обобщенного коэф. расхода
# на выходе из РК:
0.22 ≤ C_m0.2.отн ≤ 0.4 = 1
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# Рисунок 2 - Диаграмма изменения политропического КПД ступени и коэф. разгона меридиональной скорости от угла выхода Л
# Коэф. разгона меридиональной скорости для входного сечения:
β_Л2 = 70 deg
k_cm := 0.95
# Физический коэф. расхода на выходе из РК:
C_m2.отн := C_m0.2.отн*sin(β_Л2) explicit, ALL → 0.3*sin(70*°) = 0.281908
# Физический коэф. расхода на входе в РК:
C_m1.отн := C_m2.отн/(k_cm*D̅) explicit, ALL → 0.282/(0.95*0.5) = 0.59349
# Коэф. скольжения:
σ_ν := 1 - sqrt(sin(β_Л2))/Z_Л.РК^0.7 explicit, ALL → 1 - sqrt(sin(70*°))/26^0.7 = 0.900914
# Коэф. уменьшения подведенной работы за счет конечного числа Л и реактивности Л:
μ_∞ := (σ_ν - C_m0.2.отн*cos(β_Л2))/(1 - C_m0.2.отн*cos(β_Л2)) explicit, ALL → (0.901 - 0.3*cos(70*°))/(1 - 0.3*cos(70*°)) = 0.889585
# Ср. относ. диаметр на входе в РК:
r̅_ср := sqrt((1 + d̅^2)/2) = 0.775403
# Коэф. эффективного напора:
H_к.отн := μ_∞ + α_f - μ_∞*C_m2.отн*cot(β_Л2) - C_m2.отн*D̅*r̅_ср*cot(α_1)/k_cm = 0.78466
# Адиабатический КПД ступени:
η*_РК := (π*_РК^((k - 1)/k) - 1)/(π*_РК^((k - 1)/(k*η*_РК)) - 1) = 0.842887
# Адиабатический (изоэнтропический) напор (Дж/кг):
H*_ад.рк := Cp*T*_н*(π*_РК^((k - 1)/k) - 1) = 160942
# Эффективный напор (Дж/кг):
H_к := H*_ад.рк/η*_РК = 190941
# Адиабатическая (изоэнтрапическая) работа (Дж/кг):
H̅ := H_к.отн*η*_РК = 0.66138
# Окружная скорость раб. Т
# на выходе из РК (м/с):
u_2 := sqrt(H*_ад.рк/H̅) explicit, ALL → sqrt(160941.894/0.661) = 493.298
# Окружная скорость раб. Т
# на входе в РК (м/с):
u_1 := u_2*D̅ explicit, ALL → 493.298*0.5 = 246.649
# Меридиональная составляющая абс. скорости раб. Т на выходе из РК (м/с):
с_m2 := C_m2.отн*u_2 explicit, ALL → 0.282*493.298 = 139.064
# Меридиональная составляющая абс. скорости раб. Т на входе в РК (м/с):
c_m1 := C_m1.отн*u_1 explicit, ALL → 0.593*246.649 = 146.384
# Критическая скорость раб. Т на входе (м/с):
a_кр1 := sqrt(2*k/(k + 1)*R_г*T*_н) explicit, ALL → sqrt(2*1.4/(1.4 + 1)*287.4*298) = 316.1
# Абс. скорость раб. Т на входе в РК (м/с):
c_1 := c_m1/sin(α_1) explicit, ALL → 146.384/sin(65*°) = 161.516
# Приведенная скорость раб. Т на входе в РК:
λ_1 := c_1/a_кр1 explicit, ALL → 161.516/316.1 = 0.510966
# Коэффициент потерь во входном патрубке:
ξ_вх := 0.04
ξ_на := 0.01 + 0.5*((90 - α_1/deg)/100)^2 = 0.04125
ξ_ву := ξ_вх*(c_m1/c_1)^2 + ξ_на = 0.0741058
# Коэф. сохранения полного давления ВУ:
σ_ВУ := 1/(1 + ξ_ву*k/(k + 1)*ε_ρ(λ_1)*λ_1^2) = 0.990003
# Плотность раб. Т на входе в РК (кг/м^3):
ρ*_1 := σ_ВУ*P*_н/(R_г*T*_н) explicit, ALL → 0.99*101300/(287.4*298) = 1.17096
# Коэф. загромождения на входе в РК:
μ_ВУ := 0.985
# Диапазон коэф. загромождения на входе в РК:
0.98 ≤ μ_ВУ ≤ 0.99 = 1
# Статическая плотность раб. Т на входе в РК (кг/м^3):
ρ_1 := ρ*_1*ε_ρ(λ_1) explicit, ALL → 1.171*0.895 = 1.0477
# Давление торможения раб. Т
# на входе в РК (Па):
P*_1 := P*_н*σ_ВУ explicit, ALL → 101300*0.99 = 100287
# Статическое давление раб. Т
# на входе в РК (Па):
P_1 := P*_1*π_p(λ_1) explicit, ALL → 100287.268*0.856 = 85826.3
# Площадь на входе в РК (м^2):
F_1 := G/(c_m1*ρ*_1*ε_ρ(λ_1)*μ_ВУ) = 0.0264784
# [area: Расчет характерных диаметров]
# Периферийный диаметр на входе в РК:
D_п1 := sqrt(4*F_1*cos(γ_ср1)/(π*(1 - d̅^2))) = 0.205214
# Втулочный диаметр на входе в РК:
D_вт1 := D_п1*d̅ = 0.0923465
# Ср. диаметр на выходе из РК:
D_2 := D_п1/D̅ = 0.410429
# Обобщённый коэф. производительноти:
Ф_0 := 4*G/(π*ρ*_1*D_2^2*u_2*sin(β_Л2)) = 0.0557002
# Окружная составляющая абс. скорости раб. Т на выходе из РК (м/с):
c_u2 := μ_∞*(u_2 - с_m2*cot(β_Л2)) explicit, ALL → 0.89*(493.298 - 139.064*cot(70*°)) = 393.804
# Абс. скорость раб. Т на выходе из РК (м/с):
c_2 := sqrt(c_u2^2 + с_m2^2) explicit, ALL → sqrt(393.804^2 + 139.064^2) = 417.636
# Угол потока раб. Т на выходе
# в абс. движении на выходе из РК:
α_2 := atan(с_m2/c_u2) = 19.4497 deg
# Температура раб. Т на выходе из РК (К):
T*_2 := T*_н + H_к/Cp explicit, ALL → 298 + 190941.24/1006 = 487.802
# Критическая скорость звука на выходе из РК (м/с):
a_кр2 := sqrt(2*k/(k + 1)*R_г*T*_2) explicit, ALL → sqrt(2*1.4/(1.4 + 1)*287.4*487.802) = 404.426
# Приведенная скорость на выходе из РК:
λ_2 := c_2/a_кр2 explicit, ALL → 417.636/404.426 = 1.03267
# Параметры РК на входе
# Периферийный радиус РК на входе (м):
r_п1 := D_п1/2 explicit, ALL → 0.205/2 = 0.102607
# Ср. радиус РК на входе (м):
r_ср1 := sqrt(r_п1^2 - F_1*cos(γ_ср1)/(2*π)) explicit, ALL → sqrt(0.103^2 - 0.026*cos(5*°)/(2*π)) = 0.079562
# Втулочный радиус РК на входе (м):
r_вт1 := sqrt(r_п1^2 - F_1*cos(γ_ср1)/π) explicit, ALL → sqrt(0.103^2 - 0.026*cos(5*°)/π) = 0.0461733
# Высота Л на входе (м):
b_1 := (r_п1 - r_вт1)/cos(γ_ср1) explicit, ALL → (0.103 - 0.046)/cos(5*°) = 0.0566495
# Ср. относ. диаметр на входе в РК:
d_ср.отн := r_ср1/r_п1 explicit, ALL → 0.08/0.103 = 0.775403
# Частота вращения РК (об/мин):
n := 60*u_2/(π*D_2) explicit, ALL → 60*493.298/(π*0.41) = 22954.7
# Частота вращения РК (рад/с):
ω := 2*π*n/60 = 2403.82
# Ср. окружная скорость потока на входе в РК (м/с):
u_ср1 := π*r_ср1*n/30 explicit, ALL → π*0.08*22954.745/30 = 191.252
# Окружная составляющая абс. скорости потока (м/с):
c_u1 := sqrt(c_1^2 - c_m1^2) explicit, ALL → sqrt(161.516^2 - 146.384^2) = 68.2598
# Окружная составляющая относ. скорости потока (м/с):
w_u1 := u_ср1 - c_u1 explicit, ALL → 191.252 - 68.26 = 122.992
# Относ. скорость потока (м/с):
w_1 := sqrt(w_u1^2 + c_m1^2) explicit, ALL → sqrt(122.992^2 + 146.384^2) = 191.194
# Угол входа в РК:
β_1 := atan(c_m1/w_u1) explicit, ALL → atan(146.384/122.992) = 49.9628 deg
# Температура торможения в относ. движении (К):
T*_w1 := T*_н + (w_1^2 - c_1^2)/(2*Cp) explicit, ALL → 298 + (191.194^2 - 161.516^2)/(2*1006) = 303.203
# Критическая скорость звука в относ. движении (м/с):
a_wкр := sqrt(2*k/(k + 1)*R_г*T*_w1) explicit, ALL → sqrt(2*1.4/(1.4 + 1)*287.4*303.203) = 318.848
# Приведенная скорость в относ. движении:
λ_w1 := w_1/a_wкр explicit, ALL → 191.194/318.848 = 0.599642
# Диапазон приведеной скорости в относ. движении:
λ_w1 < 0.85 = 1
# ГДФ температуры в относ. движении:
τ_w1 := τ_т(λ_w1) = 0.940072
# Статическая температура раб. Т (К):
T_1 := T*_w1*τ_w1 explicit, ALL → 303.203*0.94 = 285.032
# Параметры РК на выходе
# Окружная составляющая относ. скорости раб. Т за РК (м/с):
w_u2 := u_2 - c_u2 explicit, ALL → 493.298 - 393.804 = 99.4941
# Относительная скорость раб. Т за РК(м/с):
w_2 := sqrt(w_u2^2 + с_m2^2) explicit, ALL → sqrt(99.494^2 + 139.064^2) = 170.991
# Торможение относ. скорости:
w_отн2 := w_2/w_1 explicit, ALL → 170.991/191.194 = 0.894332
# Диапазон торможния относ. скорости:
w_отн2 > 0.6 = 1
# Коэф. отвода теплоты через корпус ступени:
α_q := 0.6
# Диапазон коэф. отвода теплоты через корпус ступени:
0.2 ≤ α_q ≤ 0.6 = 1
# Потери на трение диска (Дж/кг):
ΔH_f := α_f*u_2^2 = 9733.7
# Температура раб. Т на выходе из РК (К):
T_2 :=
    T*_н + (w_1^2 - w_2^2 - u_ср1^2 + u_2^2 - c_1^2)/(2*Cp) + (1 - α_q)*ΔH_f/Cp
    T*_2*τ_т(λ_2)
    = 401.104  # ВОТ ВОПРОС
# Температура торможения раб. Т на выходе из РК (К):
T*_2 = 487.802
T*_2 := T_2 + c_2/(2*Cp) explicit, ALL → 401.104 + 417.636/(2*1006) = 401.311
# Приведенная скорость на выходе из РК:
λ_2 := c_2/a_кр2 = 1.03267
# Давление торможения раб. Т на выходе из РК (Па):
P*_2 := P*_1*π*_РК explicit, ALL → 100287.268*4.5 = 451293
# Плотность торможения раб. Т на выходе из РК (кг/м^3):
ρ*_2 := P*_2/(R_г*T*_2) explicit, ALL → 451292.706/(287.4*401.311) = 3.91282
# Статиеское давление раб. Т на выходе из РК (Па):
P_2 := P*_2*π_p(λ_2) explicit, ALL → 451292.706*0.504 = 227512
# Плотность раб. Т на выходе из РК (Па):
ρ_2 := ρ*_2*ε_ρ(λ_2) explicit, ALL → 3.913*0.613 = 2.39896
# Коэф. загромождения на выходе из РК:
μ_2 := sqrt(η*_РК)*τ_т(λ_2)/τ_т(sqrt(η*_РК)*λ_2) = 0.887935
# Высота Л на выходе из РК (м):
b_2 := G/(π*ρ_2*с_m2*D_2*μ_2) = 0.0104726
# Относ. высота Л на выходе из РК:
b_отн2 := b_2/D_2 = 0.0255161
# Профиль РК
# Осевая протяженность крыльчатки (м):
B_кр := (0.1*(1 - D̅) + b_отн2)*D_2 = 0.030994
# Коэф. радиуса внутреннего контура проточной части:
k_r0 := 0.5
# Диапазон коэф. радиуса внутреннего контура проточной части:
0.45 ≤ k_r0 ≤ 0.55 = 1
# Радиус внутреннего контура проточной части (м):
r_0 := k_r0*(D_п1 - D_вт1) = 0.056434
# Коэф. отрезка, сопрягаемого с окружностью большего радиуса r_1 в точке А:
k_l0 := 0.0435
# Диапазон коэф. отрезка,
# сопрягаемого с окружностью большего радиуса r_1 в точке А:
0.043 ≤ k_l0 ≤ 0.44 = 1
# Отрезок, сопрягаемый с окружностью большего радиуса r_1 в точке А (м):
l_0 := k_l0*D_2/D̅ = 0.0357073
γ_2п2 := 10 °
# Вспомогательный отрезок (м):
r_1к := 0.58*D_п1 = 0.119024
# Угол Л на выходе ЗУ:
β_Л.ЗУ :=
    90 ° if 60 ° ≤ β_Л2 ≤ 90 °
    70 ° if 40 ° ≤ β_Л2 ≤ 60 °
    NaN otherwise
    = 90 deg
# Угол атаки:
i := 1.5 °
# Диапазон угла атаки:
0 ° ≤ i ≤ 2 ° = 1
β_Л1 := β_1 + i = 51.4628 deg
# Угол поворота в ЗУ:
Δβ_Л.ЗУ := β_Л.ЗУ - β_Л1 = 38.5372 deg
# Угол поворота, отнесенный к углу поворота осевой решетки единичной густоты:
Δβ_Л.ЗУ.отн := Δβ_Л.ЗУ/(0.38*β_Л.ЗУ) = 64.5619 deg
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# Рисунок 3 - Оптимальная густота решетки ЗУ от относ. угла поворота
# Оптимальная густота решетки ЗУ:
bt_опт := (b/t)опт(Δβ_Л.ЗУ.отн) = 1.30909
# Коэф. осеой протяженности ЗУ:
k_B.ЗУ := 1
# Диапазон коэф. осеой протяженности ЗУ:
0.9 ≤ k_B.ЗУ ≤ 1.1 = 1
# Осевая протяженность ЗУ (м):
B_ЗУ := k_B.ЗУ*bt_опт*2*π*r_ср1/(Z_Л.РК/2)*sin((β_Л1 + β_Л.ЗУ)/2) = 0.04752
# Отношение осевой протяженности ЗУ к относ. диаметру РК на выходе:
B_ЗУ/D_2 = 0.115781
# Диапазон отношения осевой протяженности ЗУ
# к относ. диаметру РК на выходе:
0.15 ≤ B_ЗУ/D_2 ≤ 0.35 = 0
# Длина хорды (м):
b := B_ЗУ/sin(0.5*(β_Л1 + β_Л.ЗУ)) = 0.05034
# Радиус СЛ профиля (м):
R_ср := 0.5*b/sin(0.5*Δβ_Л.ЗУ) = 0.0762734
# Радиус изогнутой пластины (Л) (м):
R_л :=
    0.25*(D_2^2 - D_п1^2)/(D_2*cos(β_Л2)) if β_Л2 < 90 °
    ∞ if β_Л2 == 90 °
    NaN otherwise
    = 0.225003
# Угол установки хорды Л:
υ := (β_Л1 + β_Л.ЗУ)/2 = 70.7314 deg
# Коэф. толщины Л радиальной части РК на периферийном контуре:
k_Δ := 0.015
# Диапазон коэф. толщины Л радиальной части РК
# на периферийном контуре:
0.01 ≤ k_Δ ≤ 0.02 = 1
# Толщина Л радиальной части колеса на периферийном контуре (м):
Δ_2 := k_Δ*D_2 = 0.00615643
# Толщина входной кромки Л (м):
Δ_1 := 0.01*D_п1 = 0.00205214
# Размеры проточной части осерадиального РК ЦБК в СИ
# Втулочный диаметр РК на входе:
D_вт1 = 0.0923465
# Ср. диаметр и радиус РК на выходе:
D_2 = 0.410429
# Периферийный диаметр РК на входе:
D_п1 = 0.205214
# Ср. радиус РК на входе:
r_ср1 = 0.079562
# Вспомогательный отрезок:
r_1к = 0.119024
# Осевая протяженность крыльчатки:
B_кр = 0.030994
# Осевая протяженность ЗУ:
B_ЗУ = 0.04752
# Высота Л на входе в РК:
b_1 = 0.0566495
# Высота Л на выходе из РК:
b_2 = 0.0104726
# Отрезок, сопрягаемый с окружностью большего радиуса r_1 в точке А:
l_0 = 0.0357073
# Радиус внутреннего контура проточной части:
r_0 = 0.056434
# Радиус СЛ профиля:
R_ср = 0.0762734
# Угол поворота в ЗУ:
Δβ_Л.ЗУ = 38.5372 deg
# Угол Л на входе:
β_Л1 = 51.4628 deg
# Толщина Л радиальной части колеса на периферийном контуре:
Δ_2 = 0.00615643
# Толщина входной кромки Л:
Δ_1 = 0.00205214
# Длина хорды:
b = 0.05034
b_Д := 5*10^-3
# Диаметр центрального  отв. (м):
d_о := 20*10^-3
# [area: РК ЦБК]
# Количество сечений:
n_сеч := 9
# Дискритизация сечений:
i_сеч := 1 .. n_сеч
# Радиусы границ (м):
# Толщины границ
# по периферии (м):
# Толщины границ
# по втулке (м):
r[i_сеч] := 0.5*d_о, 0.5*D_вт1, 0.5*D_вт1 + B_ЗУ*tan(γ_2п2), 0.5*(0.5*D_п1 + (0.5*D_вт1 + B_ЗУ*tan(γ_2п2))), 0.5*D_п1, 0.5*(0.5*D_п1 + r_1к), r_1к, 0.5*D_2 - l_0*cos(γ_2п2), 0.5*D_2
h_пер[i_сеч] := B_ЗУ + B_кр + b_Д, B_ЗУ + B_кр + b_Д, B_ЗУ + B_кр + b_Д, B_ЗУ + B_кр + b_Д, B_ЗУ + B_кр + b_Д, 1.25*(B_кр + b_Д), B_кр + b_Д, b_2 + l_0*sin(γ_2п2) + b_Д, b_2 + b_Д
h_вт[i_сеч] := B_ЗУ + B_кр + b_Д, B_ЗУ + B_кр + b_Д, B_кр + b_Д, 0.25*B_кр + b_Д, b_Д, b_Д, b_Д, b_Д, b_Д
h_ср.пер(l) := interp(lspline(r, h_пер), r, h_пер, l)
h_ср.вт(l) := interp(lspline(r, h_вт), r, h_вт, l)
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# [area: Выбор матрериала Д РК]
# Плотность материала (кг/м^3):
ρ := 4500
# Ср. коэф. линейного расширения (град^-1):
α_T := 20*10^-6
# Напряжения на втулке Д (Па):
P_0 := 0
# Количество эксцентричных отв.:
n_экс.отв := 0
# Радиус нахождения эксцентричных отв. (м):
R_экс.отв := 54*10^-3
# Диаметр экцентричных отв. (м):
d_отв := 12*10^-3
# Расстояние между краями отверстий по окружности,
# по которой расположены центры отверстий (м):
b_отв :=
    (2*π*R_экс.отв/n_экс.отв - d_отв) if n_экс.отв ≠ 0
    ∞ otherwise
# Температурные деформации:
# На втулке:
θ_1 := α_T*(T_1 - Т_окр.ср.) explicit, ALL → 20*10^-6*(285.032 - 278.15) = 0.000137644
# На ободе:
θ_2 := α_T*(T_2 - Т_окр.ср.) explicit, ALL → 20*10^-6*(401.104 - 278.15) = 0.00245908
# З-н изменения температурных деформаций по радиусу Д:
θ(r) := θ_1 + (θ_2 - θ_1)*(r - 0.5*d_о)^2/(0.5*D_2 - 0.5*d_о)^2
# З-н изменения температуры по радиусу Д:
T(r) := T_1 + (T_2 - T_1)*((r - 0.5*d_о)/(0.5*D_2 - 0.5*d_о))^2
# З-н изменения физических св-тв Д по его радиусу: | Коэф. Пуассона:
A := [400; 500; 600; 700; 800]
E := 10^11*[1.74; 1.66; 1.57; 1.47; 1.32]
G := 10^9*[62.85; 60.2; 57.25; 54; 49]
μ := E/(2*G) - 1 = [0.384248; 0.378738; 0.371179; 0.361111; 0.346939]
μ(r) := interp(cspline(A, μ), A, μ, T(r))
E(r) := interp(cspline(A, E), A, E, T(r))
# [area: Расчет на прочность Д РК]
A(l) := interp(lspline(r, (h_пер - h_вт)*(Δ_1 + Δ_2)/2), r, (h_пер - h_вт)*(Δ_1 + Δ_2)/2, l)
ρ_прив(r) :=
    (ρ*(1 + side*Z_Л.РК*A(r)/(2*π*r*b_Д))) if r ≠ 0
    ∞ otherwise
# Ср. зн-я радиусов границ (м):
r_ср :=
    for i ∈ 1 .. n_сеч - 1
        r_ср[i] ← 0.5*(r[i] + r[i + 1])
    r_ср
r_ср*10^3 = [28.0866; 50.3628; 66.566; 90.5935; 106.712; 114.92; 144.537; 187.632]
[σI_t, σII_t; σI_r, σII_r] :=
    for i ∈ 1 .. n_сеч - 1
        σI_t[i, i] ←
            400*10^6 if i == 1
            μ(r_ср[i])*h_ср.вт(r[i - 1])/h_ср.вт(r[i])*σI_r[i - 1, i] + E(r_ср[i])/E(r_ср[i - 1])*(σI_t[i - 1, i] - μ(r_ср[i - 1])*σI_r[i - 1, i]) otherwise
        σI_r[i, i] ←
            -P_0 if i == 1
            h_ср.вт(r[i - 1])/h_ср.вт(r[i])*σI_r[i - 1, i] otherwise
        [C_1; C_2] ← 1/2*[
            σI_t[i, i] + σI_r[i, i] + (4 + 4*μ(r_ср[i]))*ρ_прив(r[i])*ω^2*r[i]^2/8 + E(r_ср[i])*θ(r[i]);
            r[i]^2*(σI_t[i, i] - σI_r[i, i] - ((2 - 2*μ(r_ср[i]))*ρ_прив(r[i])*ω^2*r[i]^2/8 - E(r_ср[i])*θ(r[i])))
        ]
        σI_r[i, i + 1] ← C_1 - C_2/r[i + 1]^2 - (3 + μ(r_ср[i]))*ρ_прив(r[i + 1])*ω^2*r[i + 1]^2/8 - E(r_ср[i])/r[i + 1]^2*((θ(r[i]) - (θ(r[i + 1]) - θ(r[i]))/(r[i + 1] - r[i])*r[i])*integral(r, r = r[i] .. r[i + 1]) + (θ(r[i + 1]) - θ(r[i]))/(r[i + 1] - r[i])*integral(r^2, r = r[i] .. r[i + 1]))
        σI_t[i, i + 1] ← C_1 + C_2/r[i + 1]^2 - (1 + 3*μ(r_ср[i]))*ρ_прив(r[i + 1])*ω^2*r[i + 1]^2/8 + E(r_ср[i])/r[i + 1]^2*((θ(r[i]) - (θ(r[i + 1]) - θ(r[i]))/(r[i + 1] - r[i])*r[i])*integral(r, r = r[i] .. r[i + 1]) + (θ(r[i + 1]) - θ(r[i]))/(r[i + 1] - r[i])*integral(r^2, r = r[i] .. r[i + 1])) - E(r_ср[i])*θ(r[i + 1])
    for i ∈ 1 .. n_сеч - 1
        σII_t[i, i] ←
            400*10^6 if i == 1
            μ(r_ср[i])*h_ср.вт(r[i - 1])/h_ср.вт(r[i])*σII_r[i - 1, i] + E(r_ср[i])/E(r_ср[i - 1])*(σII_t[i - 1, i] - μ(r_ср[i - 1])*σII_r[i - 1, i]) otherwise
        σII_r[i, i] ←
            if i == 1
                0 if 0.5*d_о == 0
                σII_t[i, i] otherwise
            h_ср.вт(r[i - 1])/h_ср.вт(r[i])*σII_r[i - 1, i] otherwise
        [C_1; C_2] ← 1/2*[σII_t[i, i] + σII_r[i, i]; r[i]^2*(σII_t[i, i] - σII_r[i, i])]
        σII_r[i, i + 1] ← C_1 - C_2/r[i + 1]^2
        σII_t[i, i + 1] ← C_1 + C_2/r[i + 1]^2
    [σI_t, σII_t; σI_r, σII_r]
# Коэф. Мора:
k_Мор := -σI_r[n_сеч - 1, n_сеч]/σII_r[n_сеч - 1, n_сеч] = 0.153393
[σ_r; σ_t] :=
    for i ∈ 1 .. n_сеч - 1
        σ_r[i, i] ← σI_r[i, i] + k_Мор*σII_r[i, i]
        σ_r[i, i + 1] ← σI_r[i, i + 1] + k_Мор*σII_r[i, i + 1]
        σ_t[i, i] ← σI_t[i, i] + k_Мор*σII_t[i, i]
        σ_t[i, i + 1] ← σI_t[i, i + 1] + k_Мор*σII_t[i, i + 1]
    [σ_r; σ_t]
[σI_r.ср, σII_r.ср, σ_r.ср; σI_t.ср, σII_t.ср, σ_t.ср] :=
    for i ∈ 1 .. n_сеч - 1
        σI_r.ср[i] ←
            σI_r[i, i] if i == 1
            0.5*(σI_r[i - 1, i] + σI_r[i, i]) otherwise
        σI_t.ср[i] ←
            σI_t[i, i] if i == 1
            0.5*(σI_t[i - 1, i] + σI_t[i, i]) otherwise
        σII_r.ср[i] ←
            σII_r[i, i] if i == 1
            0.5*(σII_r[i - 1, i] + σII_r[i, i]) otherwise
        σII_t.ср[i] ←
            σII_t[i, i] if i == 1
            0.5*(σII_t[i - 1, i] + σII_t[i, i]) otherwise
        σ_r.ср[i] ←
            σ_r[i, i] if i == 1
            0.5*(σ_r[i - 1, i] + σ_r[i, i]) otherwise
        σ_t.ср[i] ←
            σ_t[i, i] if i == 1
            0.5*(σ_t[i - 1, i] + σ_t[i, i]) otherwise
    [σI_r.ср[n_сеч], σII_r.ср[n_сеч], σ_r.ср[n_сеч]; σI_t.ср[n_сеч], σII_t.ср[n_сеч], σ_t.ср[n_сеч]] ← [
        σI_r[n_сеч - 1, n_сеч], σII_r[n_сеч - 1, n_сеч], σ_r[n_сеч - 1, n_сеч];
        σI_t[n_сеч - 1, n_сеч], σII_t[n_сеч - 1, n_сеч], σ_t[n_сеч - 1, n_сеч]
    ]
    [σI_r.ср, σII_r.ср, σ_r.ср; σI_t.ср, σII_t.ср, σ_t.ср]
σ_экв :=
    for i ∈ 1 .. n_сеч
        σ_экв[i] ← sqrt(σ_t.ср[i]^2 - σ_t.ср[i]*σ_r.ср[i] + σ_r.ср[i]^2)
    σ_экв
[σ_max; σ_min] := [max(σ_t.ср, σ_r.ср, σ_экв); min(σ_t.ср, σ_t.ср, σ_экв)] = [461357362; -62207102]
σ_экв(l) := interp(lspline(r, σ_экв), r, σ_экв, l)
[σI_t, σI_r; σII_t, σII_r; σ_t, σ_r] :=
    σI_t(l) ← interp(lspline(r, σI_t.ср), r, σI_t.ср, l)
    σII_t(l) ← interp(lspline(r, σII_t.ср), r, σII_t.ср, l)
    σ_t(l) ← interp(lspline(r, σ_t.ср), r, σ_t.ср, l)
    σI_r(l) ← interp(lspline(r, σI_r.ср), r, σI_r.ср, l)
    σII_r(l) ← interp(lspline(r, σII_r.ср), r, σII_r.ср, l)
    σ_r(l) ← interp(lspline(r, σ_r.ср), r, σ_r.ср, l)
    [σI_t, σI_r; σII_t, σII_r; σ_t, σ_r]
# [area: Результаты расчета на прочность]
l := 0.5*d_о, 0.5*d_о + (0.5*D_2 - 0.5*d_о)/N_dis .. 0.5*D_2
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[σ_t(R_экс.отв); σ_r(R_экс.отв)] = [202551265; 200704110]
# Теоретический коэф. концентрации напряжений:
k_T := 3 - d_отв/b_отв - σ_r(R_экс.отв)/σ_t(R_экс.отв) = 2.00912
# Местное окружное напряжение
# заниженное на 10..15 % (Па):
σ_tм := k_T*σ_t(R_экс.отв) = 406949685
# Действительне местное окр. напряжение (Па):
σ_tм := σ_tм*1.15 = 467992137
# [area: Вывод данных для построения Л РК и НА в формате .xlsx]
OUTPUT := 0
ПОЧТА := 10^3*[
    0, 0, 0;
    B_ЗУ, 0, 0;
    B_ЗУ + B_кр, 0, 0;
    B_ЗУ + B_кр, 0.5*D_п1, 0;
    B_ЗУ + B_кр, 0.5*D_2, 0;
    B_ЗУ + B_кр - b_2, 0.5*D_2, 0;
    B_ЗУ + B_кр - b_2 - l_0*sin(γ_2п2), 0.5*D_2 - l_0*cos(γ_2п2), 0;
    B_ЗУ, r_1к, 0;
    0, 0.5*D_п1, 0;
    0, r_ср1, 0;
    0, 0.5*D_вт1, 0
]
ПОЧТА = [
    0, 0, 0;
    47.52, 0, 0;
    78.514, 0, 0;
    78.514, 102.607, 0;
    78.514, 205.214, 0;
    68.0415, 205.214, 0;
    61.841, 170.05, 0;
    47.52, 119.024, 0;
    0, 102.607, 0;
    0, 79.562, 0;
    0, 46.1733, 0
]
output2excel :=
    if OUTPUT == 1
        NameOfFile ← concat(Adress, "ЦБК.xlsx")
        WRITEEXCEL(ПОЧТА, NameOfFile, "A1")
    NaN otherwise
ПОЧТА := 10^3*[
    0, 0.5*D_вт1, 0;
    0, r_ср1, 0;
    0, 0.5*D_п1, 0;
    B_ЗУ, 0.5*D_вт1, b - b*cos(Δβ_Л.ЗУ);
    B_ЗУ, r_ср1, b - b*cos(Δβ_Л.ЗУ);
    B_ЗУ, 0.5*D_п1, b - b*cos(Δβ_Л.ЗУ);
    B_ЗУ + B_кр, 0.5*D_вт1, b - b*cos(Δβ_Л.ЗУ);
    B_ЗУ + B_кр, r_ср1, b - b*cos(Δβ_Л.ЗУ);
    B_ЗУ + B_кр, 0.5*D_п1, b - b*cos(Δβ_Л.ЗУ);
    0.5*Δ_1*sin(Δβ_Л.ЗУ), 0.5*D_вт1, -0.5*Δ_1*cos(Δβ_Л.ЗУ);
    0.5*Δ_1*sin(Δβ_Л.ЗУ), r_ср1, -0.5*Δ_1*cos(Δβ_Л.ЗУ);
    0.5*Δ_1*sin(Δβ_Л.ЗУ), 0.5*D_п1, -0.5*Δ_1*cos(Δβ_Л.ЗУ);
    -0.5*Δ_1*sin(Δβ_Л.ЗУ), 0.5*D_вт1, 0.5*Δ_1*cos(Δβ_Л.ЗУ);
    -0.5*Δ_1*sin(Δβ_Л.ЗУ), r_ср1, 0.5*Δ_1*cos(Δβ_Л.ЗУ);
    -0.5*Δ_1*sin(Δβ_Л.ЗУ), 0.5*D_п1, 0.5*Δ_1*cos(Δβ_Л.ЗУ);
    B_ЗУ, 0.5*D_вт1, b - b*cos(Δβ_Л.ЗУ) - 0.5*Δ_2;
    B_ЗУ, r_ср1, b - b*cos(Δβ_Л.ЗУ) - 0.5*Δ_2;
    B_ЗУ, 0.5*D_п1, b - b*cos(Δβ_Л.ЗУ) - 0.5*Δ_2;
    B_ЗУ, 0.5*D_вт1, b - b*cos(Δβ_Л.ЗУ) + 0.5*Δ_2;
    B_ЗУ, r_ср1, b - b*cos(Δβ_Л.ЗУ) + 0.5*Δ_2;
    B_ЗУ, 0.5*D_п1, b - b*cos(Δβ_Л.ЗУ) + 0.5*Δ_2;
    B_ЗУ + B_кр, 0.5*D_вт1, b - b*cos(Δβ_Л.ЗУ) - 0.5*Δ_2;
    B_ЗУ + B_кр, r_ср1, b - b*cos(Δβ_Л.ЗУ) - 0.5*Δ_2;
    B_ЗУ + B_кр, 0.5*D_п1, b - b*cos(Δβ_Л.ЗУ) - 0.5*Δ_2;
    B_ЗУ + B_кр, 0.5*D_вт1, b - b*cos(Δβ_Л.ЗУ) + 0.5*Δ_2;
    B_ЗУ + B_кр, r_ср1, b - b*cos(Δβ_Л.ЗУ) + 0.5*Δ_2;
    B_ЗУ + B_кр, 0.5*D_п1, b - b*cos(Δβ_Л.ЗУ) + 0.5*Δ_2
]
ПОЧТА = [
    0, 46.1733, 0;
    0, 79.562, 0;
    0, 102.607, 0;
    47.52, 46.1733, 10.9639;
    47.52, 79.562, 10.9639;
    47.52, 102.607, 10.9639;
    78.514, 46.1733, 10.9639;
    78.514, 79.562, 10.9639;
    78.514, 102.607, 10.9639;
    0.639266, 46.1733, -0.802598;
    0.639266, 79.562, -0.802598;
    0.639266, 102.607, -0.802598;
    -0.639266, 46.1733, 0.802598;
    -0.639266, 79.562, 0.802598;
    -0.639266, 102.607, 0.802598;
    47.52, 46.1733, 7.88563;
    47.52, 79.562, 7.88563;
    47.52, 102.607, 7.88563;
    47.52, 46.1733, 14.0421;
    47.52, 79.562, 14.0421;
    47.52, 102.607, 14.0421;
    78.514, 46.1733, 7.88563;
    78.514, 79.562, 7.88563;
    78.514, 102.607, 7.88563;
    78.514, 46.1733, 14.0421;
    78.514, 79.562, 14.0421;
    78.514, 102.607, 14.0421
]
output2excel :=
    if OUTPUT == 1
        NameOfFile ← concat(Adress, "Л ЦБК.xlsx")
        WRITEEXCEL(ПОЧТА, NameOfFile, "A1")
    NaN otherwise
