# Дано
N := 5*10^6
T*_3 := 1300
T*_0 := 423
ε := 0.92
η*_тп := 0.9  # Политропный КПД компрессора:
η*_кп := 0.88
k := 1.64
p*_0 := 3*10^6
C_p := 1038
σ := 0.92
# Отношение граничных температур
υ := T*_3/T*_0 = 3.07329
σ_вх := 0.96
σ_вых := 0.958
# Давление за компрессором:
p*_1(π*_к) := p*_0*σ_вх*π*_к
# Давление перед турбиной:
p*_3(π*_к) := p*_1(π*_к)*σ_вых
π*_т(π*_к) := σ_вых*σ_вх*π*_к
η*_т(π*_к) := (1 - π*_т(π*_к)^((1 - k)/k*η*_тп))/(1 - π*_т(π*_к)^((1 - k)/k))
# КПД компрессора через политропический КПД:
η*_к(π*_к) := (π*_к^((k - 1)/k) - 1)/(π*_к^((k - 1)/(k*η*_кп)) - 1)
# Температура за компрессором:
T*_1(π*_к) := T*_0*(1 + (π*_к^((k - 1)/k) - 1)/η*_к(π*_к))
# Температура за турбиной:
T*_4(π*_к) := T*_3 - (1 - 1/(π*_к*σ_вх*σ_вых)^((k - 1)/k))*T*_3*η*_т(π*_к)
# Температура после регенератора по холодной стороне:
T*_2(π*_к) := ε*T*_4(π*_к) + (1 - ε)*T*_1(π*_к)
# Относительная температура после регенератора:
υ_2(π*_к) := T*_2(π*_к)/T*_0
g' := 0.02
# Относительная работа цикла
L'_ц(π*_к) := (1 - g')*υ*(1 - (π*_к*σ)^((1 - k)/k))*η*_т(π*_к) - (π*_к^((k - 1)/k) - 1)*1/η*_к(π*_к)
# Относительная теплота подведенная в цикл:
Q'_23(π*_к) := (υ - υ_2(π*_к))*(1 - g')
# КПД цикла:
η_ц(π*_к) := L'_ц(π*_к)/Q'_23(π*_к)
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π*_к := 2.15
# Удельная работа цикла:
L_ц(π*_к) := C_p*T*_0*L'_ц(π*_к)
# Механический и электромагнитный КПД:
η_м := 0.92
η_г := 0.97
# Потребный расход рабочего тела через компрессор ЗГТУ составит:
G(π*_к) := N/(L_ц(π*_к)*η_м*η_г)
L_ц(2.15) = 104243
# Расход воздуха при входе в турбину:
G_т(π*_к) := (1 - g')*G(π*_к)
# Работа турбины
L_т(π*_к) := C_p*T*_3*(1 - π*_т(π*_к)^((1 - k)/k))*η*_т(π*_к)
# Зададимся осевой скоростью: | Лопаточный КПД:
c_та := 120
η_л := 0.9
# Располагаемый теплоперепад:
H_т(π*_к) := (L_т(π*_к) + c_та^2/2)/η_л
# Статическое давление за турбиной:
p_4(π*_к) := p*_3(π*_к)*(1 - H_т(π*_к)/(C_p*T*_3))^(k/(k - 1))
# Статическая температура за турбиной:
T_4(π*_к) := T*_3 - H_т(π*_к)*η_л/C_p
# Степень понижения давления в турбине (торможение к статическому):
π_т(π*_к) := p*_3(π*_к)/p_4(π*_к)
# Газовая постоянная для неона:
R := C_p*(k - 1)/k
# Удельный объем:
ν_4(π*_к) := R*T_4(π*_к)/p_4(π*_к)
π*_к := 2.15 = 2.15
p_4(2.15) = 2911298
# Площадь кольцевого сечения за турбиной:
G(π*_к) = 53.7479
T_4(π*_к) = 1016.25
A_4(π*_к) := G_т(π*_к)*ν_4(π*_к)/c_та
ν_4(2.15) = 0.1414
# Лопатки будут изготовлены из титана, поэтому
A_4(π*_к) = 0.0620662
1/0.138 = 7.24638
σ_л := 200
# Коэффициент пропорциональности:
k_n := 6.8*10^-6
# Максимальная частота вращения ротора:
n_тmax(π*_к) := sqrt(σ_л/(k_n*A_4(π*_к)))
n_тmax(π*_к) = 21768.7
# Частота вращения ротора:
U_к := 450
n_т := 12000
# Плотность по параметрам торможения на входе в турбину
ρ*_3(π*_к) := p*_3(π*_к)/(R*T*_3)
# Объемный расход на входе в рабочее колесо:
V_1(π*_к) := G(π*_к)/ρ*_3(π*_к)
# Коэффициент быстроходности:
n_s(π*_к) := n_т*sqrt(V_1(π*_к))/H_т(π*_к)^0.75
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# Диаметр рабочего колеса:
D_k(π*_к) := 60*U_к/(3.14*n_т)
# Условный диаметр:
D_s(π*_к) := D_k(π*_к)*H_т(π*_к)^0.25/sqrt(V_1(π*_к))
n_s(1.75) = 3.07026
D_s(1.75) = 5.73143
# Полный располагаемый теплоперепад:
H_0(π*_к) := R*k/(k - 1)*T*_3*(1 - π_т(π*_к)^((1 - k)/k))
# Располагаемый теплоперепад по параметрам торможения:
H*_0(π*_к) := R*k/(k - 1)*T*_3*(1 - π*_т(π*_к)^((1 - k)/k))
H_т(2) = 296897
H_0(2) = 296897
H*_0(2.15) = 315213
π*_к := 2.15
# Расчет центростремительной турбины
# Коэффициент скорости в СА:
φ := 0.96
# Коэффициент скорости в РК
ψ := 0.85
# Cтепень радиальности:
μ := 0.4
# Угол выхода потока из СА:
α_1 := 20*π/180
# Угол выхода потока из РК:
β_2 := 32*π/180
# Условная адиабатная скорость:
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c_0(π*_к) := sqrt(2*H_0(π*_к))
# Оптимальные значения:
m_опт := 1/ψ^2*(1 - sqrt(μ^2*(1 - φ^2)*(1 - cos(β_2)^2*ψ^2)/(cos(α_1)^2*φ^2 + μ^2*(1 - φ^2)))) = 1.26589
m := m_опт - 0.0475
u1/c0опт := ψ/sqrt(μ^2*(cos(β_2)^2/m^2 - ψ^2) + (1 - m^2*ψ^4)*φ^2*cos(α_1)^2/(m^2*ψ^2*(1 - φ^2))) = 0.580991
u1/c0 := u1/c0опт - 0.065
ρ_опт := 1 - ((1 - m*ψ^2)*φ*cos(α_1)*u1/c0/(m*ψ^2*(1 - φ^2)))^2
ρ := ρ_опт = 0.348055
# Окружная скорость при входе в РК:
u_1(π*_к) := c_0(π*_к)*u1/c0
# При выходе из РК на среднем диаметре скорость:
u_2(π*_к) := μ*u_1(π*_к)
# При выбранной частоте вращения ротора диаметр РК:
D_1(π*_к) := u_1(π*_к)*60/(π*n_т)
# Средний диаметр при выходе из РК:
D_2(π*_к) := μ*D_1(π*_к)
# Действительная скорость истечения из СА:
c_1(π*_к) := φ*sqrt((1 - ρ)*H_0(π*_к))
T*_0 := T*_3
# Температура перед РК:
T_1(π*_к) := T*_0 - c_1(π*_к)^2/(2*C_p)
# Температура конца адиабатного расширения в СА:
T'_1(π*_к) := T*_0 - (1 - ρ)*H_0(π*_к)/C_p
# Давление перед РК:
p*_0 := p*_3(π*_к)
p_1(π*_к) := p*_0*(T'_1(π*_к)/T*_0)^(k/(k - 1))
# Удельный объем перед РК:
ν_1(π*_к) := R*T_1(π*_к)/p_1(π*_к)
# Длина лопаток на выходе из СА:
l_1(π*_к) := G_т(π*_к)*ν_1(π*_к)/(π*D_1(π*_к)*c_1(π*_к)*sin(α_1))
# Площадь кольцевого сечения перед РК:
A_1a(π*_к) := π*D_1(π*_к)*l_1(π*_к)
# Средняя осевая скорость перед РК:
c_1a(π*_к) := G_т(π*_к)*ν_1(π*_к)/A_1a(π*_к)
# Относительная скорость при входе в РК определяется из треугольника скоростей:
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w_1(π*_к) := sqrt(c_1(π*_к)^2 + u_1(π*_к)^2 - 2*u_1(π*_к)*c_1(π*_к)*cos(α_1))
# Средний угол входа потока на лопатки РК:
β_1(π*_к) := acot((c_1(π*_к)*cos(α_1) - u_1(π*_к))/c_1a(π*_к))
β_1(2.05)/deg = 90.2882
# Окружная составляющая скорости при входе в РК:
c_1u(π*_к) := w_1(π*_к)*cos(β_1(π*_к)) - u_1(π*_к)
# Располагаемый теплоперепад в РК при заданном противподавлении p2:
p_2 := p_4(π*_к)
H_л(π*_к) := R*k/(k - 1)*T_1(π*_к)*(1 - (p_2/p_1(π*_к))^((k - 1)/k))
w_2(π*_к) := ψ*sqrt(w_1(π*_к)^2 + 2*H_л(π*_к) + (u_2(π*_к)^2 - u_1(π*_к)^2))
# Температура газа за РК:
T_2(π*_к) := T_1(π*_к) - (w_2(π*_к)^2 - w_1(π*_к)^2)/(2*C_p) + (u_2(π*_к)^2 - u_1(π*_к)^2)/(2*C_p)
# Температура конца адиабатного расширения в РК:
T'_2(π*_к) := (T_1(π*_к) - ((w_2(π*_к)/ψ)^2 - w_1(π*_к)^2)/(2*C_p)) + (u_2(π*_к)^2 - u_1(π*_к)^2)/(2*C_p)
# Давление за колесом при заданном значении теплоперепада:
p_2(π*_к) := p_1(π*_к)*(T'_2(π*_к)/T_1(π*_к))^(k/(k - 1))
# Удельный объем газа за РК:
ν_2(π*_к) := R*T_2(π*_к)/p_2(π*_к)
# Длина лопаток при выходе из РК при выбранном значении угла β2:
l_2(π*_к) := G_т(π*_к)*ν_2(π*_к)/(π*D_2(π*_к)*w_2(π*_к)*sin(β_2))
# Площадь кольцевого сечения за РК
A_2a(π*_к) := π*D_2(π*_к)*l_2(π*_к)
# Осевая скорость газа за колесом:
c_2a(π*_к) := G_т(π*_к)*ν_2(π*_к)/A_2a(π*_к)
# Окружная составляющая скорости потока за РК:
c_2a(2.15) = 160.833
c_2u(π*_к) := w_2(π*_к)*cos(β_2) - u_2(π*_к)
# Угол, определяющий величину и направление закрутки потока за РК:
α_2(π*_к) := acot(c_2u(π*_к)/c_2a(π*_к))
# Скорость газа за рабочим колесом:
c_2(π*_к) := sqrt(c_2a(π*_к)^2 + c_2u(π*_к)^2)
# Удельная работа на окружности колеса:
L_u(π*_к) := (c_1(π*_к)^2 - c_2(π*_к)^2)/2 + (w_2(π*_к)^2 - w_1(π*_к)^2)/2 + (u_1(π*_к)^2 - u_2(π*_к)^2)/2
# КПД на окружности колеса
η_u(π*_к) := L_u(π*_к)/H_0(π*_к)
# Температура торможения за рабочим колесом:
T*_2(π*_к) := T_2(π*_к) + c_2(π*_к)^2/(2*C_p)
# Давление торможения за колесом при заданном значении теплоперепада:
p*_2(π*_к) := p_2(π*_к)*(T*_2(π*_к)/T_2(π*_к))^(k/(k - 1))
# Работа на окружности колеса меньше располагаемого теплоперепада на величину потерь энергии в проточной части и потери могут быть оценены так называемым КПД на окружности колеса
# Удельные потери в сопловом аппарате
h_с(π*_к) := (φ^-2 - 1)*c_1(π*_к)^2/2
# Удельные потери в лопатках:
h_л(π*_к) := (ψ^-2 - 1)*w_2(π*_к)^2/2
# Удельные потери с выходной скоростью:
h_в(π*_к) := c_2(π*_к)^2/2
# Тогда КПД на окружности колеса:
η_u(π*_к) := 1 - (h_с(π*_к) + h_л(π*_к) + h_в(π*_к))/H_0(π*_к)
# Удельные потери в радиальном зазоре:
h_з(π*_к) := 1.8*1*10^-3*H_0(π*_к)
# Затраты мощности на трение полузакрытого диска могут быть оценены по формуле
N_тр(π*_к) := 4.5*D_1(π*_к)^2*(u_1(π*_к)/100)^3*1000/ν_1(π*_к)
# Удельные потери на трение диска:
H_тр(π*_к) := N_тр(π*_к)/H_0(π*_к)
# Мощностной КПД:
η_т(π*_к) := 1 - (1 - ρ)*(1 - φ^2) - h_л(π*_к)/H_0(π*_к) - c_2(π*_к)^2/(2*H_0(π*_к)) - H_тр(π*_к)/H_0(π*_к) - 1.8*5*10^-3
# Удельная работа ступени:
L_т(π*_к) := H_0(π*_к)*η_т(π*_к)
# Температура за ступенью:
T_ст(π*_к) := T_2(π*_к) + h_з(π*_к)/C_p + H_тр(π*_к)/C_p
# Температура торможения за ступенью:
T*_ст(π*_к) := T_ст(π*_к) + c_2(π*_к)^2/(2*C_p)
# Давление торможения за ступенью:
p*_ст(π*_к) := p_2(π*_к)*(T*_ст(π*_к)/T_ст(π*_к))^(k/(k - 1))
# Располагаемый теплоперепад по параметрам торможения:
H*_0(π*_к) := C_p*T*_0*(1 - (p*_ст(π*_к)/p*_3(π*_к))^((k - 1)/k))
# КПД турбины по параметрам торможения:
η*_т(π*_к) := L_т(π*_к)/H*_0(π*_к)
# Мощность турбины:
η*_т(2.15) = 0.874449
N(π*_к) := G_т(π*_к)*L_т(π*_к)*η_м
N(2.15) = 13222993
