# ВВЕДЕНИЕ
# 1. Техническое задание
# Физические характеристики рабочего тела - воздуха
# показатель изоэнтропы k := 1.4, газовая постоянная R := 287.4 Дж/(моль*К)(теплоемкость
# c_p := 1006  Дж/(кг*К); коэффициент динамической вязкости μ_г0 := 17.16*10^-6 Н*с/м^2 при
# T_00 := 273 К, коэффициент m := 0.68:
# Газодинамические параметры. Массовой расход рабочего тела G := 10 кг/с, параметры заторможенного потока при входе: давление p*_0 := 0.1013*10^6 Па, температура T*_0 := 300 К; степень повышения давления по заторможенным параметрам π*_к := 3; ожидамемый политропический КПД η*_п := 0.87; частатота вращения ротора n := 15000 об/мин
# Компрессор - транспортный, с осевым входом, безлопаточным и лопаточным диффузором. Выходное устройство - сборная однозаходная улитка.
# 2. Поэлементный расчет проточной части по средней линии тока
# Некоторые необходимые для расчёта зависимости
# Газодинамические функции
τ(λ) := 1 - (k - 1)/(k + 1)*λ^2  # ГДФ температуры
π(λ) := (1 - (k - 1)/(k + 1)*λ^2)^(k/(k - 1))  # ГДФ давления
ε(λ) := (1 - (k - 1)/(k + 1)*λ^2)^(1/(k - 1))  # ГДФ плотности
q(λ) := ((k + 1)/2)^(1/(k - 1))*λ*(1 - (k - 1)/(k + 1)*λ^2)^(1/(k - 1))  # ГДФ расхода
# Расчет производится при заданных.
# Они определены ниже глобально с целью упрощения их варьирования.
α_1 = 90 deg
β_2л = 67 deg
d_отн = 0.35
c'_2m0 = 0.44
# 2.1 Рабочее колесо и входное устройство
k_m := 1
# Физический коэффициент расхода
c'_2m := c'_2m0*sin(β_2л) = 0.405022
z_рк0 := 26
# Фактическое число лопаток
z_рк := z_рк0*sin(β_2л) explicit, ALL → 26*sin(67*deg) = 23.9331
z_рк :=
    round(z_рк) if mod(round(z_рк), 2) == 0
    (round(z_рк) + 1) otherwise
    = 24
# Относительный средний диаметр на входе в рабочее колесо
d'_1ср := sqrt(0.5*(1 + d_отн^2)) explicit, ALL → sqrt(0.5*(1 + 0.35^2)) = 0.749166
r'_1cp := d'_1ср = 0.749166
# Коэффициент скольжения
σ_υ := 1 - sqrt(sin(β_2л))/z_рк^0.7 explicit, ALL → 1 - sqrt(sin(67*deg))/24^0.7 = 0.896279
# Коэффициент уменьшения подведенной работы за счет конечного числа лопаток
μ_oo := (σ_υ - c'_2m0*cos(β_2л))/(1 - c'_2m0*cos(β_2л)) explicit, ALL → (0.896 - 0.44*cos(67*deg))/(1 - 0.44*cos(67*deg)) = 0.874745
# Задаемся в первом приближении коэффициентом затраченной работы на трение диска и D_отн ,
# который затем уточним
α_тр.д = 0.03
D_отн = 0.56
# Коэффициент эффективности напора
H'_k := μ_oo + α_тр.д - c'_2m*(μ_oo/tan(β_2л) + D_отн*d'_1ср*1/(tan(α_1)*k_m))
H'_k explicit, ALL → 0.875 + 0.03 - 0.405*(0.875/tan(67*deg) + 0.56*0.749*1/tan(90*deg)) = 0.754358
# И будем уточнять полученное значение в процессе расчёта по уравнению баданса мощности.
# Адиабатический КПД компрессора
η*_к := (π*_к^((k - 1)/k) - 1)/(π*_к^((k - 1)/(k*η*_п)) - 1) explicit, ALL → (3^((1.4 - 1)/1.4) - 1)/(3^((1.4 - 1)/(1.4*0.87)) - 1) = 0.848717
# Адиабатический напор ступени
H*_кs := c_p*T*_0*(π*_к^((k - 1)/k) - 1) explicit, ALL → 1006*300*(3^((1.4 - 1)/1.4) - 1) = 111285  # Дж/кг
H*'_кs := H'_k*η*_к explicit, ALL → (0.875 + 0.03 - 0.405*(0.875/tan(67*deg) + 0.56*0.749*1/tan(90*deg)))*0.849 = 0.640236
# Окружная скорость на выходе из колеса
u_2 := sqrt(H*_кs/H*'_кs) explicit, ALL → sqrt(1.1*10^5/0.6) = 416.916  # м/с
# Эффективный напор ступени
H_k := H*_кs/η*_к explicit, ALL → 1.113*10^5/0.849 = 131122  # Дж/кг
# Меридиональная скорость на выходе из колеса
c_2m := c'_2m*u_2 explicit, ALL → 0.405*416.916 = 168.86  # м/с
# На входе в колесо
c_1m := c_2m/k_m explicit, ALL → 168.86/1 = 168.86  # м/с
# Скорость на входе в колесо
c_1 := c_1m/sin(α_1) explicit, ALL → 168.86/sin(90*deg) = 168.86  # м/с
# Задаемся углом
γ_1 = 5 deg
# Осевая скорость на входе в колесо
c_1a := c_1m*cos(γ_1) explicit, ALL → 168.86*cos(5*deg) = 168.218  # м/с
# Окружная скорость на входе в колесо
c_1u := c_1m*cot(α_1) explicit, ALL → 168.86*cot(90*deg) = 1.03397e-14  # м/с
# Значение приведенной скорости на входе в колесо на среднем сечении
a_кр1 := sqrt(2*k/(k + 1)*R*T*_0) explicit, ALL → sqrt(2*1.4/(1.4 + 1)*287.4*300) = 317.159  # м/с
λ_1 := c_1/a_кр1 explicit, ALL → 168.86/317.159 = 0.532415
# Коэффициент потерь входного устройства
ξ_н.а. := 0.01 + 1/2*((90 - α_1/deg)/100)^2 explicit, ALL → 0.01 + 1/2*((90 - 90*deg/deg)/100)^2 = 0.01
ξ_вх.п := 0.03  # Определяется формой патрубка
ξ_вх.у := (ξ_вх.п*(c_1m/c_1)^2 + ξ_н.а.) explicit, ALL → 0.03*(168.86/168.86)^2 + 0.01 = 0.04
# Коэффициент потерь полного давления
σ_вх.у := 1/(1 + ξ_вх.у*k/(k + 1)*λ_1^2*ε(λ_1)) explicit, ξ_вх.у, k, λ_1 → 1/(1 + 0.04*1.4/(1.4 + 1)*0.532^2*ε(0.532)) = 0.994174
# Заторможенные и статические плотности, температуры и давления на входе в РК
p*_1 := p*_0*σ_вх.у explicit, ALL → 0.101*10^6*0.994 = 100710  # Па
p_1 := p*_1*π(λ_1) explicit, λ_1, p*_1 → 1.007*10^5*π(0.532) = 85017.3  # Па
T*_1 := T*_0 = 300  # К
T_1 := T*_1*τ(λ_1) explicit, T*_1, λ_1 → 300*τ(0.532) = 285.827  # К
ρ*_1 := p*_1*σ_вх.у/(R*T*_1) explicit, ALL → 1.007*10^5*0.994/(287.4*300) = 1.16125  # кг/м^3
ρ_1 := ρ*_1*ε(λ_1) explicit, ρ*_1, λ_1 → 1.161*ε(0.532) = 1.02892  # кг/м^3
# Площадь входа в колесо
K_G1 := 1 - 0.5*ξ_вх.у explicit, ALL → 1 - 0.5*0.04 = 0.98
F_1a := G/(ρ_1*c_1a*K_G1) explicit, ALL → 10/(1.029*168.218*0.98) = 0.0589552  # м^2
# Периферийный диаметр
D_1п := sqrt(4*F_1a/(π*(1 - d_отн^2))) explicit, ALL → sqrt(4*0.059/(π*(1 - 0.35^2))) = 0.292478  # м
# Средний диаметр на входе в колесо
D_1ср := D_1п*r'_1cp explicit, ALL → 0.292*0.749 = 0.219114  # м
# Втулочный диаметр
D_1вт := D_1п*d_отн explicit, ALL → 0.292*0.35 = 0.102367  # м
# Высота лопатки на входе в колесо
h_1 := 1/2*(D_1п - D_1вт) explicit, ALL → 1/2*(0.292 - 0.102) = 0.0950552  # м
# Диаметр на выходе из колеса
D_2 := 60*u_2/(π*n) explicit, ALL → 60*416.916/(π*1.5*10^4) = 0.530834  # м
# Относительный диаметр
D_отн := D_1п/D_2 explicit, ALL → 0.292/0.531 = 0.550978
# Окружная скорость концов лопаток на входе в колесо
u_1п := D_отн*u_2 explicit, ALL → 0.6*416.9 = 229.711  # м/с
# Окружная скорость на среднем сечении
u_1ср := r'_1cp*u_1п explicit, ALL → 0.7*229.7 = 172.092  # м/с
# Окружная скорость в относительном движении
w_1u := (u_1ср - c_1u) explicit, ALL → 172.092 - 0 = 172.092  # м/с
# Скорость в относительном движении
w_1 := sqrt(c_1m^2 + w_1u^2) explicit, ALL → sqrt(168.86^2 + 172.092^2) = 241.1  # м/с
Угол
β_1 := asin(c_1m/w_1) explicit, ALL → asin(168.86/241.1) = 44.4569 deg
# Окружная и меридиональная скорость на периферийном сечении
c_1m.п := c_1m = 168.86  # м/с  # осевой вход или с_mr=const
c_1u.п := c_1u*D_1ср/D_1п explicit, ALL → 0*0.219/0.292 = 7.74616e-15  # м/с
# Окружная скорость в относительном движении в периферийном сечении
w_1u.п := (u_1п - c_1u.п) explicit, ALL → 229.711 - 0 = 229.711  # м/с
# Относительная скорость на входе в периферийном сечении
w_1.п := sqrt(c_1m.п^2 + w_1u.п^2) explicit, ALL → sqrt(168.86^2 + 229.711^2) = 285.098  # м/с
угол
β_1.п := atan(c_1m.п/w_1.п) explicit, ALL → atan(168.86/285.098) = 30.6377 deg
# Температура торможения в относительном движении
T*_w1 := T*_1 + w_1^2/(2*c_p) explicit, ALL → 300 + 241.1^2/(2*1.006*10^3) = 328.891  # К
# Приведенная скорость в относительном движении
a_крw1 := sqrt(2*k/(k + 1)*R*T*_w1) explicit, ALL → sqrt(2*1.4/(1.4 + 1)*287.4*328.891) = 332.08  # м/с
λ_w1 := w_1/a_крw1 explicit, ALL → 241.1/332.08 = 0.726031
# Температура торможения в относительном движении в периферийном сечении
T*_w1.п := (T_1 + w_1.п^2/(2*c_p)) explicit, ALL → 285.827 + 285.098^2/(2*1.006*10^3) = 326.225  # К
# Приведенная скорость в относительном движении в периферийном сечении
a_крw1.п := sqrt(2*k/(k + 1)*R*T*_w1.п) explicit, ALL → sqrt(2*1.4/(1.4 + 1)*287.4*326.225) = 330.731  # м/с
λ_w1.п := w_1.п/a_крw1.п explicit, ALL → 285.098/330.731 = 0.862024
# Окружная составляющая скорости на выходе из колеса
c_2u := μ_oo*(u_2 - c_2m*cot(β_2л)) explicit, ALL → 0.875*(416.916 - 168.86*cot(67*deg)) = 301.996  # м/с
# Скорость на выходе из колеса
с_2 := sqrt(c_2u^2 + c_2m^2) explicit, ALL → sqrt(301.996^2 + 168.86^2) = 345.999  # м/с
угол
α_2 := atan(c_2m/c_2u) explicit, ALL → atan(168.86/301.996) = 29.2116 deg
# Окружная скорость в относительном движении
w_2u := (u_2 - c_2u) explicit, ALL → 416.916 - 301.996 = 114.92  # м/с
# Скорость на выходе из колеса в относительном движении
w_2 := sqrt(w_2u^2 + c_2m^2) explicit, ALL → sqrt(114.92^2 + 168.86^2) = 204.255  # м/с
# Коэффициент торможения для среднего сечения
w'_2 := w_2/w_1 explicit, ALL → 204.255/241.1 = 0.84718
# Коэффициент торможения  для периферийного сечения
w'_2.п := w_2/w_1.п explicit, ALL → 204.255/285.098 = 0.716439
# Работа трения диска
L_тр.д := α_тр.д*u_2^2 explicit, ALL → 0.03*416.916^2 = 5214.57  # Дж/кг
# Коэффициент ψ = integral(c_1u*u_1, G = r_1вт .. r_1п)/(c_1u*u_1ср*G)
#
# в первом приближении считаем ψ := 1
# Теоретическая или затраченная работа
H_т := (c_2u*u_2 - c_1u*u_1ср*ψ) explicit, ALL → 301.996*416.916 - 0*172.092 = 125907  # Дж/кг
# Работа колеса
L_к := H'_k*u_2^2 explicit, ALL → (0.875 + 0.03 - 0.405*(0.875/tan(67*deg) + 0.56*0.749*1/tan(90*deg)))*416.916^2 = 131122  # Дж/кг
# Температура торможения на выходе из колеса
α_q := 0.2
T*_2 := (T*_1 + (L_к - α_q*L_тр.д)/c_p) explicit, ALL → 300 + (1.311*10^5 - 0.2*5.215*10^3)/(1.006*10^3) = 429.303  # К
# Приведенная скорость
α_кр2 := sqrt(2*k/(k + 1)*R*T*_2) explicit, ALL → sqrt(2*1.4/(1.4 + 1)*287.4*429.303) = 379.401  # м/с
λ_2 := с_2/α_кр2 explicit, ALL → 345.999/379.401 = 0.911962
# Статическая температура
T_2 := T*_2*τ(λ_2) explicit, T*_2, λ_2 → 429.303*τ(0.912) = 369.796  # К
# Пусть угол β_1л := (β_1 + 1.5 deg) explicit, ALL → 0.776 + 1.5*deg = 45.9569 deg
# Профильные потери в РК
ξ_рк.пр0 := (0.08 + 0.35*sin(β_2л - β_1л)^4) explicit, ALL → 0.08 + 0.35*sin(67*deg - 0.802)^4 = 0.0858181
ξ_рк.пр := ξ_рк.пр0*(1 + 4.2*(λ_w1 - 0.6)^2) if λ_w1 ≥ 0.6
ξ_рк.пр0 otherwise
explicit, ALL → 0.086*(1 + 4.2*(0.726 - 0.6)^2) = 0.0915432
ΔH_рк.пр := 0.5*ξ_рк.пр*w_1^2 explicit, ALL → 0.5*0.092*241.1^2 = 2660.68  # Дж/кг
# Потери в зазоре
Δ_2 := (0.3 + 2*(D_2 - 0.1))*10^-3 explicit, ALL → (0.3 + 2*(0.531 - 0.1))*10^-3 = 0.00116167  # м
# Высота лопатки на выходе из колеса, задаёмся
b_2 := 0.02  # м
# Потери в зазоре
ΔH_рк.заз. := 0.2*H_т*Δ_2/b_2 explicit, ALL → 0.2*1.259*10^5*1.162*10^-3/0.02 = 1462.62  # Дж/кг
# Потери в РК
ΔH_рк := ΔH_рк.пр + ΔH_рк.заз. explicit, ALL → 2.661*10^3 + 1.463*10^3 = 4123.3  # Дж/кг
H_э := c_2u*u_2 - c_1u*u_1ср = 125907
H*_п.рк := H_э - ΔH_рк = 121784
H_п.рк := H*_п.рк - 0.5*(с_2^2 - c_1^2) = 76182.9
ΔH_f := L_тр.д = 5214.57
η*_п.рк := 1 - (ΔH_рк + ΔH_f)/H_k = 0.928785
K_G2 := sqrt(η*_п.рк)*τ(λ_2)/τ(λ_2*sqrt(η*_п.рк)) = 0.952816
# Показатель политропы в РК
А_рк := (k/(k - 1) - (ΔH_рк + (1 - α_q)*L_тр.д)/(R*(T_2 - T_1))) explicit, ALL → 1.4/(1.4 - 1) - (4.123*10^3 + (1 - 0.2)*5.215*10^3)/(287.4*(369.796 - 285.827)) = 3.15628
n_рк := А_рк/(А_рк - 1) explicit, ALL → 3.156/(3.156 - 1) = 1.46376
# Параметры воздуха на выходе из рабочего колеса
p_2 := p_1*(T_2/T_1)^А_рк explicit, ALL → 8.502*10^4*(369.796/285.827)^3.156 = 191676  # Па
p*_2 := p_2/π(λ_2) explicit, p_2, λ_2 → 1.917*10^5/π(0.912) = 323126  # Па
ρ_2 := ρ_1*(T_2/T_1)^(А_рк - 1) explicit, ALL → 1.029*(369.796/285.827)^(3.156 - 1) = 1.793  # кг/м^3
ρ*_2 := ρ_2/ε(λ_2) explicit, ρ_2, λ_2 → 1.793/ε(0.912) = 2.60366  # кг/м^3
π*_рк := p*_2/p*_1 explicit, ALL → 3.231*10^5/(1.007*10^5) = 3.20849
# Работая сжатия колеса
H*_ркs := c_p*T*_0*(π*_рк^((k - 1)/k) - 1) explicit, ALL → 1.006*10^3*300*(3.208^((1.4 - 1)/1.4) - 1) = 119292  # Дж/кг
# Затраченная работа
L_рк := (H_т + L_тр.д) explicit, ALL → 1.259*10^5 + 5.215*10^3 = 131122  # Дж/кг
# КПД колеса
η*_рк := H*_ркs/L_рк explicit, ALL → 1.193*10^5/(1.311*10^5) = 0.909778
# Уточненное значение высоты лопатки на выходе из РК, с учетом коэффициента загромождения
b_2 := G/(π*ρ_2*c_2m*D_2*K_G2) explicit, ALL → 10/(π*1.793*168.86*0.531*0.953) = 0.0207862  # м
# Относительная высота лопатки на выходе
5/150 = 0.0333333
b'_2 := b_2/D_2 explicit, ALL → 0.021/0.531 = 0.0391576
b_2*1000 = 20.7862  # мм
17/557 = 0.0305206
# Коэффициент дисковых потерь
15/533 = 0.0281426
7.6/300 = 0.0253333
α_тр.д1 := 0.0015*1/(π*b'_2*c'_2m) explicit, ALL → 1.5*10^-3*1/(π*0.039*0.405) = 0.0301056
(α_тр.д - α_тр.д1)/α_тр.д explicit, ALL → (0.03 - 0.03)/0.03 = -0.351848 %
35/480 = 0.0729167
# Параметры, определяемые глобально:
α_тр.д ≡ 0.03
D_отн = 0.550978
α_1 ≡ 90 deg
β_2л ≡ 67 deg
γ_1 ≡ 5*deg
α_тр.д1*1000 = 30.1056  # ываываыва
D_отн ≡ 0.56
ваыва
d_отн ≡ 0.35
c'_2m0 ≡ 0.44
# ывавыаавыв
выфаыва
# Критерий Рейнольдса по скорости u_2 | выаываываы
μ_2 := μ_г0*(T_2/T_00)^0.68 explicit, ALL → 17.16*10^-6*(369.796/273)^0.68 = 2.10931e-5  # Н*с/м^2
Re_u2 := ρ_2*D_2*u_2/μ_2 explicit, ALL → 1.793*0.531*416.916/(2.109*10^-5) = 18812505
η'_PK.Re := 1
log(Re_u2) = 7.27445  # , следовательтно
D_1вт/D_1п = 0.35
α_1 = 90 deg
β_1л = 45.9569 deg
D_1вт = 0.102367
α_2 = 29.2116 deg
β_2л = 67 deg
D_1п = 0.292478
D_1п/D_2 = 0.550978
β_1 = 44.4569 deg
D_1ср = 0.219114
b_2 = 0.0207862
D_2 = 0.530834
Φ_0 := 4*G/(π*ρ*_1*D_2^2*u_2*sin(β_2л)) explicit, ALL → 4*10/(π*1.161*0.531^2*416.916*sin(67*deg)) = 0.101389
Φ_0*100 = 10.1389
# Значит ступень среднерасходная, будем проектировать колесо осерадиальной формы.
# Поправок на КПД не требуется
# 2.2 Безлопаточный диффузор
# Задаваемые параметры БЛД:
α_3 := α_2 = 29.2116 deg
D'_БЛД := 1.05
ρ_3 := ρ_2 = 1.793  # кг/м^3
b_3 := b_2 = 0.0207862  # м
K_G3 := K_G2 = 0.952816
D_3 := D_2*D'_БЛД = 0.557376  # м
# В первом приближении примем скорость и плотность на выходе:
c_3 := G/(π*ρ_3*D_3*b_3*sin(α_3)*K_G3) explicit, ALL → 10/(π*1.793*0.557*0.021*sin(0.51)*0.953) = 329.523  # м/с
# в перрвом приближенииq_блд := 0 - нет теплоотвода от стенок БЛД
# Температура торможения на входе в БЛД
T*_3 := T*_2 - q_блд/c_p explicit, ALL → 429.303 - 0/(1.006*10^3) = 429.303  # К
# Статическая температура
T_3 := T*_2 - c_3^2/(2*c_p) explicit, ALL → 429.303 - 329.523^2/(2*1.006*10^3) = 375.334  # К
# Критерий Рейнольдса по скорости потока за  колесом
Re_c2 := 2*ρ_2*с_2*b_2/μ_2 explicit, ALL → 2*1.793*345.999*0.021/(2.109*10^-5) = 1222698
# Приведенная скорость на выходе из БЛД
α_кр3 := sqrt(2*k/(k + 1)*R*T*_3) explicit, ALL → sqrt(2*1.4/(1.4 + 1)*287.4*429.303) = 379.401
λ_3 := c_3/α_кр3 explicit, ALL → 329.523/379.401 = 0.868535
# Коэффициент трения в БЛД
λ_БЛД := 0.5/(Re_c2^0.2*τ(λ_2)^0.45) explicit, Re_c2, λ_2 → 0.5/((1.223*10^6)^0.2*τ(0.912)^0.45) = 0.0324091
# Потери в БЛД
ΔH_БЛД := λ_БЛД*(D'_БЛД - 1)/(16*b'_2)*(c_3^2/(sin(α_3)*1) + с_2^2/sin(α_2)) explicit, ALL → 0.032*(1.05 - 1)/(16*0.039)*(329.523^2/sin(0.51) + 345.999^2/sin(0.51)) = 1209.92
Дж/кг
# Показатель политропы для БЛД и коэффициент загромождения
А_БЛД := (k/(k - 1) - ΔH_БЛД/(R*(T_3 - T_2))) explicit, ALL → 1.4/(1.4 - 1) - 1.21*10^3/(287.4*(375.334 - 369.796)) = 2.73978
n_БЛД := А_БЛД/(А_БЛД - 1) explicit, ALL → 2.74/(2.74 - 1) = 1.57478
η*_п.блд := 1 - (ΔH_рк + ΔH_рк + ΔH_f)/H_k explicit, ALL → 1 - (4.123*10^3 + 4.123*10^3 + 5.215*10^3)/(1.311*10^5) = 0.897338
K_G3 := sqrt(η*_п.блд)*τ(λ_3)/τ(λ_3*sqrt(η*_п.блд)) = 0.933498
# Тогда скорость в меридиональном сечении. с учетом коэффициента загромождения
c_3m := G/(π*ρ_3*K_G3*D_3*b_3) explicit, ALL → 10/(π*1.793*0.933*0.557*0.021) = 164.147  # м/с
# Окружная скорость на выходе из БЛД
c_3u := 1/D'_БЛД*(c_2u - λ_БЛД*(D'_БЛД - 1)/8*(c_3^2*D_3*cos(α_3)/(2*c_3m*b_3) + с_2^2*D_2*cos(α_2)/(2*c_2m*b_2))) = 284.598  # м/с
# Скорость на выходе из БЛД
c_3 := sqrt(c_3u^2 + c_3m^2) explicit, ALL → sqrt(284.598^2 + 164.147^2) = 328.543  # м/с
# Статическая температура на выходе из БЛД
α_3 := atan(c_3m/c_3) = 26.5477 deg
T_3 := T*_3*τ(λ_3) explicit, λ_3, T*_3 → 429.303*τ(0.869) = 375.329  # К
# Плотность воздуха на выходе из БЛД
ρ_3 := ρ_2*(T_3/T_2)^(А_БЛД - 1) explicit, ALL → 1.793*(375.329/369.796)^(2.74 - 1) = 1.83993  # кг/м^3
# Полное и статическое давления за БЛД
p_3 := p_2*(T_3/T_2)^А_БЛД explicit, ALL → 1.917*10^5*(375.329/369.796)^2.74 = 199635  # Па
p*_3 := p_3/π(λ_3) explicit, p_3, λ_3 → 1.996*10^5/π(0.869) = 319499  # Па
# Коэффициент потерь полного давления
σ_БЛД := p*_3/p*_2 explicit, ALL → 3.195*10^5/(3.231*10^5) = 0.988774
# ЛОПАТОЧНЫЙ ДИФФУЗОР
# Выбор параметров ЛД
# Угол атаки потока на входе в лопаточный диффузор:
i_3 := -0 deg
# Лопаточный угол на входе
α_л3 := α_3 + i_3 explicit, ALL → 0.463 + (-0*deg) = 26.5477 deg
# Увеличение угла потока в ЛД:
Δα_3 := 10 deg
# Угол потока на выходе из ЛД
α_4 := α_3 + Δα_3 explicit, ALL → 0.463 + 10*deg = 36.5477 deg
# Увеличение угла потока в ЛД
δ_4 := 2 deg
# Лопаточный угол на выходе
α_л4 := α_4 + δ_4 explicit, ALL → 0.638 + 2*deg = 38.5477 deg
# Абсолютная скорость на выходе из ЛД
c_4 := 130
# Статическая температура на выходе из ЛД
T_4 := T_3 + (c_3^2 - c_4^2)/(2*c_p) explicit, λ_4, T*_3 → T_3 + (c_3^2 - c_4^2)/(2*c_p) = 420.577  # К
# Температура торможения на выходе из компрессора
T*_K := T*_1 + L_к/c_p explicit, ALL → 300 + 1.311*10^5/(1.006*10^3) = 430.34
# Температура торможения на выходе из ЛД
T*_4 := T*_K = 430.34  # K
# Критическая скорость звука и приведённая скорость на выходе из ЛД
α_кр4 := sqrt(2*k/(k + 1)*R*T*_4) explicit, ALL → sqrt(2*1.4/(1.4 + 1)*287.4*430.34) = 379.859  # м/с
λ_4 := c_4/α_кр4 explicit, ALL → 130/379.859 = 0.342232
# Изменение кинетической энергии в ЛД
ΔE_лд := (c_3^2 - c_4^2)/2 explicit, ALL → (328.543^2 - 130^2)/2 = 45520.1  # Дж/кг
# Коэффициент потерь в лопаточном диффузоре
F'_ЛД := 2
θ_э := 10 deg
ξ_лд0 := (4.5*tan(θ_э/2)^1.25*(1 - 1/F'_ЛД)^1.92)
ξ_лд0 explicit, ALL → 4.5*tan(10*deg/2)^1.25*(1 - 1/2)^1.92 = 0.0565815
ξ_лд :=
    ξ_лд0 if λ_3 < 0.8
    (ξ_лд0*(1 + 4.2*(λ_3 - 0.8)^2)) otherwise
ξ_лд explicit, ALL → 4.5*tan(10*deg/2)^1.25*(1 - 1/2)^1.92*(1 + 4.2*(0.869 - 0.8)^2) = 0.0576977
# Потери в ЛД и показатель политропы
ΔH_ЛД := 0.5*ξ_лд*c_3^2 explicit, ALL → 0.5*4.5*tan(10*deg/2)^1.25*(1 - 1/2)^1.92*(1 + 4.2*(0.869 - 0.8)^2)*328.543^2 = 3113.95
А_ЛД := (k/(k - 1) - ΔH_ЛД/(R*(T_4 - T_3))) explicit, ALL → 1.4/(1.4 - 1) - 3.114*10^3/(287.4*(420.577 - 375.329)) = 3.26055  # Дж/кг
n_ЛД := А_ЛД/(А_ЛД - 1) explicit, ALL → 3.261/(3.261 - 1) = 1.44237
# Статические и полные параметры потока за ЛД
кг/м^3
ρ_4 := ρ_3*(T_4/T_3)^(А_ЛД - 1) explicit, ALL → 1.84*(420.577/375.329)^(3.261 - 1) = 2.37985
p_4 := p_3*(T_4/T_3)^А_ЛД explicit, ALL → 1.996*10^5*(420.577/375.329)^3.261 = 289347  # Па
p*_4 := p_4/π(λ_4) explicit, p_4, λ_4 → 2.893*10^5/π(0.342) = 310016  # Па
ρ*_4 := ρ_4/ε(λ_4) explicit, ρ_4, λ_4 → 2.38/ε(0.342) = 2.50007  # кг/м^3
# Коэффициент сохранения полного давления
σ_ЛД := p*_4/p*_3 explicit, ALL → 3.1*10^5/(3.195*10^5) = 0.97032
# Площадь выхода лопаточного диффузора
m_G := sqrt((2/(k + 1))^((k + 1)/(k - 1))*k/R) explicit, ALL → sqrt((2/(1.4 + 1))^((1.4 + 1)/(1.4 - 1))*1.4/287.4) = 0.0403903
F_4 := G*sqrt(T*_4)/(m_G*p*_4*q(λ_4)*sin(α_4)) explicit, ALL → 10*sqrt(430.34)/(0.04*3.1*10^5*0.514*sin(0.638)) = 0.0541375  # м^2
# Коэффициент расширения канала ЛД, принимаем
K_b4 := 1
# Ширина канала ЛД на выходе
b_4 := K_b4*b_3 = 0.0207862
# Диаметр выхода БЛД
D_4 := F_4/(π*b_4) explicit, ALL → 0.054/(π*0.021) = 0.829036  # м
# Угол расширения стенок ЛД
θ_лд := 2*atan((b_4 - b_3)/(D_4 - D_3)) = 0
# Относительный диаметр выхода ЛД
D_4отн := D_4/D_2 = 1.56176
R_4 := D_4/2 = 0.414518
R_3 := D_3/2 = 0.278688
# Будем проектировать лопатки постоянной толщины, очерченные одним радиусом
R_л := (R_4^2 - R_3^2)/(2*(R_4*cos(α_л4) - R_3*cos(α_л3))) explicit, ALL → (0.415^2 - 0.279^2)/(2*(0.415*cos(0.673) - 0.279*cos(0.463))) = 628.674 mm/m
360/19 = 18.9474
# Радиус окружности, на которой находятся центры радиусов R_л
r_0 := sqrt(R_3^2 + R_л^2 - 2*R_3*R_л*cos(α_л3)) explicit, ALL → sqrt(0.279^2 + 0.629^2 - 2*0.279*0.629*cos(0.463)) = 399.295 mm/m
# Число лопаток ЛД
D_3 = 0.557376
z_лд := 19
D_2 = 530.834 mm/m
# Углы расширения диффузора на входе и выходе из лопаток
D_3 = 557.376 mm/m
D_4 = 829.036 mm/m  # = 18.621
θ_3 := 2*π/z_лд*(1 - R_3/R_л*cos(α_л3)) explicit, ALL → 2*π/19*(1 - 0.279/0.629*cos(0.463)) = 11.4337 deg
θ_4 := 2*π/z_лд*(1 - R_4/R_л*cos(α_л4)) explicit, ALL → 2*π/19*(1 - 0.415/0.629*cos(0.673)) = 9.17672 deg
# Средний угол расширения
β_4л := asin(R_4/r_0*sin(α_л4)) explicit, ALL → asin(0.415/0.399*sin(0.673)) = 40.3102 deg
θ_cp := (θ_3 + θ_4)/2 = 10.3052 deg
# Находим коэффициент загромождения
β_3л := asin(R_3/r_0*sin(α_л3)) explicit, ALL → asin(0.279/0.399*sin(0.463)) = 18.1764 deg
0.829*sin(0.673) = 0.516744
θ_л := β_4л - β_3л explicit, ALL → 0.704 - 0.317 = 22.1337 deg
0.557*sin(0.463) = 0.248775
η*_п.лд := 1 - (ΔH_рк + ΔH_рк + ΔH_f + ΔH_ЛД)/H_k explicit, ALL → 1 - (4.123*10^3 + 4.123*10^3 + 5.215*10^3 + 3.114*10^3)/(1.311*10^5) = 0.87359
l_ср := R_л*θ_л explicit, ALL → 0.629*0.386 = 0.242861
Z_лд := π*(D_4*sin(α_л4) - D_3*sin(α_л3))/(2*l_ср*tan(10.305*deg/2)) explicit, ALL → π*(0.829*sin(0.673) - 0.557*sin(0.463))/(2*0.243*tan(10.305*deg/2)) = 19.1884
K_G4 := sqrt(η*_п.лд)*τ(λ_3)/τ(λ_3*sqrt(η*_п.лд)) explicit, ALL → sqrt(0.874)*0.874/0.89 = 0.917973
# Степень расширения диффузора
Z_лд :=
    round(Z_лд) if mod(z_рк, round(Z_лд)) ≠ 0
    (round(Z_лд) + 1) otherwise
Z_лд = 19
F'_43 := R_4*b_4*sin(α_л4)*K_G4/(R_3*b_3*sin(α_л3)*K_G3) explicit, ALL → 0.415*0.021*sin(0.673)*0.918/(0.279*0.021*sin(0.463)*0.933) = 2.03936
# больше 2, годится.
F'_43 := ρ_3*c_3*K_G3/(ρ_4*c_4*K_G4) explicit, ALL → 1.84*328.543*0.933/(2.38*130*0.918) = 1.98694
# ВЫХОДНАЯ СИСТЕМА
# Абсолютная скорость на выходе выходного устройства
c_5 := 30
# Статическая температура
T_5 := T_4 + (c_4^2 - c_5^2)/(2*c_p) explicit, ALL → 420.577 + (130^2 - 30^2)/(2*1.006*10^3) = 428.53  # K  # das *
# Полная температура на выходе из выходного устройства
T*_5 := T*_4 = 430.34  # K
# Критическая и приведённая скорость звука на выходе выходного устройства
a_кр5 := sqrt(2*k/(k - 1)*R*T*_5) explicit, ALL → sqrt(2*1.4/(1.4 - 1)*287.4*430.34) = 930.461
a_кр := sqrt(k*R*T_5) explicit, ALL → sqrt(1.4*287.4*428.53) = 415.239
λ_5 := c_5/a_кр5 explicit, ALL → 30/930.461 = 0.0322421
# Изменение кинетической энергии в выходном устройстве
ΔE_вых := (c_4^2 - c_5^2)/2 explicit, ALL → (130^2 - 30^2)/2 = 8000
# Коэффициент потерь на трение в выходном устройстве
ξ_вс := 0.2
# Потери на трение в выходном устройстве
ΔH_в.с := 0.5*ξ_вс*c_4^2 explicit, ALL → 0.5*0.2*130^2 = 1690  # Дж/кг
# Показатель политропы сжатия в выходном устройстве
А_ЛД := (k/(k - 1) - ΔH_ЛД/(R*(T_4 - T_3))) explicit, ALL → 1.4/(1.4 - 1) - 3.114*10^3/(287.4*(420.577 - 375.329)) = 3.26055
n_ЛД := А_ЛД/(А_ЛД - 1) explicit, ALL → 3.261/(3.261 - 1) = 1.44237
# Статические и полные параметры потока за ЛД
ρ_5 := ρ_4*(T_5/T_4)^(А_ЛД - 1) explicit, ALL → 2.38*(428.53/420.577)^(3.261 - 1) = 2.48278  # кг/м^3
p_5 := p_4*(T_5/T_4)^А_ЛД explicit, ALL → 2.893*10^5*(428.53/420.577)^3.261 = 307570  # Па
p*_5 := p_5/π(λ_5) explicit, p_4, λ_4 → p_5/π(λ_5) = 307756  # Па
ρ*_5 := ρ_5/ε(λ_5) explicit, ρ_4, λ_4 → ρ_5/ε(λ_5) = 2.48386  # кг/м^3
# Коэффициент сохранения полного давления
σ_ЛД := p*_5/p*_4 explicit, ALL → 3.078*10^5/(3.1*10^5) = 0.992711
p*_5/p*_0 explicit, ALL → 3.078*10^5/(0.101*10^6) = 3.03807
# Площадь выхода лопаточного диффузора, при угле выхода потока из выходного устройства
α_5 := 90 deg
F_5 := G*sqrt(T*_5)/(m_G*p*_5*q(λ_5)*sin(α_5)) explicit, ALL → 10*sqrt(430.34)/(0.04*3.078*10^5*0.051*sin(90*deg)) = 0.328272  # м^2
# Расчётные параметры ступени
# Степень повышения давления
π*_k := p*_5/p*_0 explicit, ALL → 3.078*10^5/(0.101*10^6) = 3.03807
# Полная температура
T*_k := T*_3 = 429.303
# Адиабатическая работа и адиабатический КПД
H'*_кs := c_p*T*_0*(π'*_k^((k - 1)/k) - 1) explicit, ALL → 1.006*10^3*300*(π'*_k^((1.4 - 1)/1.4) - 1)  # Дж/кг
η'*_к := H'*_кs/L_к explicit, ALL →
|(η'*_к - η*_к)/η'*_к| explicit, ALL → =  # error: Эта переменная не определена.
η'*_к*1000 =  # error
# эффективный коэффициент напора
H''_k := μ_oo + α_тр.д - c'_2m*(μ_oo/tan(β_2л) + D_отн*d'_1ср*1/(tan(α_1)*k_m)) = 0.754358
H := H_k/u_2^2 = 0.754358
# коэффициент адиабатического напора
H' := H'_k*η'*_к
k_H := H/H'
# Окружная скорость
u'_2 := sqrt(H'*_кs/H*'_кs) explicit, ALL →  # м/с
(u_2 - u'_2)/u_2 =  # error
# Мощность компрессора
N := G*L_к explicit, ALL → 10*1.311*10^5 = 1311216  # Вт
# ПОСТРОЕНИЕ ТРЕУГОЛЬНИКОВ СКОРОСТЕЙ
# Параметры треугольника скоростей на втулочном сечении на входе в РК
c_1вт := c_1 = 168.86  # м/с
c_1uвт := c_1u = 1.03397e-14  # м/с
c_1mвт := c_1m = 168.86  # м/с
u_1вт := d_отн*u_1п explicit, ALL → 0.35*229.711 = 80.399  # м/с
w_1uвт := u_1вт = 80.399  # м/с
w_1вт := sqrt(c_1a^2 + w_1uвт^2) explicit, ALL → sqrt(168.218^2 + 80.399^2) = 186.443  # м/с
β_1вт := atan(c_1a/w_1uвт) explicit, ALL → atan(168.218/80.399) = 64.4547 deg
α_1вт := α_1 = 90 deg
# Параметры треугольника скоростей на среднем сечении на входе в РК
# c_1 = 168.86м/с;  c_1u = 1.03397e-14м/с ;  c_1m = 168.86 м/с
# w_1u = 172.092 м/с;  w_1 = 241.1м/с;  u_1ср = 172.092м/с;
# β_1 = 44.4569 deg;  α_1 = 90 deg
# Параметры треугольника скоростей на периферийном сечении на входе в РК
# c_1m.п = 168.86м/с;  c_1u.п = 7.74616e-15м/с ;  c_1m = 168.86 м/с
# w_1u.п = 229.711 м/с;  w_1.п = 285.098м/с;  u_1п = 229.711м/с;
# α_1.п := α_1 = 90 deg ;  β_1.п = 30.6377 deg
# Параметры треугольника скоростей на выходе из РК
# c_2m = 168.86м/с;  c_2u = 301.996м/с ;  с_2 = 345.999 м/с
# w_2u = 114.92 м/с;  w_2 = 204.255м/с;  u_2 = 416.916м/с;
# α_2 = 29.2116 deg;  β_2 =
# Параметры треугольника скоростей на входе и выходе лопаточного диффузора
# c_4 = 130м/с;
# c_3m = 164.147м/с;  c_3u = 284.598м/с ;  c_3 = 328.543 м/с
# α_3 = 26.5477 deg;  α_4 = 29.3 deg
# ПРОФИЛИРОВАНИЕ ЭЛЕМЕНТОВ СТУПЕНИ
# Профилирование рабочего колеса
# рабочее колесо состоит из радиальной части - крыльчатка и осевой - заборного устройства
# осевую протяженность крыльчатки принимаем равной
B_кр := (0.1*(1 - D_отн) + b'_2)*D_2 explicit, ALL → (0.1*(1 - 0.56) + 0.039)*0.531 = 0.0441429
B_кр*1000 = 44.1429
# Внутренний контур колеса образован конической поверхностью с углом полураскрытия γ_2п2 := 10*deg  и плоскостью диска со стороны протчоной части, сопрягающимися в области поворота радиусом r_0 := 0.5*(D_1п - D_1вт)*1000 = 95.0552мм. Периферийный контур представляет собой сопряжение двух окружностей с прямыми, ограничиваюшими периферию ЗУ и КР. Длина отрезка контура крыльчатки l_0 := 0.0435/D_отн*D_2 = 0.0412344 м, точка сопряжения окружностей находится на пересечении линий r_1к := 0.58*D_1п = 0.169637м и B_кр = const.
# Осевая протяженность ЗУ определяется с помощью оптимальной густоты решетки, в которой угол лопатки на выходеβ_л.зу := 90 deg. Угол поворота в ЗУ
95 + 70 = 165
95 + 44 = 139
139/165 = 0.842424
Δβ_л.зу := β_л.зу - β_1л explicit, ALL → 90*deg - 0.802 = 44.0431 deg
# угол атаки
i := 1.5 deg
β_1л = 45.9569 deg
β_1л := β_1 + i explicit, ALL → 0.776 + 1.5*deg = 45.9569 deg
r_1к := 0.58*D_1п = 0.169637
D_1п*1000 = 292.478
Δβ' := Δβ_л.зу/(0.38*β_л.зу) explicit, ALL → 0.769/(0.38*90*deg) = 1.28781
D_1вт*1000 = 102.367
# По рис 9 стр 37 определяем оптимальную густоту решетки ЗУ
D_1вт/2*30*deg = 26.7997 mm/m
D_1ср*1000 = 219.114
b/t_опт := 1.64
D_2*1000 = 530.834
b_2*1000 = 20.7862
z_зу := z_рк/2 explicit, ALL → 24/2 = 12
l_0*1000 = 41.2344
r_1ср := D_1ср/2 explicit, ALL → 0.219/2 = 109.557 mm/m  # м
2*r_1к*1000 = 339.274
B_зу := 0.9*b/t_опт*2*π*r_1ср/z_зу*sin((β_1л + β_л.зу)/2) explicit, ALL → 0.9*1.64*2*π*0.11/12*sin((0.802 + 90*deg)/2) = 0.0784921
(B_зу + B_кр)*1000 explicit, ALL → (0.078 + 0.044)*1*10^3 = 122.635
B_зу*1000 = 78.4921
B_зу/D_2 = 0.147866
B_кр*1000 = 44.1429
# Среднюю линию строим по дуге окружности
# хорда
23.397/(1 - 32.8677/85.0957) = 38.121
b := B_зу/sin((β_1л + β_л.зу)/2) explicit, ALL → 0.078/sin((0.802 + 90*deg)/2) = 0.0846693  # м
b*1000 = 84.6693
β_1л = 45.9569 deg
3*π/2 + β_1л = 315.957 deg
R := 0.5*b/sin(Δβ_л.зу/2) explicit, ALL → 0.5*0.085/sin(0.769/2) = 0.112906  # м
R*1000 = 112.906  # мм
# Угол установки хорды лопатки
υ := ((β_1л + β_л.зу)/2) explicit, ALL → (0.802 + 90*deg)/2 = 67.9785 deg
112.9060*44.04*deg = 86.7844
