# Дано
N := 5*10^6
T*_3 := 1300
T*_0 := 423
ε := 0.92
η*_тп := 0.88
η*_кп := 0.86
k := 1.64
p*_0 := 3*10^6
σ := 0.92
C_p := 1038
# Отношение граничных температур
υ := T*_3/T*_0 = 3.07329
σ_вх := 0.96
σ_вых := 0.958
# Давление за компрессором: | Давление перед турбиной:
p*_1(π*_к) := p*_0*σ_вх*π*_к
p*_3(π*_к) := p*_1(π*_к)*σ_вых
# КПД компрессора через политропический КПД:
η*_к(π*_к) := (π*_к^((k - 1)/k) - 1)/(π*_к^((k - 1)/(k*η*_кп)) - 1)
# Степень понижения давления в турбине:
π*_т(π*_к) := σ_вых*σ_вх*π*_к
# КПД турбины через политропический КПД:
η*_т(π*_к) := (1 - π*_т(π*_к)^((1 - k)/k*η*_тп))/(1 - π*_т(π*_к)^((1 - k)/k))
# Температура за компрессором:
T*_1(π*_к) := T*_0*(1 + (π*_к^((k - 1)/k) - 1)/η*_к(π*_к))
# Температура за турбиной:
T*_4(π*_к) := T*_3 - (1 - 1/(π*_к*σ_вх*σ_вых)^((k - 1)/k))*T*_3*η*_т(π*_к)
# Температура после регенератора по холодной стороне:
T*_2(π*_к) := ε*T*_4(π*_к) + (1 - ε)*T*_1(π*_к)
# Относительная температура после регенератора:
υ_2(π*_к) := T*_2(π*_к)/T*_0
g' := 0.08
# Относительная работа цикла
L'_ц(π*_к) := (1 - g')*υ*(1 - (π*_к*σ)^((1 - k)/k))*η*_т(π*_к) - (π*_к^((k - 1)/k) - 1)*1/η*_к(π*_к)
# Относительная теплота подведенная в цикл:
Q'_23(π*_к) := (υ - υ_2(π*_к))*(1 - g')
# КПД цикла:
η_ц(π*_к) := L'_ц(π*_к)/Q'_23(π*_к)
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# Удельная работа цикла:
L_ц(π*_к) := C_p*T*_0*L'_ц(π*_к)
# Механический и электромагнитный КПД:
η_м := 0.995
η_г := 0.995
# Потребный расход рабочего тела через компрессор ЗГТУ составит:
G(π*_к) := N/(L_ц(π*_к)*η_м*η_г)
# Расход воздуха при входе в турбину:
G_т(π*_к) := (1 - g')*G(π*_к)
# Работа турбины
L_т(π*_к) := C_p*T*_3*(1 - π*_т(π*_к)^((1 - k)/k))*η*_т(π*_к)
# Зададимся осевой скоростью: | Лопаточный КПД:
c_та := 130
η_л := 0.88
# Располагаемый теплоперепад:
H_т(π*_к) := (L_т(π*_к) + c_та^2/2)/η_л
# Статическое давление за турбиной:
p_4(π*_к) := p*_3(π*_к)*(1 - H_т(π*_к)/(C_p*T*_3))^(k/(k - 1))
# Статическая температура за турбиной:
T_4(π*_к) := T*_3 - H_т(π*_к)*η_л/C_p
# Степень понижения давления в турбине (торможение к статическому):
π_т(π*_к) := p*_3(π*_к)/p_4(π*_к)
# Газовая постоянная для неона:
R := C_p*(k - 1)/k = 405.073
# Удельный объем:
ν_4(π*_к) := R*T_4(π*_к)/p_4(π*_к)
# Площадь кольцевого сечения за турбиной:
A_4(π*_к) := G_т(π*_к)*ν_4(π*_к)/c_та
# Частота вращения ротора:
n_т := 12000
# Плотность по параметрам торможения на входе в турбину
ρ*_3(π*_к) := p*_3(π*_к)/(R*T*_3)
# Объемный расход на входе в рабочее колесо:
V_1(π*_к) := G_т(π*_к)/ρ*_3(π*_к)
# Коэффициент быстроходности:
n_s(π*_к) := n_т*sqrt(V_1(π*_к))/H_т(π*_к)^0.75
U_к := 420
# Диаметр рабочего колеса:
D_k(π*_к) := 60*U_к/(3.14*n_т)
# Условный диаметр:
D_s(π*_к) := D_k(π*_к)*H_т(π*_к)^0.25/sqrt(V_1(π*_к))
n_s(1.75) = 3.19849
D_s(1.75) = 5.11331
# Полный располагаемый теплоперепад:
H_0(π*_к) := R*k/(k - 1)*T*_3*(1 - π_т(π*_к)^((1 - k)/k))
# Располагаемый теплоперепад по параметрам торможения:
H*_0(π*_к) := R*k/(k - 1)*T*_3*(1 - π*_т(π*_к)^((1 - k)/k))
# Расчет центростремительной турбины
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# Коэффициент скорости в СА:
φ := 0.96
# Коэффициент скорости в РК
ψ := 0.8
# Cтепень радиальности:
μ := 0.441
# Угол выхода потока из СА:
α_1 := 14*π/180
# Угол выхода потока из РК:
β_2 := 42.5*π/180
π*_к := 1.75
H_0 := H_0(π*_к) = 240796
G_т := G_т(π*_к)
p*_0 := p*_3(π*_к)
T*_0 := T*_3
p_2 := p_4(π*_к) = 2917765
# Условная адиабатная скорость:
c_0 := sqrt(2*H_0) = 693.968
# Оптимальные значения:
m := 1/ψ^2*(1 - sqrt(μ^2*(1 - φ^2)*(1 - cos(β_2)^2*ψ^2)/(cos(α_1)^2*φ^2 + μ^2*(1 - φ^2)))) = 1.39669
u1/c0 := ψ/sqrt(μ^2*(cos(β_2)^2/m^2 - ψ^2) + (1 - m^2*ψ^4)*φ^2*cos(α_1)^2/(m^2*ψ^2*(1 - φ^2))) = 0.61154
# Подбор степени реактивности и коэффициента скорости
u_1(u1/c0) := u1/c0*c_0
u_2(u1/c0) := μ*u_1(u1/c0)
ρ := 1 - ((1 - m*ψ^2)*φ*cos(α_1)*u1/c0/(m*ψ^2*(1 - φ^2)))^2 = 0.255939
D_1(u1/c0) := u_1(u1/c0)*60/(π*n_т)
D_2(u1/c0) := μ*D_1(u1/c0)
c_1(ρ) := φ*sqrt((1 - ρ)*H_0)
T_1(ρ) := T*_0 - c_1(ρ)^2/(2*C_p)
T'_1(ρ) := T*_0 - (1 - ρ)*H_0/C_p
p_1(ρ) := p*_0*(T'_1(ρ)/T*_0)^(k/(k - 1))
ν_1(ρ) := R*T_1(ρ)/p_1(ρ)
l_1(u1/c0, ρ) := G_т*ν_1(ρ)/(π*D_1(u1/c0)*c_1(ρ)*sin(α_1))
A_1a(u1/c0, ρ) := π*D_1(u1/c0)*l_1(u1/c0, ρ)
c_1a(u1/c0, ρ) := G_т*ν_1(ρ)/A_1a(u1/c0, ρ)
w_1(u1/c0, ρ) := sqrt(c_1(ρ)^2 + u_1(u1/c0)^2 - 2*u_1(u1/c0)*c_1(ρ)*cos(α_1))
β_1(u1/c0, ρ) := acot((c_1(ρ)*cos(α_1) - u_1(u1/c0))/c_1a(u1/c0, ρ))
c_1u(u1/c0, ρ) := w_1(u1/c0, ρ)*cos(β_1(u1/c0, ρ)) - u_1(u1/c0)
H_л(ρ) := R*k/(k - 1)*T_1(ρ)*(1 - (p_2/p_1(ρ))^((k - 1)/k))
w_2(u1/c0, ρ) := ψ*sqrt(w_1(u1/c0, ρ)^2 + 2*H_л(ρ) + (u_2(u1/c0)^2 - u_1(u1/c0)^2))
T_2(u1/c0, ρ) := T_1(ρ) - (w_2(u1/c0, ρ)^2 - w_1(u1/c0, ρ)^2)/(2*C_p) + (u_2(u1/c0)^2 - u_1(u1/c0)^2)/(2*C_p)
T'_2(u1/c0, ρ) := (T_1(ρ) - ((w_2(u1/c0, ρ)/ψ)^2 - w_1(u1/c0, ρ)^2)/(2*C_p)) + (u_2(u1/c0)^2 - u_1(u1/c0)^2)/(2*C_p)
p_2(u1/c0, ρ) := p_1(ρ)*(T'_2(u1/c0, ρ)/T_1(ρ))^(k/(k - 1))
ν_2(u1/c0, ρ) := R*T_2(u1/c0, ρ)/p_2(u1/c0, ρ)
A_2a(u1/c0, ρ) := G_т*ν_2(u1/c0, ρ)/c_та
l_2(u1/c0, ρ) := A_2a(u1/c0, ρ)/(π*D_2(u1/c0))
c_2u(u1/c0, ρ) := w_2(u1/c0, ρ)*cos(β_2) - u_2(u1/c0)
α_2(u1/c0, ρ) := acot(c_2u(u1/c0, ρ)/c_та)
u1/c0 := 0.1
ρ := 0.6
Given
α_2(u1/c0, ρ) == 105*π/180
β_1(u1/c0, ρ) == 85*π/180
Find(u1/c0, ρ) = [0.540801; 0.29545]
α_1 := 12*π/180
β_2 := 20*π/180
[
    m;
    u1/c0;
    ρ;
    u_1;
    u_2;
    D_1;
    D_2;
    c_1;
    T_1;
    T'_1;
    p_1;
    ν_1;
    l_1;
    A_1a;
    c_1a;
    w_1;
    β_1;
    c_1u;
    H_л;
    w_2;
    T_2;
    T'_2;
    p_2;
    ν_2;
    l_2;
    A_2a;
    c_2a;
    c_2u;
    α_2;
    c_2;
    L_u;
    T*_2;
    p*_2;
    h_с;
    h_л;
    h_в;
    η_u;
    h_з;
    N_тр;
    H_тр;
    η_т;
    L_т;
    T_ст;
    T*_ст;
    p*_ст;
    H*_0;
    η*_т;
    N
] :=
    for i ∈ 0 .. 9
        for j ∈ 0 .. 10
            m[i, j] ← 1/ψ^2*(1 - sqrt(μ^2*(1 - φ^2)*(1 - cos(β_2)^2*ψ^2)/(cos(α_1)^2*φ^2 + μ^2*(1 - φ^2))))
            u1/c0[i, j] ← 0.541
            ρ[i, j] ← 0.295
            u_1[i, j] ← c_0*u1/c0[i, j]
            u_2[i, j] ← μ*u_1[i, j]
            D_1[i, j] ← u_1[i, j]*60/(π*n_т)
            D_2[i, j] ← μ*D_1[i, j]
            c_1[i, j] ← φ*sqrt((1 - ρ[i, j])*H_0)
            T_1[i, j] ← T*_0 - c_1[i, j]^2/(2*C_p)
            T'_1[i, j] ← T*_0 - (1 - ρ[i, j])*H_0/C_p
            p_1[i, j] ← p*_0*(T'_1[i, j]/T*_0)^(k/(k - 1))
            ν_1[i, j] ← R*T_1[i, j]/p_1[i, j]
            l_1[i, j] ← G_т*ν_1[i, j]/(π*D_1[i, j]*c_1[i, j]*sin(α_1))
            A_1a[i, j] ← π*D_1[i, j]*l_1[i, j]
            c_1a[i, j] ← G_т*ν_1[i, j]/A_1a[i, j]
            w_1[i, j] ← sqrt(c_1[i, j]^2 + u_1[i, j]^2 - 2*u_1[i, j]*c_1[i, j]*cos(α_1))
            β_1[i, j] ← acot((c_1[i, j]*cos(α_1) - u_1[i, j])/c_1a[i, j])
            c_1u[i, j] ← w_1[i, j]*cos(β_1[i, j]) - u_1[i, j]
            H_л[i, j] ← R*k/(k - 1)*T_1[i, j]*(1 - (p_4(π*_к)/p_1[i, j])^((k - 1)/k))
            w_2[i, j] ← ψ*sqrt(w_1[i, j]^2 + 2*H_л[i, j] + (u_2[i, j]^2 - u_1[i, j]^2))
            T_2[i, j] ← T_1[i, j] - (w_2[i, j]^2 - w_1[i, j]^2)/(2*C_p) + (u_2[i, j]^2 - u_1[i, j]^2)/(2*C_p)
            T'_2[i, j] ← (T_1[i, j] - ((w_2[i, j]/ψ)^2 - w_1[i, j]^2)/(2*C_p)) + (u_2[i, j]^2 - u_1[i, j]^2)/(2*C_p)
            p_2[i, j] ← p_1[i, j]*(T'_2[i, j]/T_1[i, j])^(k/(k - 1))
            ν_2[i, j] ← R*T_2[i, j]/p_2[i, j]
            l_2[i, j] ← G_т*ν_2[i, j]/(π*D_2[i, j]*w_2[i, j]*sin(β_2))
            A_2a[i, j] ← π*D_2[i, j]*l_2[i, j]
            c_2a[i, j] ← w_2[i, j]*sin(β_2)
            c_2u[i, j] ← w_2[i, j]*cos(β_2) - u_2[i, j]
            α_2[i, j] ← acot(c_2u[i, j]/c_2a[i, j])
            c_2[i, j] ← sqrt(c_2u[i, j]^2 + c_2a[i, j]^2)
            L_u[i, j] ← (c_1[i, j]^2 - c_2[i, j]^2)/2 + (w_2[i, j]^2 + w_1[i, j]^2)/2 + (u_1[i, j]^2 - u_2[i, j]^2)/2
            T*_2[i, j] ← T_2[i, j] + c_2[i, j]^2/(2*C_p)
            p*_2[i, j] ← p_2[i, j]*(T*_2[i, j]/T_2[i, j])^(k/(k - 1))
            h_с ← (φ^-2 - 1)*c_1[i, j]^2/2
            h_л[i, j] ← (ψ^-2 - 1)*w_2[i, j]^2/2
            h_в[i, j] ← c_2[i, j]^2/2
            η_u[i, j] ← 1 - (h_с + h_л[i, j] + h_в[i, j])/H_0
            h_з ← 1.8*10*10^-3*H_0
            N_тр ← 4.5*D_1[i, j]^2*(u_1[i, j]/100)^3*1000/ν_1[i, j]
            H_тр ← N_тр/H_0
            η_т[i, j] ← 1 - (1 - ρ[i, j])*(1 - φ^2) - h_л[i, j]/H_0 - c_2[i, j]^2/(2*H_0) - H_тр/H_0 - 1.8*5*10^-3
            L_т[i, j] ← H_0*η_т[i, j]
            T_ст[i, j] ← T_2[i, j] + h_з/C_p + H_тр/C_p
            T*_ст[i, j] ← T_ст[i, j] + c_2[i, j]^2/(2*C_p)
            p*_ст[i, j] ← p_2[i, j]*(T*_ст[i, j]/T_ст[i, j])^(k/(k - 1))
            H*_0[i, j] ← C_p*T*_0*(1 - (p*_ст[i, j]/p*_3(π*_к))^((k - 1)/k))
            η*_т[i, j] ← L_т[i, j]/H*_0[i, j]
            N[i, j] ← G_т*L_т[i, j]*η_м
            β_2 ← β_2 + 2.5*π/180
        β_2 ← 20*π/180
        α_1 ← α_1 + 2*π/180
    [
        m;
        u1/c0;
        ρ;
        u_1;
        u_2;
        D_1;
        D_2;
        c_1;
        T_1;
        T'_1;
        p_1;
        ν_1;
        l_1;
        A_1a;
        c_1a;
        w_1;
        β_1;
        c_1u;
        H_л;
        w_2;
        T_2;
        T'_2;
        p_2;
        ν_2;
        l_2;
        A_2a;
        c_2a;
        c_2u;
        α_2;
        c_2;
        L_u;
        T*_2;
        p*_2;
        h_с;
        h_л;
        h_в;
        η_u;
        h_з;
        N_тр;
        H_тр;
        η_т;
        L_т;
        T_ст;
        T*_ст;
        p*_ст;
        H*_0;
        η*_т;
        N
    ]
β_1*180/π = [
    82.067, 82.067, 82.067, 82.067, 82.067, 82.067, 82.067, 82.067, 82.067, 82.067, 82.067;
    85.0106, 85.0106, 85.0106, 85.0106, 85.0106, 85.0106, 85.0106, 85.0106, 85.0106, 85.0106, 85.0106;
    87.4893, 87.4893, 87.4893, 87.4893, 87.4893, 87.4893, 87.4893, 87.4893, 87.4893, 87.4893, 87.4893;
    89.6512, 89.6512, 89.6512, 89.6512, 89.6512, 89.6512, 89.6512, 89.6512, 89.6512, 89.6512, 89.6512;
    91.5882, 91.5882, 91.5882, 91.5882, 91.5882, 91.5882, 91.5882, 91.5882, 91.5882, 91.5882, 91.5882;
    93.3597, 93.3597, 93.3597, 93.3597, 93.3597, 93.3597, 93.3597, 93.3597, 93.3597, 93.3597, 93.3597;
    95.0063, 95.0063, 95.0063, 95.0063, 95.0063, 95.0063, 95.0063, 95.0063, 95.0063, 95.0063, 95.0063;
    96.5562, 96.5562, 96.5562, 96.5562, 96.5562, 96.5562, 96.5562, 96.5562, 96.5562, 96.5562, 96.5562;
    98.0297, 98.0297, 98.0297, 98.0297, 98.0297, 98.0297, 98.0297, 98.0297, 98.0297, 98.0297, 98.0297;
    99.4419, 99.4419, 99.4419, 99.4419, 99.4419, 99.4419, 99.4419, 99.4419, 99.4419, 99.4419, 99.4419
]
α_2*180/π = [
    93.4465, 95.4352, 97.2793, 99.0177, 100.677, 102.274, 103.824, 105.335, 106.815, 108.268, 109.7;
    89.5583, 91.972, 94.1613, 96.1857, 98.0854, 99.8887, 101.616, 103.282, 104.898, 106.473, 108.014;
    85.4211, 88.267, 90.8125, 93.135, 95.2878, 97.3084, 99.2243, 101.056, 102.819, 104.524, 106.182;
    81.1709, 84.4312, 87.3257, 89.945, 92.3526, 94.5943, 96.7035, 98.7056, 100.62, 102.461, 104.241;
    76.9355, 80.5707, 83.7904, 86.6924, 89.3468, 91.8052, 94.1058, 96.2781, 98.3444, 100.322, 102.226;
    72.8233, 76.7787, 80.2873, 83.4474, 86.3319, 88.9956, 91.48, 93.8173, 96.0324, 98.1452, 100.171;
    68.916, 73.1297, 76.8828, 80.2693, 83.3609, 86.2132, 88.869, 91.3621, 93.7192, 95.9617, 98.1067;
    65.2674, 69.6769, 73.6275, 77.2048, 80.4767, 83.497, 86.3084, 88.9452, 91.4349, 93.7996, 96.0576;
    61.9055, 66.4533, 70.5557, 74.2878, 77.7115, 80.8774, 83.8268, 86.5931, 89.2039, 91.6817, 94.0452;
    58.8379, 63.4744, 67.687, 71.5396, 75.0873, 78.3762, 81.445, 84.3257, 87.0453, 89.626, 92.0864
]
l_1/D_1 = [
    0.120993, 0.120993, 0.120993, 0.120993, 0.120993, 0.120993, 0.120993, 0.120993, 0.120993, 0.120993, 0.120993;
    0.103983, 0.103983, 0.103983, 0.103983, 0.103983, 0.103983, 0.103983, 0.103983, 0.103983, 0.103983, 0.103983;
    0.0912642, 0.0912642, 0.0912642, 0.0912642, 0.0912642, 0.0912642, 0.0912642, 0.0912642, 0.0912642, 0.0912642, 0.0912642;
    0.081406, 0.081406, 0.081406, 0.081406, 0.081406, 0.081406, 0.081406, 0.081406, 0.081406, 0.081406, 0.081406;
    0.0735507, 0.0735507, 0.0735507, 0.0735507, 0.0735507, 0.0735507, 0.0735507, 0.0735507, 0.0735507, 0.0735507, 0.0735507;
    0.0671526, 0.0671526, 0.0671526, 0.0671526, 0.0671526, 0.0671526, 0.0671526, 0.0671526, 0.0671526, 0.0671526, 0.0671526;
    0.0618479, 0.0618479, 0.0618479, 0.0618479, 0.0618479, 0.0618479, 0.0618479, 0.0618479, 0.0618479, 0.0618479, 0.0618479;
    0.0573848, 0.0573848, 0.0573848, 0.0573848, 0.0573848, 0.0573848, 0.0573848, 0.0573848, 0.0573848, 0.0573848, 0.0573848;
    0.0535833, 0.0535833, 0.0535833, 0.0535833, 0.0535833, 0.0535833, 0.0535833, 0.0535833, 0.0535833, 0.0535833, 0.0535833;
    0.0503116, 0.0503116, 0.0503116, 0.0503116, 0.0503116, 0.0503116, 0.0503116, 0.0503116, 0.0503116, 0.0503116, 0.0503116
]
l_2/D_1 = [
    0.424561, 0.379448, 0.343592, 0.314475, 0.290417, 0.270256, 0.253163, 0.238531, 0.225904, 0.214935, 0.205356;
    0.414432, 0.370396, 0.335395, 0.306973, 0.283488, 0.263809, 0.247124, 0.23284, 0.220515, 0.209808, 0.200457;
    0.403646, 0.360755, 0.326666, 0.298983, 0.27611, 0.256943, 0.240692, 0.22678, 0.214776, 0.204347, 0.195239;
    0.392438, 0.350738, 0.317596, 0.290681, 0.268443, 0.249808, 0.234008, 0.220483, 0.208812, 0.198673, 0.189818;
    0.381014, 0.340528, 0.30835, 0.28222, 0.260629, 0.242536, 0.227196, 0.214065, 0.202733, 0.19289, 0.184292;
    0.369548, 0.33028, 0.299071, 0.273726, 0.252786, 0.235237, 0.220359, 0.207623, 0.196632, 0.187085, 0.178746;
    0.358179, 0.32012, 0.28987, 0.265306, 0.245009, 0.228, 0.21358, 0.201236, 0.190583, 0.18133, 0.173248;
    0.347019, 0.310145, 0.280838, 0.257039, 0.237375, 0.220896, 0.206925, 0.194965, 0.184645, 0.17568, 0.167849;
    0.336148, 0.30043, 0.272041, 0.248987, 0.229939, 0.213976, 0.200443, 0.188858, 0.178861, 0.170176, 0.162591;
    0.325627, 0.291026, 0.263526, 0.241194, 0.222742, 0.207279, 0.194169, 0.182947, 0.173263, 0.16485, 0.157502
]
l_1[3, 9] = 0.0486422
L_u/H_0 = [
    0.629419, 0.627544, 0.625461, 0.623173, 0.620686, 0.618002, 0.615129, 0.61207, 0.608833, 0.605423, 0.601846;
    0.637023, 0.635102, 0.632967, 0.630623, 0.628074, 0.625324, 0.622379, 0.619245, 0.615927, 0.612432, 0.608767;
    0.645692, 0.643719, 0.641526, 0.639118, 0.6365, 0.633675, 0.630651, 0.627431, 0.624024, 0.620434, 0.616669;
    0.65539, 0.653359, 0.651103, 0.648625, 0.64593, 0.643024, 0.639911, 0.636599, 0.633092, 0.629398, 0.625524;
    0.666078, 0.663986, 0.661661, 0.659107, 0.65633, 0.653335, 0.650128, 0.646714, 0.6431, 0.639294, 0.635302;
    0.677722, 0.675563, 0.673165, 0.67053, 0.667666, 0.664576, 0.661267, 0.657746, 0.654018, 0.650091, 0.645973;
    0.690284, 0.688056, 0.685579, 0.68286, 0.679903, 0.676713, 0.673297, 0.669661, 0.665813, 0.661759, 0.657507;
    0.70373, 0.701428, 0.69887, 0.696062, 0.693007, 0.689713, 0.686185, 0.68243, 0.678455, 0.674268, 0.669877;
    0.718024, 0.715647, 0.713005, 0.710103, 0.706948, 0.703544, 0.699899, 0.69602, 0.691914, 0.687589, 0.683052;
    0.733135, 0.730679, 0.727949, 0.724951, 0.721692, 0.718176, 0.71441, 0.710403, 0.706161, 0.701692, 0.697006
]
c_2a - c_1a = [
    -23.2683, -16.2574, -9.37208, -2.62547, 3.96961, 10.4006, 16.6552, 22.7216, 28.5882, 34.2438, 39.6777;
    -35.2585, -28.0737, -21.0177, -14.1038, -7.34518, -0.75475, 5.65497, 11.8718, 17.8838, 23.6797, 29.2483;
    -46.9546, -39.5749, -32.3273, -25.2258, -18.2838, -11.5146, -4.93093, 1.45456, 7.62975, 13.5829, 19.3026;
    -58.3558, -50.7619, -43.304, -35.9964, -28.8529, -21.8871, -15.1124, -8.54156, -2.18712, 3.9388, 9.82456;
    -69.4616, -61.6361, -53.9507, -46.4202, -39.0588, -31.8806, -24.8992, -18.1279, -11.5796, -5.26686, 0.798435;
    -80.2709, -72.1981, -64.2699, -56.5013, -48.9073, -41.5023, -34.3003, -27.315, -20.5599, -14.0476, -7.79063;
    -90.7821, -82.448, -74.2632, -66.2433, -58.4035, -50.7588, -43.3238, -36.1124, -29.1386, -22.4156, -15.9562;
    -100.993, -92.3853, -83.9317, -75.6485, -67.5513, -59.6555, -51.9763, -44.5282, -37.3254, -30.3816, -23.7101;
    -110.901, -102.008, -93.2753, -84.7182, -76.3533, -68.1965, -60.2634, -52.569, -45.1281, -37.9547, -31.0626;
    -120.502, -111.315, -102.293, -93.4528, -84.8111, -76.3845, -68.1889, -60.24, -52.5529, -45.1422, -38.022
]
# Для чертежа
z := 26
2*π*cot(14*π/180) = 25.2005
l_1[2, 9] = 0.0545327
D_1[2, 9]/2 = 0.298763
D_1[2, 9] = 0.597526
D_2[2, 9] = 0.263509
l_2[2, 9] = 0.122103
D_2[2, 9]/2 = 0.131754
d_2в := D_2[2, 9] + l_2[2, 9]/2 = 0.32456
d_2вт := D_2[2, 9] + (-l_2[2, 9]/2) = 0.202458
# Шаг на средней линии:
t := π*D_2[2, 9]/z = 0.0318399
t_в := π*d_2в/z = 0.0392168
t_вт := π*d_2вт/z*2 = 0.0489261
# Толщина колеса:
B := 172.4  # мм
δ_1 := atan(2*l_1[2, 9]/D_1[2, 9])*180/π = 10.3442
δ_2 := 8
B - l_1[2, 9]*1000 = 117.867
α := 45 - (δ_1 + δ_2)/2 = 35.8279
x_m := 165.17
α + δ_1 = 46.1721
y(x') := x'*(1 - 2*x'^2 + x'^3)*tan(α*π/180)
90 + (α + δ_1) = 136.172
y(0.05)*x_m = 5.93326
y(0.1)*x_m = 11.6981
y(0.4)*x_m = 35.4878
y(0.2)*x_m = 22.1322
y(0.3)*x_m = 30.3006
y(0.5)*x_m = 37.2646
# Внутренний обвод (внешний потерялся)
f_1 := A_1a[2, 9]*10^6
f_2 := A_2a[2, 9]*10^6
u1[2, 9] =  # error: Эта переменная не определена.
s_am := 185.44
s_a := 178.59
r' := 168.97
α := 8.2*π/180
r_ср := 150
e := 40
Given
f_1 + s_a/s_am*(f_2 - f_1) == 4*π*r_ср*e
r' - r_ср == e*cos(α)
B = 172.4
Find(r_ср, e) =  # error
# Средняя линия лопатки
B - l_1[2, 9]*1000 = 117.867
x_m := 134.9
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y(x') := x'*(1 - 2*x'^2 + x'^3)*tan(45*π/180 - 1*42.5*π/180/2)
y(0.05)*x_m = 2.9534
y(0.1)*x_m = 5.82296
y(0.4)*x_m = 17.6648
y(0.2)*x_m = 11.0167
y(0.3)*x_m = 15.0827
y(0.5)*x_m = 18.5492
δ_ср1 := 8.92
# Среднее сечение
δ_ср2 := 6.38
r_ср := d_2ср/2*10^3
i := 0, 1 .. 10
d(x') := δ_ср1 + x'*(δ_ср2 - δ_ср1)
d(0.05) = 8.793
y(0.05)*x_m + d(0.05) = 11.7464
u := [0; 0; 0; 0.04; 0.47; 2.19; 6.02; 12.85; 23.5; 38.44; 56.58]
φ_cрл := 180*u/(π*r_ср)
x := r_ср*cos(φ_cрл*π/180)
y := r_ср*sin(φ_cрл*π/180)
z := [B/10*0; B/10*1; B/10*2; B/10*3; B/10*4; B/10*5; B/10*6; B/10*7; B/10*8; B/10*9; B/10*10] = [0; 17.24; 34.48; 51.72; 68.96; 86.2; 103.44; 120.68; 137.92; 155.16; 172.4]
y =  # error
z = [0; 17.24; 34.48; 51.72; 68.96; 86.2; 103.44; 120.68; 137.92; 155.16; 172.4]
x =  # error
# Периферийное сечение
r_2в := d_2в/2*10^3 = 162.28
u_п := u*d_2в/d_2ср
x_п := r_2в*cos(φ_cрл*π/180)
y_п := r_2в*sin(φ_cрл*π/180)
x_п =  # error
y_п =  # error
z = [0; 17.24; 34.48; 51.72; 68.96; 86.2; 103.44; 120.68; 137.92; 155.16; 172.4]
# Втулочное сечение
r_2вт := d_2вт/2*10^3 = 101.229
u_вт := u*d_2вт/d_2ср
x_вт := r_2вт*cos(φ_cрл*π/180)
y_вт := r_2вт*sin(φ_cрл*π/180)
z = [0; 17.24; 34.48; 51.72; 68.96; 86.2; 103.44; 120.68; 137.92; 155.16; 172.4]
y_вт =  # error
x_вт =  # error
# Толщина лопаток на входе в РК:
δ_вт1 := 10
δ_ср1 := 8.92
δ_п1 := 8.33
# Толщина лопаток на выходе из РК:
δ_вт2 := 8
δ_ср2 := 6.38
δ_п2 := 5.49
# Распределение толщины по тракту:
δ_п := δ_п1 + z/B*(δ_п2 - δ_п1) = [8.33; 8.046; 7.762; 7.478; 7.194; 6.91; 6.626; 6.342; 6.058; 5.774; 5.49]
δ_вт := δ_вт1 + z/B*(δ_вт2 - δ_вт1) = [10; 9.8; 9.6; 9.4; 9.2; 9; 8.8; 8.6; 8.4; 8.2; 8]
δ_ср := δ_ср1 + z/B*(δ_ср2 - δ_ср1) = [8.92; 8.666; 8.412; 8.158; 7.904; 7.65; 7.396; 7.142; 6.888; 6.634; 6.38]
Δφ_вт := 90*δ_вт/(π*r_2вт) = [2.83001; 2.77341; 2.71681; 2.66021; 2.60361; 2.54701; 2.49041; 2.43381; 2.37721; 2.32061; 2.26401]
Δφ_п := 90*δ_п/(π*r_2в) = [1.47052; 1.42039; 1.37025; 1.32012; 1.26998; 1.21985; 1.16971; 1.11958; 1.06944; 1.0193; 0.969169]
Δφ_ср := 90*δ_ср/(π*r_ср)
φ_сп_вт := φ_cрл + Δφ_вт
φ_сп_cр := φ_cрл + Δφ_ср
φ_сп_п := φ_cрл + Δφ_п
φ_к_вт := φ_cрл - Δφ_вт
φ_к_ср := φ_cрл - Δφ_ср
φ_к_п := φ_cрл - Δφ_п
x_cп_вт := r_2вт*cos(φ_сп_вт*π/180)
x_сп_ср := r_ср*cos(φ_сп_cр*π/180)
x_сп_п := r_2в*cos(φ_сп_п*π/180)
y_cп_вт := r_2вт*sin(φ_сп_вт*π/180)
y_сп_ср := r_ср*sin(φ_сп_cр*π/180)
y_сп_п := r_2в*sin(φ_сп_п*π/180)
z = [0; 17.24; 34.48; 51.72; 68.96; 86.2; 103.44; 120.68; 137.92; 155.16; 172.4]
x_к_ср := r_ср*cos(φ_к_ср*π/180)
x_к_п := r_2в*cos(φ_к_п*π/180)
x_к_вт := r_2вт*cos(φ_к_вт*π/180)
y_к_ср := r_ср*sin(φ_к_ср*π/180)
y_к_п := r_2в*sin(φ_к_п*π/180)
z = [0; 17.24; 34.48; 51.72; 68.96; 86.2; 103.44; 120.68; 137.92; 155.16; 172.4]
z = [0; 17.24; 34.48; 51.72; 68.96; 86.2; 103.44; 120.68; 137.92; 155.16; 172.4]
y_к_вт := r_2вт*sin(φ_к_вт*π/180)
x_сп_п =  # error
y_сп_п =  # error
y_сп_ср =  # error
x_cп_вт =  # error
x_сп_ср =  # error
y_cп_вт =  # error
x_к_ср =  # error
x_к_п =  # error
y_к_п =  # error
y_к_ср =  # error
x_к_вт =  # error
y_к_вт =  # error
z = [0; 17.24; 34.48; 51.72; 68.96; 86.2; 103.44; 120.68; 137.92; 155.16; 172.4]
x_к_вт =  # error
z = [0; 17.24; 34.48; 51.72; 68.96; 86.2; 103.44; 120.68; 137.92; 155.16; 172.4]
d_2ср =  # error
# Средняя линия на диаметра колеса на входе
d_вх := D_1[2, 9] = 0.597526
r_вх := d_вх*10^3/2 = 298.763
u_вх := u*d_вх/d_2ср
x_вх := r_вх*cos(φ_cрл*π/180)
y_вх := r_вх*sin(φ_cрл*π/180)
z = [0; 17.24; 34.48; 51.72; 68.96; 86.2; 103.44; 120.68; 137.92; 155.16; 172.4]
y_вх =  # error
x_вх =  # error
δ_вх1 := 7.54
δ_вх2 := 4.16
δ_вх := δ_вх1 + z/B*(δ_вх2 - δ_вх1) = [7.54; 7.202; 6.864; 6.526; 6.188; 5.85; 5.512; 5.174; 4.836; 4.498; 4.16]
Δφ_вх := 90*δ_вх/(π*r_вх) = [0.722998; 0.690588; 0.658178; 0.625767; 0.593357; 0.560947; 0.528537; 0.496126; 0.463716; 0.431306; 0.398895]
φ_сп_вх := φ_cрл + Δφ_вх
φ_к_вх := φ_cрл - Δφ_вх
x_cп_вх := r_вх*cos(φ_сп_вх*π/180)
y_cп_вх := r_вх*sin(φ_сп_вх*π/180)
z = [0; 17.24; 34.48; 51.72; 68.96; 86.2; 103.44; 120.68; 137.92; 155.16; 172.4]
x_к_вх := r_вх*cos(φ_к_вх*π/180)
y_к_вх := r_вх*sin(φ_к_вх*π/180)
x_cп_вх =  # error
y_cп_вх =  # error
z = [0; 17.24; 34.48; 51.72; 68.96; 86.2; 103.44; 120.68; 137.92; 155.16; 172.4]
x_к_вх =  # error
y_к_вх =  # error
x' := [0; 0.025; 0.050; 0.075; 0.1; 0.125; 0.150; 0.175; 0.200; 0.25; 0.3; 0.35; 0.40; 0.45; 0.5; 0.55; 0.6; 0.65; 0.7; 0.75; 0.8; 0.825; 0.85; 0.875; 0.9; 0.925; 0.95; 0.975; 1]
y'_в := [0.00533; 0.0168; 0.0262; 0.0355; 0.0452; 0.0550; 0.0644; 0.0746; 0.0842; 0.1038; 0.1242; 0.1440; 0.1636; 0.1840; 0.2039; 0.2240; 0.2420; 0.256; 0.269; 0.278; 0.277; 0.274; 0.268; 0.258; 0.243; 0.224; 0.205; 0.174; 0.0842]
y'_н := [0.0047; 0.0037; 0.01123; 0.01681; 0.0234; 0.0291; 0.0355; 0.0413; 0.0458; 0.0552; 0.0626; 0.0673; 0.0710; 0.0738; 0.0756; 0.0766; 0.0748; 0.072; 0.0655; 0.052; 0.0365; 0.0243; 0.01405; 0.0065; 0.0019; 0.0004; 0.0065; 0.0187; 0.0842]
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# Профиль лопаток соплового аппарата
β_уст := 30*π/180
r_0 := 351.8
r_1 := 294
t/b := 0.7
b := 0.5*r_1
r'_0 := r_0/r_1
B := b*sin(28*π/180) = 69.0123
z_1 := 25
i := 0, 1 .. 28
t := 0.75*b = 110.25
z := 2*π*sin(β_уст)/(ln(r_0/r_1)*t/b) = 25.0051
e := 2.71828182846
r := r_1*e^(x'/sin(β_уст)*ln(r_0/r_1))
θ := 2*π/z*y'_в/t/b
x_1 := [294; 296.127; 298.269; 300.423; 302.591; 304.771; 306.966; 309.172; 311.393; 315.875; 320.408; 324.997; 329.642; 334.339; 339.093; 343.903; 348.784; 353.755; 358.799; 363.943; 369.247; 371.949; 374.695; 377.494; 380.349; 383.248; 386.157; 389.147; 392.347]
θ_н := 2*π/z*y'_н/t/b
y_1 := [0.453; 1.437; 2.257; 3.081; 3.951; 4.842; 5.711; 6.663; 7.575; 9.474; 11.5; 13.526; 15.59; 17.787; 19.995; 22.283; 24.421; 26.207; 27.936; 29.289; 29.608; 29.501; 29.065; 28.185; 26.742; 24.833; 22.894; 19.576; 9.545]
y_2 := [0.399; 0.317; 0.968; 1.459; 2.045; 2.562; 3.148; 3.689; 4.121; 5.039; 5.797; 6.323; 6.768; 7.137; 7.417; 7.625; 7.554; 7.377; 6.809; 5.484; 3.906; 2.619; 1.525; 0.711; 0.209; 0.044; 0.726; 2.105; 9.545]
r[i]*sin(θ_н[i]) = [0.496019; 0.394003; 1.20663; 1.82246; 2.55977; 3.21198; 3.95368; 4.64106; 5.19309; 6.37215; 7.35712; 8.05263; 8.6491; 9.15293; 9.54592; 9.84732; 9.79013; 9.5944; 8.88648; 7.18293; 5.13333; 3.44839; 2.01181; 0.939126; 0.276988; 0.058839; 0.964753; 2.80052; 12.7217]
r[i]*cos(θ[i]) = [293.999; 296.645; 299.311; 301.998; 304.705; 307.433; 310.181; 312.949; 315.739; 321.381; 327.103; 332.913; 338.81; 344.789; 350.858; 357.014; 363.283; 369.695; 376.225; 382.916; 389.865; 393.422; 397.052; 400.767; 404.576; 408.457; 412.356; 416.389; 420.771]
r[i]*sin(θ[i]) = [0.562507; 1.78898; 2.81508; 3.84866; 4.94436; 6.07047; 7.17187; 8.38243; 9.5461; 11.9804; 14.5931; 17.224; 19.9202; 22.8064; 25.7264; 28.769; 31.6379; 34.0692; 36.4423; 38.3396; 38.894; 38.8209; 38.3158; 37.2228; 35.3805; 32.9144; 30.3994; 26.0416; 12.7217]
r[i]*cos(θ_н[i]) = [294; 296.65; 299.322; 302.017; 304.735; 307.476; 310.239; 313.027; 315.841; 321.541; 327.346; 333.261; 339.285; 345.421; 351.67; 358.036; 364.526; 371.138; 377.881; 384.764; 391.767; 395.317; 398.891; 402.491; 406.12; 409.781; 413.474; 417.193; 420.771]
r[i]*sin(θ_н[i]) = [0.496019; 0.394003; 1.20663; 1.82246; 2.55977; 3.21198; 3.95368; 4.64106; 5.19309; 6.37215; 7.35712; 8.05263; 8.6491; 9.15293; 9.54592; 9.84732; 9.79013; 9.5944; 8.88648; 7.18293; 5.13333; 3.44839; 2.01181; 0.939126; 0.276988; 0.058839; 0.964753; 2.80052; 12.7217]
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# аа  /
r_sb := 1/0.0020 = 500
r_sa := 1/0.0016 = 625
l_b := 105.2
r'_sb := r_sb/r_sa
l'_b := l_b/r_sa = 0.16832
l_ср := l_b - 71.8 = 33.4
l'ср := l_ср/r_sa
k_1 := (r'_sb - 1 - l'_b)/((2*r'_sb - l'_b)*l'_b) = -1.52842
u_2[5, 9] = 165.568
w_2[2, 9] = 181.483
s(l') := 1/r_sa*(1 - 2*k_1*l')/(1 + l' - k_1*l'^2)  # – распределение кривизны вдоль ортогоналей
β' := 42.5*π/180
β := β'
χ := π/2
u_2[2, 9] = 165.568
u_вт := u_2[2, 9]*d_2вт/d_2ср
w_a := w_2[2, 9]*(1 + l'ср - k_1*l'ср^2) = 191.974  # верх
w_b := w_a*1/(1 + l'_b - k_1*l'_b^2) = 158.444
u_в := u_2[2, 9]*d_2в/d_2ср
