# Расчет на прочность рабочей лопатки
# Рассчитывается рабочая лопатка последней ступени турбины.
# Материал лопатки: жаропрочная сплав ХН70МТФКЮ
# Плотность материала лопатки:
ρ := 8170  # кг/м^3
# Рабочее колесо (последняя ступень)
F_пер := 3070*10^-6  # м^2
R_пер := 1.494  # м
F_ср := 4047*10^-6  # м^2
R_ср := 1.199  # м
F_вт := 6547*10^-6  # м^2
R_вт := 0.904  # м
# Зададим распределение площадей плавной кривой:
vR := stack(R_вт, R_ср, R_пер)
vF := stack(F_вт, F_ср, F_пер)
vs := lspline(vR, vF)
F(R) := interp(vs, vR, vF, R)
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# Частота вращения ротора:
n_т := 3000
ω := π*n_т/30 = 314.159  # рад/с
N(z) := ρ*ω^2*integral(z*F(z), z = z .. R_пер)
σ_р(z) := N(z)/F(z)
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σ_р(R_вт) = 365058764  # Па
# Определим изгибающие моменты от аэродинамических сил:
# Газовая постоянная:
R := 290  # Дж/(кг*К)
# Показатель адиабаты:
k := 1.315
# Число лопаток:
m := 35
P_1 := 1.358*10^5  # Па
P_2 := 1.023*10^5  # Па
# Определим изгибающие моменты от аэродинамических нагрузок:
M_ηq(z) := -2*π*(P_2 - P_1)*(2*R_пер^3 - 3*R_пер^2*z + z^3)/(m*6)
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G := 339.1  # кг/с
H_T := 1.892*10^5  # м^2/с^2
N := H_T*G explicit, ALL → 1.892*10^5*339.1 = 64157720  # Вт
q_y := N/(ω*(R_пер - R_вт)*m*((R_пер + R_вт)/2)) = 8248.21  # Н/м
M_ξq(z) := q_y*(R_пер - z)^2/2
M_ηq(R_вт) = 1357.95  # Н*м
M_ξq(R_вт) = 1435.6  # Н*м
# По построенной модели лопатки в системе NX Siemens определим моменты инерции относительно главных центральных осей:
I_u := 1.71*10^-6  # м^4
I_v := 1.47*10^-5  # м^4
# Угол поворота главных центральных осей:
φ := 32.1
# Моменты от аэродинамических сил(суммарные моменты) относительно главных центральных  осей
М_u := M_ξq(R_вт)*cos(φ*π/180) + M_ηq(R_вт)*sin(φ*π/180) = 1937.74  # Н*м
М_v := -M_ξq(R_вт)*sin(φ*π/180) + M_ηq(R_вт)*cos(φ*π/180) = 387.469  # Н*м
# Расчетная схема:
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# Определим положение нейтральной оси:
β := atan(М_v*I_u/(М_u*I_v)) = 0.0232564  # (радиан)
β*180/π = 1.33249
# Рассмотрим напряженное состояние в наболее удаленных точках:
# Точка А
v_A := 35.7*10^-3  # м
М_u := 1937.74
М_v := 387.5
u_A := 147.0*10^-3  # м
σ_A := М_u*v_A/I_u - М_v*u_A/I_v explicit, ALL → 1937.74*35.7*10^-3/(1.71*10^-6) - 387.5*147.0*10^-3/(1.47*10^-5) = 36579572  # Па
# Точка B(оба момента создают растяжение)
v_B := 47.1*10^-3  # м
u_B := -54.9*10^-3  # м
σ_B := М_u*v_B/I_u - М_v*u_B/I_v explicit, ALL → 1.938*10^3*47.1*10^-3/(1.71*10^-6) - 387.5*(-54.9*10^-3)/(1.47*10^-5) = 54820032  # Па
# Наиболее опасная точка B
σ_р(R_вт) = 365058764  # Па
σ_Σ := σ_р(R_вт) + 5.482*10^7 = 419878764  # Па
# Предел текучести:
σ_T := 760*10^6  # Па
# Коэффициент запаса:
σ_T/σ_Σ = 1.81005
