ORIGIN := 1
i := 0 .. 12
k_г := 1.277
# Давление газа на входе на сопловые лопатки статическое:
p_1 := 3298.208*10^3
R_г := 289
# Температура торможения на входе на сопловые лопатки:
T*_г := 1773 + 200 = 1973
# Критическая скорость звука
a_кр := sqrt(2*k_г/(k_г + 1)*R_г*T*_г) explicit, ALL → sqrt(2*1.277/(1.277 + 1)*289*1973) = 799.726
# Скорость входа в сопловую решетку:
c_1 := 110 = 110
# Приведенная скорость на входе в сопловую решетку
τ(λ, k) := (1 - (k - 1)/(k + 1)*λ^2)
λ_1 := c_1/a_кр = 0.137547
# Статическая температура на входе на сопловые лопатки:
T_1 := T*_г*τ(λ_1, k_г) = 1968.46  # К
П(λ, k) := (1 - (k_г - 1)/(k_г + 1)*λ^2)^(k_г/(k_г - 1))
# Давление на выходе из сопловых лопаток статическое:
p_2 := 717.498*10^3
# Статическая температура на выходе из сопловых лопаток:
T_2 := 1530.473
# Давление торможения охлаждающего воздуха:
p_к.t := 3440.7*10^3
# Коэффициент сохранения полного давления:
σ_0 := 0.97
# Температура охлаждающего воздуха:
T_к.t := 859.8
# Расход охлаждающего воздуха:
ΔG := 5759.0*10^-3
# Число сопловых лопаток:
N := 38
# Расход воздуха на охлаждение одной лопатки:
ΔG_1 := ΔG/N = 0.151553  # кг/с
# Высота лопатки:
h := 33.043*10^-3 = 0.033043
# Скорость на выходе из сопловой решетки:
c_2 := 717.498
# Коэффициент избытка воздуха:
α := 2.039
# Длина дуги корыта:
l_к := 61.26*10^-3
# Длина дуги спинки:
l_с := 66.829*10^-3
# Длина хорды профиля:
b_проф := 55.691*10^-3
# Углы профиля:
α_0 := 90  # град
α_1 := 17  # град
# Относительный шаг решетки:
t_отн := 0.827
# Коэффициент теплопроводности стенки лопатки
λ_мет := 20  # Вт/(м*К)
# Толщина стенки лопатки
δ := 0.5*10^-3  # мм
# Коэффициент теплопроводности ТЗП (Керамика системы (Zr-T-Gd)O
λ_тзп := 1.3  # Вт/(м*К)
# Толщина ТЗП
δ_тзп := 1*10^-4  # мм
# Коэффициент расхода
μ := 0.8
S_отн := stack(-0.9, -0.8, -0.7, -0.6, -0.5, -0.4, -0.3, -0.2, -0.1, 0, 0.1, 0.2, 0.3, 0.411, 0.5, 0.6, 0.7, 0.8, 0.9)
# Расчет конвективного охлаждения
# Температура газа по обводу профиля определялась на основании типичной кривой изменения приведенной скорости потока по обводу профиля
λ := stack(1, 0.95, 0.93, 0.9, 0.8, 0.78, 0.65, 0.5, 0.4, 0, 0.4, 0.7, 0.9, 1, 1.02, 1.04, 1.06, 1.07, 1.074)
# Приведенная скорость на выходе:
λ_2 := c_2/a_кр explicit, ALL → 717.498/799.726 = 0.897179
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λ = [1; 0.95; 0.93; 0.9; 0.8; 0.78; 0.65; 0.5; 0.4; 0; 0.4; 0.7; 0.9; 1; 1.02; 1.04; 1.06; 1.07; 1.074]
S_отн = [-0.9; -0.8; -0.7; -0.6; -0.5; -0.4; -0.3; -0.2; -0.1; 0; 0.1; 0.2; 0.3; 0.411; 0.5; 0.6; 0.7; 0.8; 0.9]
λ(S) := interp(cspline(S_отн, λ), S_отн, λ, S)
# Расчет конвективного охлаждения
# Площади охлаждающих каналов
# в среднем сечении лопатки:
# Периметр охлаждающих каналов
# в среднем сечении лопатки:
S_ср.1 := 78.55*10^-6  # м^2
Π_ср.1 := 37.23*10^-3  # м
S_ср.2 := 123.96*10^-6  # м^2
Π_ср.2 := 50.43*10^-3  # м
S_ср.3 := 96.31*10^-6  # м^2
Π_ср.3 := 51.49*10^-3  # м
S_ср.4 := 55.69*10^-6  # м^2
Π_ср.4 := 46.25*10^-3  # м
# Гидравлический диаметр охлаждающих каналов:
d_г.ср.1 := 4*S_ср.1/Π_ср.1 = 0.00843943  # м
d_г.ср.3 := 4*S_ср.3/Π_ср.3 = 0.00748184  # м
R := 289
d_г.ср.4 := 4*S_ср.4/Π_ср.4 = 0.00481643  # м
d_г.ср.2 := 4*S_ср.2/Π_ср.2 = 0.00983224  # м
# Расчет среднего коэффициента теплоотдачи газа
# Плотность потока на выходе
ρ_2 := p_2/(R*T_2) explicit, ALL → 717.498*10^3/(289*1530.473) = 1.62217  # кг/м^3
# Вязкость газа на выходе
μ_г2 := 17.6*10^-6*(T_2/273)^0.68 = 5.68334e-5  # Па*с
# Осевая хорда профиля
b_са := 0.046  # м
# Число Рейнольдса на выходе:
Re_2 := ρ_2*c_2*b_са/μ_г2 explicit, ALL → 1.62*717.5*0.05/(5.68*10^-5) = 942046
# Коэффициент теплопроводности газа:
λ_г2 := 0.0244*(T_2/273)^0.82 = 0.100298  # Вт/(м*К)
# Угол входа потока
α_0 := 90  # deg
# Угол выхода потока
α_1 := 17  # deg
# Ширина лопаточного венца
B_са := 0.0628  # м  # тут вопрос
# По зависимости КАИ:
S := sin(α_0*deg)/sin(α_1*deg)*(2*b_са/(t_отн*b_проф*sin(α_0*deg + α_1*deg)*cos((α_0*deg - α_1*deg)/2)^2) - 1)^0.5 = 5.11051
# Поправка на концевые явления
K_конц := 1.1
# Поправка на излучение
K_изл := 1 + 50*T*_г*10^-3*((0.1 + 1.15)/5000)*(1 + 1150/T*_г + (1150/T*_г)^2 + (1150/T*_г)^3) = 1.0523
# Поправка на турбулентность
Tu := 3.5
K_Tu := 0.9*(Tu + 1)^0.2 = 1.21586
Вт/(м^2*К)
# Средний коэффициент теплоотдачи газа
α_ср := λ_г2/b_са*0.206*Re_2^0.66*S^-0.58*K_конц*K_Tu*K_изл explicit, ALL → 0.1/0.046*0.206*(9.42*10^5)^0.66*5.111^-0.58*1.1*1.216*1.052 = 2151.78
# Распределение значений коэффициента теплоотдачи газа по обводу профиля
# поперечного сечения лопатки
# Входная кромка
# Поправка, учитывающая степень турбулентности потока
K_Tu := 0.9*(1 + 0.1*3.5^1.4) = 1.41992
# Теплопроводность газа
λ_уч1 := 0.0244*(T_1/273)^0.82 = 0.123288  # Вт/(м*К)
# Плотность потока в области входной кромки
ρ_уч1 := p_1/(R*T_1) explicit, ALL → 3298.208*10^3/(289*1968.459) = 5.79767  # кг/м^3
# Вязкость газа
μ_г1 := 17.6*10^-6*(T_1/273)^0.68 = 6.74416e-5  # Па*с
# Диаметр входной кромки
d_вх := 6*10^-3  # м
# Диаметр выходной кромки
d_вых := 4*10^-3  # м
# Число Рейнольдса:
Re_1уч := ρ_уч1*c_1*d_вх/μ_г1 explicit, ALL → 5.8*110*6*10^-3/(6.7*10^-5) = 56737.4
# Коэффициент теплоотдачи газа
α_уч1 := λ_уч1/d_вх*0.635*Re_1уч^0.5*K_Tu explicit, ALL → 0.123/(6*10^-3)*0.635*(5.674*10^4)^0.5*1.42 = 4413.08  # Вт/(м^2*К)
# Спинка 1
α_уч2 := α_ср explicit, ALL → 2.152*10^3 = 2151.78  # Вт/(м^2*К)
# если степень реактивности 0.27
# Спинка 2
Вт/(м^2*К)
α_уч3 := α_ср explicit, ALL → 2.152*10^3 = 2151.78
# Выходная кромка со стороны спинки
α_уч4 := 0.057*λ_г2/b_са*Re_2^0.71 explicit, ALL → 0.057*0.1/0.046*(9.42*10^5)^0.71 = 2167.71  # Вт/(м^2*К)
# Выходная кромка
α_уч5 := 0.00325*λ_г2/b_са*Re_2^0.93 explicit, ALL → 3.25*10^-3*0.1/0.046*(9.42*10^5)^0.93 = 2548.63  # Вт/(м^2*К)
# Выходная кромка со стороны вогнутой поверхности
α_уч6 := 0.051*λ_г2/b_са*Re_2^0.73 explicit, ALL → 0.051*0.1/0.046*(9.42*10^5)^0.73 = 2553.75  # Вт/(м^2*К)
# Вогнутная поверхность
α_уч7 := 0.85*α_ср explicit, ALL → 0.85*2.152*10^3 = 1829.02  # Вт/(м^2*К)
# Распределение коэффициентов теплоотдачи по профилю
х_1 := π*d_вх/2 = 0.00942478  # мм
х_2 := l_с*0.65 = 0.0434389  # мм
х_4 := 0.15*b_са = 0.0069  # мм
х_3 := l_с - х_4 - х_2 = 0.0164901  # мм
х_5 := π*d_вых/2  # мм
x_6 := х_4 = 0.0069
x_7 := l_к - x_6 = 0.05436
# Коэффициенты теплоотдачи
α_сп(x) :=
    α_уч1 if 0 ≤ x < х_1/2
    α_уч2 if х_1/2 ≤ x < х_2 + х_1/2
    α_уч3 if х_2 + х_1/2 ≤ x < х_3 + х_2 + х_1/2
    α_уч4 if х_3 + х_2 + х_1/2 ≤ x < l_с
    α_уч5 if l_с ≤ x ≤ l_с + х_5/2
α_к(x) :=
    α_уч5 if l_к ≤ x < l_к + х_5/2
    α_уч6 if х_1/2 + x_7 ≤ x < l_к
    α_уч7 if х_1/2 ≤ x < х_1/2 + x_7
    α_уч1 if 0 ≤ x ≤ х_1/2
x_к := 0, 0.0001 .. l_к
x_с := 0, 0.0001 .. l_с
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# Распределение коэффициентов теплоотдачи по каналам охлаждения
# Расход через отверстия в выходной кромке
# Число отверстий выходной кромки:
N_вых := 18
# тут вопрос
G_вых.кр := N_вых*ΔG_1*1/45 = 0.0606211  # кг/с
R_в := 287
# Расходы воздуха на входе в охлаждающие каналы
G_охл.1 := S_ср.1*ΔG/((S_ср.1 + S_ср.2 + S_ср.3 + S_ср.4)*N) = 0.03358
G_охл.2 := S_ср.2*ΔG/((S_ср.1 + S_ср.2 + S_ср.3 + S_ср.4)*N) = 0.0529928
G_охл.3 := S_ср.3*ΔG/((S_ср.1 + S_ср.2 + S_ср.3 + S_ср.4)*N) = 0.0411724  # кг/с
G_охл.4 := S_ср.4*ΔG/((S_ср.1 + S_ср.2 + S_ср.3 + S_ср.4)*N) = 0.0238074
F_1 := □  # error: Пустой местозаполнитель.
# Канал №1
# Параметры потока
T_охл.кан1 := T_к.t = 859.8  # К
p_охл.кан1 := p_к.t = 3440700  # Па
# Истинная теплоемкость охлаждающего воздуха:
c_p.т750(T) := (0.26 + 0.032*(1.176*10^-3*T - 0.88235) + (-1)*((0.374*10^-2)*(5.5556*10^-6*T^2 - 1.3056*10^-2*T + 6.67)))
c_p.т749(T) := (0.2407 + 0.0193*(2.5*10^-3*T - 0.875) + ((2*10^-3)*(2.5*10^-5*T^2 - 0.0275*T + 6.5625)))
c_p.т749(T) := c_p.т749(T)*4187  # Дж/(кг*К)
c_p.т750(T) := c_p.т750(T)*4187  # Дж/(кг*К)
c_p.т(T) :=
    c_p.т750(T) if T ≥ 750
    c_p.т749(T) otherwise
c_p.т(T_охл.кан1) = 1112.9  # Дж/(кг*К)
# Показатель адиабаты
k_охл1 := c_p.т(T_охл.кан1)/(c_p.т(T_охл.кан1) - R_в) = 1.3475
# Критическая скорость звука
a_кр.кан.1 := sqrt(2*k_охл1/(k_охл1 + 1)*R_в*T_охл.кан1) explicit, ALL → sqrt(2*1.3/(1.3 + 1)*287*859.8) = 532.251  # м/с
# Приведенная скорость в среднем сечении
q_кан1 := G_охл.1*sqrt(T_охл.кан1)/(0.0396*p_охл.кан1*S_ср.1) = 0.0920008
q(λ, k) := ((k + 1)/2)^(1/(k - 1))*λ*(1 - (k - 1)/(k + 1)*λ^2)^(1/(k - 1))
(G_охл.1 + G_охл.2 + G_охл.3 + G_охл.4)*49 = 7.42608
λ_кан1 := root(q_кан1 - q(λ, k_охл1), λ, 0, 1) = 0.058103
# Скорость потока
С_охл.1 := λ_кан1*a_кр.кан.1 explicit, ALL → 0.058*532.251 = 30.9254  # м/с
# Плотность по параметрам торможения
ρ_охл.1т := p_охл.кан1/(R_в*T_охл.кан1) explicit, ALL → 3440700/(287*859.8) = 13.9434  # кг/м^3
# Плотность по статическим параметрам
ρ_охл.1 := ρ_охл.1т*(1 - (k_охл1 - 1)/(k_охл1 + 1)*λ_кан1^2)^(1/(k_охл1 - 1)) explicit, ALL → 13.94*(1 - (1.35 - 1)/(1.35 + 1)*0.06^2)^(1/(1.35 - 1)) = 13.9233
ρ_охл.1 = 13.9233  # кг/м^3
# Вязкость воздуха:
μ_в.кан.1 := 17.6*10^-6*(T_охл.кан1/273)^0.68 = 3.83983e-5  # Па*с
# Число Рейнольдса
Re_охл.1 := С_охл.1*d_г.ср.1*ρ_охл.1/μ_в.кан.1 explicit, ALL → 30.925*0.008*13.923/(3.84*10^-5) = 94636.5
# Коэффициент теплопроводности воздуха:
λ_в.кан.1 := 0.0244*(T_охл.кан1/273)^0.82 = 0.062509  # Вт/(м*К)
# Коэффициент теплоотдачи по каналу охлаждения
α_охл.1 := λ_в.кан.1/d_г.ср.1*0.018*Re_охл.1^0.8 explicit, ALL → 0.1/(8.4*10^-3)*0*(9.5*10^4)^0.8 = 1275.7  # Вт/(м^2*К)  # возможно добавить коэффициенты
# Потери давления от входа до среднего сечения лопатки:
Δp_пот.1 := 0.3164/Re_охл.1^0.25*ρ_охл.1*С_охл.1^2/2*h/d_г.ср.1 = 470.253  # Па
# Канал №2
# Параметры потока
T_охл.кан2 := T_к.t = 859.8  # К
p_охл.кан2 := p_к.t = 3440700
# Па
c_p.т(T_охл.кан2) = 1112.9  # Дж/(кг*К)
# Показатель адиабаты
k_охл2 := c_p.т(T_охл.кан2)/(c_p.т(T_охл.кан2) - R_в) explicit, ALL → 1.123*10^3/(1.123*10^3 - 287) = 1.3435
# Критическая скорость звука
a_кр.кан2 := sqrt(2*k_охл2/(k_охл2 + 1)*R_в*T_охл.кан2) explicit, ALL → sqrt(2*1.3/(1.3 + 1)*287*859.8) = 531.913  # м/с
# Приведенная скорость в среднем сечении
q_кан2 := G_охл.2*sqrt(T_охл.кан2)/(0.0396*p_охл.кан2*S_ср.2) = 0.0920008
q(λ, k) := ((k + 1)/2)^(1/(k - 1))*λ*(1 - (k - 1)/(k + 1)*λ^2)^(1/(k - 1))
λ_кан2 := root(q_кан2 - q(λ, k_охл2), λ, 0, 1) = 0.0580797
# Скорость потока
С_охл.2 := λ_кан2*a_кр.кан2 explicit, ALL → 0.058*531.913 = 30.8933  # м/с
# Плотность по параметрам торможения
ρ_охл.2т := p_охл.кан2/(R_в*T_охл.кан2) explicit, ALL → 3440700/(287*859.8) = 13.9434  # кг/м^3
# Плотность по статическим параметрам
ρ_охл.2 := ρ_охл.2т*(1 - (k_охл2 - 1)/(k_охл2 + 1)*λ_кан2^2)^(1/(k_охл2 - 1)) explicit, ALL → 13.94*(1 - (1.34 - 1)/(1.34 + 1)*0.06^2)^(1/(1.34 - 1)) = 13.9233
ρ_охл.2 = 13.9233  # кг/м^3
# Вязкость воздуха:
μ_в.кан.2 := 17.6*10^-6*(T_охл.кан2/273)^0.68 = 3.83983e-5  # Па*с
# Число Рейнольдса
Re_охл.2 := С_охл.2*d_г.ср.2*ρ_охл.2/μ_в.кан.2 explicit, ALL → 30.893*9.832*10^-3*13.923/(3.84*10^-5) = 110141
# Коэффициент теплопроводности воздуха:
λ_в.кан.2 := 0.0244*(T_охл.кан2/273)^0.82 = 0.062509  # Вт/(м*К)
# Коэффициент теплоотдачи по каналу охлаждения
α_охл.2 := λ_в.кан.2/d_г.ср.2*0.018*Re_охл.2^0.8 explicit, ALL → 0.06/(9.83*10^-3)*0.02*(1.1*10^5)^0.8 = 1236.29  # Вт/(м^2*К)
# Потери давления от входа до среднего сечения лопатки:
Δp_пот.2 := 0.3164/Re_охл.2^0.25*ρ_охл.2*С_охл.2^2/2*h/(2*d_г.ср.2) = 193.905  # Па
# Коэффициенты теплоотдачи в каналах 3 и 4 рассчитываются аналогично
# [area: Канал №3]
# Канал №3
# Параметры потока
T_охл.кан3 := T_к.t = 859.8  # К
p_охл.кан3 := p_охл.кан1 = 3440700  # Па
c_p.т(T_охл.кан3) = 1112.9  # Дж/(кг*К)
# Показатель адиабаты
k_охл3 := c_p.т(T_охл.кан3)/(c_p.т(T_охл.кан3) - R_в) explicit, ALL → 1122.52068192/(1122.52068192 - 287) = 1.3435
# Критическая скорость звука
a_кр.кан3 := sqrt(2*k_охл3/(k_охл3 + 1)*R_в*T_охл.кан3) explicit, ALL → sqrt(2*1.343/(1.343 + 1)*287*859.8) = 531.913  # м/с
# Расход воздуха в среднем сечении
G_охл.3ср := G_охл.3  # кг/с
# Приведенная скорость в среднем сечении
q_кан3 := G_охл.3ср*sqrt(T_охл.кан3)/(0.0396*p_охл.кан3*S_ср.3) = 0.0920008
q(λ, k) := ((k + 1)/2)^(1/(k - 1))*λ*(1 - (k - 1)/(k + 1)*λ^2)^(1/(k - 1))
λ_кан3 := root(q_кан3 - q(λ, k_охл3), λ, 0, 1) = 0.0580797
# Скорость потока
С_охл.3 := λ_кан3*a_кр.кан3 explicit, ALL → 0.058*531.913 = 30.8933  # м/с
# Плотность по параметрам торможения
ρ_охл.3т := p_охл.кан3/(R_в*T_охл.кан3) explicit, ALL → 3440700/(287*859.8) = 13.9434  # кг/м^3
# Плотность по статическим параметрам
ρ_охл.3 := ρ_охл.3т*(1 - (k_охл3 - 1)/(k_охл3 + 1)*λ_кан3^2)^(1/(k_охл3 - 1)) explicit, ALL → 13.943*(1 - (1.343 - 1)/(1.343 + 1)*0.058^2)^(1/(1.343 - 1)) = 13.9233
кг/м^3
ρ_охл.3 = 13.9233  # кг/м^3
# Вязкость воздуха:
μ_в.кан.3 := 17.6*10^-6*(T_охл.кан3/273)^0.68 = 3.83983e-5  # Па*с
# Число Рейнольдса
Re_охл.3 := С_охл.3*d_г.ср.3*ρ_охл.3/μ_в.кан.3 explicit, ALL → 30.893*7.482*10^-3*13.923/(3.84*10^-5) = 83811.4
# Коэффициент теплопроводности воздуха:
λ_в.кан.3 := 0.0244*(T_охл.кан3/273)^0.82 = 0.062509  # Вт/(м*К)
# Коэффициент теплоотдачи по каналу охлаждения
α_охл.3 := λ_в.кан.3/d_г.ср.3*0.018*Re_охл.3^0.8 explicit, ALL → 0.063/(7.482*10^-3)*0.018*(8.381*10^4)^0.8 = 1305.72  # Вт/(м^2*К)
# Потери давления от входа до среднего сечения лопатки:
# [area: Канал №4]
# Канал №4
# Параметры потока
T_охл.кан4 := T_к.t = 859.8  # К
p_охл.кан4 := p_охл.кан3 = 3440700  # Па
c_p.т(T_охл.кан4) = 1112.9  # Дж/(кг*К)
# Показатель адиабаты
k_охл4 := c_p.т(T_охл.кан4)/(c_p.т(T_охл.кан4) - R_в) explicit, ALL → 1122.52068192/(1122.52068192 - 287) = 1.3435
G_конв := 0.001
# Критическая скорость звука
(G_c1 + G_c2 + G_c3 + G_c4 + G_c5 + G_к1 + G_к2 + G_к3 + G_к4 + G_к5 + (2*G_доп + G_вых.кр))*49 =  # error: Эта переменная не определена.
a_кр.кан4 := sqrt(2*k_охл4/(k_охл4 + 1)*R_в*T_охл.кан4) explicit, ALL → sqrt(2*1.34349837917/(1.34349837917 + 1)*287*859.8) = 531.913  # м/с
# Расход воздуха в среднем сечении
G_охл.4ср := G_охл.4 = 0.0238074  # кг/с
# Приведенная скорость в среднем сечении
q_кан4 := G_охл.4*sqrt(T_охл.кан4)/(0.0396*p_охл.кан4*S_ср.4) = 0.0920008
q(λ, k) := ((k + 1)/2)^(1/(k - 1))*λ*(1 - (k - 1)/(k + 1)*λ^2)^(1/(k - 1))
λ_кан4 := root(q_кан4 - q(λ, k_охл4), λ, 0, 1) = 0.0580797
# Скорость потока
С_охл.4 := λ_кан4*a_кр.кан4 explicit, ALL → 0.0580796546478*531.913375533 = 30.8933  # м/с
# Плотность по параметрам торможения
ρ_охл.4т := p_охл.кан4/(R_в*T_охл.кан4) explicit, ALL → 3440700/(287*859.8) = 13.9434  # кг/м^3
# Плотность по статическим параметрам
ρ_охл.4 := ρ_охл.4т*(1 - (k_охл4 - 1)/(k_охл4 + 1)*λ_кан4^2)^(1/(k_охл4 - 1)) explicit, ALL → 13.9433609469*(1 - (1.34349837917 - 1)/(1.34349837917 + 1)*0.0580796546478^2)^(1/(1.34349837917 - 1)) = 13.9233
кг/м^3
ρ_охл.4 = 13.9233  # кг/м^3
# Вязкость воздуха:
μ_в.кан.4 := 17.6*10^-6*(T_охл.кан4/273)^0.68 = 3.83983e-5  # Па*с
# Число Рейнольдса
Re_охл.4 := С_охл.4*d_г.ср.4*ρ_охл.4/μ_в.кан.4 explicit, ALL → 30.8933451535*0.00481643243243*13.9233002671/3.83983291942e-5 = 53953.6
# Коэффициент теплопроводности воздуха:
λ_в.кан.4 := 0.0244*(T_охл.кан4/273)^0.82 = 0.062509  # Вт/(м*К)
# Коэффициент теплоотдачи по каналу охлаждения
α_охл.4 := λ_в.кан.4/d_г.ср.4*0.018*Re_охл.4^0.8 explicit, ALL → 0.0625089720712/0.00481643243243*0.018*53953.5804265^0.8 = 1425.95  # Вт/(м^2*К)
# Координаты каналов охлаждения
x_кан.с1 := 7.13*10^-3  # мм
x_кан.к1 := 4.89*10^-3  # мм
x_кан.с2 := 27.21*10^-3  # мм
x_кан.к2 := 19.14*10^-3  # мм
x_кан.с3 := 48.67*10^-3  # мм
x_кан.к3 := 38.62*10^-3  # мм
x_кан.с.вых := l_с
x_кан.к.вых := l_к
# Распределение коэффициентов теплоотдачи
α_кан.с(x) :=
    α_охл.1 if 0 ≤ x < x_кан.с1
    α_охл.2 if x_кан.с1 ≤ x < x_кан.с2
    α_охл.3 if x_кан.с2 ≤ x < x_кан.с3
    α_охл.4 if x_кан.с3 ≤ x < x_кан.с.вых
α_кан.к(x) :=
    α_охл.1 if 0 ≤ x < x_кан.к1
    α_охл.2 if x_кан.к1 ≤ x < x_кан.к2
    α_охл.3 if x_кан.к2 ≤ x < x_кан.к3
    α_охл.4 if x_кан.к3 ≤ x < x_кан.к.вых
x_кан.с := 0, 0.000001 .. l_с
x_кан.к := 0, 0.000001 .. l_к
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# Коэффициент теплопередачи на спинке
K_сп(x) := 1/(1/α_кан.с(x) + δ/λ_мет + δ_тзп/λ_тзп + 1/α_сп(x))
# Коэффициент теплопередачи на корыте | Добавил ТЗП (мб убрать))))
K_к(x) := 1/(1/α_кан.с(x) + δ/λ_мет + δ_тзп/λ_тзп + 1/α_сп(x))
# Температура профиля по участкам
-x_кан.с2/l_с = -0.407159
λ_1 := λ(-x_кан.с1/l_с) = 0.421677
T_с.1c := T*_г*τ(λ_1, k_г) explicit, ALL → 1973*0.98 = 1930.32  # К
λ_2 := λ(-x_кан.с2/l_с) = 0.783259
T_с.2c := T*_г*τ(λ_2, k_г) explicit, ALL → 1973*0.93 = 1825.75  # К
λ_3 := λ(-x_кан.с3/l_с) = 0.933305
T_с.3c := T*_г*τ(λ_3, k_г) explicit, ALL → 1973*0.89 = 1763.93  # К
-x_кан.с3/l_с = -0.728277
λ_1к := λ(x_кан.к1/l_к) = 0.295168
T_с.1к := T*_г*τ(λ_1к, k_г) explicit, ALL → 1973*0.99 = 1952.09  # К
λ_2к := λ(x_кан.к2/l_к) = 0.918246
T_с.2к := T*_г*τ(λ_2к, k_г) explicit, ALL → 1973*0.9 = 1770.62  # К
λ_3к := λ(x_кан.к3/l_к) = 1.04667
T_с.3к := T*_г*τ(λ_3к, k_г) explicit, ALL → 1973*0.87 = 1710.05  # К
T_вх := 1592  # К
T_вых := T_2 = 1530.47  # К
λ_4к := λ((l_к - 4*10^-3)/l_к) = 1.07539
T_с.4к := T*_г*τ(λ_4к, k_г) explicit, ALL → 1973*0.86 = 1695.43  # К
λ_4с := λ((l_с - 4*10^-3)/l_с) = 1.07565
T_с.4с := T*_г*τ(λ_4с, k_г) explicit, ALL → 1973*0.86 = 1695.3  # К
T_с(x) :=
    T_вх if 0 ≤ x < 3*10^-3
    T_с.1c if 3*10^-3 ≤ x < x_кан.с1
    T_с.2c if x_кан.с1 ≤ x < x_кан.с2
    T_с.3c if x_кан.с2 ≤ x < x_кан.с3
    T_с.4с if x_кан.с3 ≤ x < l_с - 2*10^-3
    T_вых if l_с - 2*10^-3 ≤ x < l_с
T_к(x) :=
    T_вх if 0 ≤ x < 3*10^-3
    T_с.1к if 3*10^-3 ≤ x < x_кан.к1
    T_с.2к if x_кан.к1 ≤ x < x_кан.к2
    T_с.3к if x_кан.к2 ≤ x < x_кан.к3
    T_с.4к if x_кан.к3 ≤ x < l_с - 2.5*10^-3
    T_вых if l_с - 2*10^-3 ≤ x < l_к
# Тепловой поток в лопатке на спинке
Q_сп(x) := K_сп(x)*(T_с(x) - T_к.t)
# Тепловой поток в лопатке на корытце
Q_к(x) := K_к(x)*(T_к(x) - T_к.t)
# Температура спинки
Т_ст.внеш.с(x) := T_с(x) - Q_сп(x)*(δ_тзп/λ_тзп + 1/α_к(x))
# Температура корытца
Т_ст.внеш.к(x) := T_к(x) - Q_к(x)*(δ_тзп/λ_тзп + 1/α_к(x))
# Температура внутренней поверхности спинки
Т_ст.внут.с(x) := Т_ст.внеш.с(x) - δ/λ_мет*Q_сп(x)
# Температура внутренней поверхности корытца
Т_ст.внут.к(x) := Т_ст.внеш.к(x) - δ/λ_мет*Q_к(x)
# Распределение температуры по обводу профиля
x_сп := 0, 0.0001 .. l_с
x_кор := 0, 0.0001 .. l_к
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# Суммарный расход охлаждающего воздуха
G_сум := (G_охл.1 + G_охл.2 + G_охл.3 + G_охл.4)*45 = 6.81987
G_сум/ΔG = 1.18421
# По графикам распределения температуры стенки внешней поверхности лопатки видно, что конвективное охлаждение не обеспечивает необходимую температуру лопатки. Следовательно необходимо использовать конвективно-пленочное охлаждение.
i := 0 .. 5
# Расчет пленочного охлаждения
# Эффект тепловой защиты поверхности лопатки при пленочном охлаждении достигается путем оттеснения горячего потока газа от стенки пленкой охлаждающего воздуха. Для расчета требуемого по условиям охлаждения параметра вдува необходимо знать локальную скорость газа в месте вдува пленки воздуха на поверхность лопатки. Скорость газа определялась на основании типичной кривой изменения приведенной скорости потока по обводу профиля.
T_охл.кан.с := [757.4; 757.4; 757.4; 757.4; 757.4; 757.4]  # меняем
p_охл.кан.с := [2.3*10^6; 2.3*10^6; 2.3*10^6; 2.3*10^6; 2.3*10^6; 2.3*10^6]
# Принимаем абсолютные координаты точек выдува охлаждающего воздуха:
x_с.1 := l_с*0.06  # м
x_к.1 := l_к*0.07  # м
x_с.2 := l_с*0.12  # м
x_к.2 := l_к*0.15  # м
x_с.3 := l_с*0.21  # м
x_к.3 := l_к*0.24  # м
x_с.4 := l_с*0.35  # м
x_к.4 := l_к*0.4  # м
x_с.5 := l_с*0.7  # м
x_к.5 := l_к*0.78  # м
x_с.6 := l_с = 0.066829  # м
x_к.6 := l_к = 0.06126  # м
N_отв.с1 := 21
d_с.1 := 0.35*10^-3  # м
N_отв.с2 := 20
d_с.2 := 0.4*10^-3  # м
T_охл.кан.к := [757.4; 757.4; 757.4; 757.4; 757.4; 757.4]
p_охл.кан.к := [2.3*10^6; 2.3*10^6; 2.3*10^6; 2.3*10^6; 2.3*10^6; 2.3*10^6]
N_отв.с3 := 19
d_с.3 := 0.4*10^-3  # м
N_отв.с4 := 20
d_с.4 := 0.4*10^-3  # м
N_отв.с5 := 22
d_с.5 := 0.4*10^-3  # м
N_отв.к1 := 21
d_к.1 := 0.36*10^-3  # м
N_отв.к2 := 20
d_к.2 := 0.4*10^-3  # м
N_отв.к3 := 19
d_к.3 := 0.4*10^-3  # м
N_отв.к4 := 20
d_к.4 := 0.4*10^-3  # м
N_отв.к5 := 22
d_к.5 := 0.4*10^-3  # м
# Расчет эффективности и температуры пленки
# [area: Спинка. Ряд отверстий №1]
# Спинка. Ряд отверстий №1.
p*_г := 2237256
# Приведенная скорость потока
λ_1 := λ(-x_с.1/l_с) = 0.211229
# Давление газа во внешнем потоке статическое:
p_с.1 := p*_г*П(λ_1, k_г) explicit, ALL → 2.237*10^6*0.975 = 2181819  # Па
# Температура внешнего потока статическая:
T_с.1 := T*_г*τ(λ_1, k_г) explicit, ALL → 1.973*10^3*0.995 = 1962.29  # К
# Температура торможения охлаждающего воздуха:
T*_охл.1.t := T_охл.кан.с[1] = 757.4  # К
# Показатель изоэнтропы по параметрам торможения
k_охл.с.1 := c_p.т(T*_охл.1.t)/(c_p.т(T*_охл.1.t) - R) = 1.36069
# Критическая скорость звука охлаждающего воздуха
a_кр.с.1 := sqrt(2*k_охл.с.1/(k_охл.с.1 + 1)*R*T*_охл.1.t) explicit, ALL → sqrt(2*1.361/(1.361 + 1)*289*757.4) = 502.327
# Принимаем давление торможения в охлаждающем канале номер 1:
p*_охл.1.t := p_охл.кан.с[1] = 2300000  # Па
# Плотность газа во внешнем потоке в области входной кромки:
ρ_г.1с := p_с.1/(R*T_с.1) explicit, ALL → 2.182*10^6/(289*1.962*10^3) = 3.84731  # кг/м^3
# Cкорость основного потока:
u_г.1с := λ_1*a_кр explicit, ALL → 0.211*799.726 = 168.926  # м/с
# Определение статических параметров потока воздуха
# Первое приближение
# Статическая температура охлаждающего воздуха
T_охл.с.1 := T*_охл.1.t - 80 explicit, ALL → 757.4 - 80 = 677.4  # К
# Статическая плотность охлаждающего воздуха
ρ_в.с.1 := p_с.1/(R_в*T_охл.с.1) = 11.2226
# Скорость истечения охлаждающего воздуха
u_в.с.1 := sqrt(2*(p*_охл.1.t - p_с.1)/ρ_в.с.1) explicit, ALL → sqrt(2*(2.3*10^6 - 2.182*10^6)/11.223) = 145.125  # м/с
# Приведенная скорость
λ_в1с := u_в.с.1/a_кр.с.1 explicit, ALL → 145.125/502.327 = 0.288905
# Статическое давление охлаждающего воздуха
p_охл.с.1 := p*_охл.1.t*П(λ_в1с, k_охл.с.1) explicit, ALL → 2.3*10^6*0.954 = 2194293  # Па
# Статическая температура охлаждающего воздуха
T_охл.с.1 := T*_охл.1.t*τ(λ_в1с, k_охл.с.1) explicit, ALL → 757.4*0.987 = 747.741  # К
# Второе приближение
# Статическая плотность охлаждающего воздуха
ρ_в1с := p_охл.с.1/(R_в*T_охл.с.1) = 10.225
# Скорость истечения охлаждающего воздуха
u_в.с.1 := sqrt(2*(p*_охл.1.t - p_с.1)/ρ_в1с) explicit, ALL → sqrt(2*(2.3*10^6 - 2.182*10^6)/10.225) = 152.04  # м/с
# Приведенная скорость
λ_в1с := u_в.с.1/a_кр.с.1 explicit, ALL → 152.04/502.327 = 0.302671
# Статическое давление охлаждающего воздуха
p_охл.с.1 := p*_охл.1.t*П(λ_в1с, k_охл.с.1) explicit, ALL → 2.3*10^6*0.95 = 2184187  # Па
# Статическая температура охлаждающего воздуха
T_охл.с.1 := T*_охл.1.t*τ(λ_в1с, k_охл.с.1) explicit, ALL → 757.4*0.986 = 746.799  # К
# Третье приближение
# Статическая плотность охлаждающего воздуха
ρ_в1с := p_охл.с.1/(R_в*T_охл.с.1) = 10.1907
# Скорость истечения охлаждающего воздуха
u_в.с.1 := sqrt(2*(p*_охл.1.t - p_с.1)/ρ_в1с) explicit, ALL → sqrt(2*(2.3*10^6 - 2.182*10^6)/10.191) = 152.295  # м/с
# Приведенная скорость
λ_в1с := u_в.с.1/a_кр.с.1 explicit, ALL → 152.295/502.327 = 0.303179
# Статическое давление охлаждающего воздуха
p_охл.с.1 := p*_охл.1.t*П(λ_в1с, k_охл.с.1) explicit, ALL → 2.3*10^6*0.949 = 2183806  # Па
# Статическая температура охлаждающего воздуха
T_охл.с.1 := T*_охл.1.t*τ(λ_в1с, k_охл.с.1) explicit, ALL → 757.4*0.986 = 746.763  # К
# Эквивалентная высота щели:
s_э1с := N_отв.с1*π*d_с.1^2/4*(N_отв.с1 + 1)/(N_отв.с1*h) explicit, ALL → 21*π*(0.35*10^-3)^2/4*(21 + 1)/(21*0.033) = 6.40574e-5
# Параметр вдува на входной кромке:
b_1с := ρ_в1с*u_в.с.1/(ρ_г.1с*u_г.1с) explicit, ALL → 10.191*152.295/(3.847*168.926) = 2.38801
# Вязкость газа:
μ_г1 := 17.6*10^-6*(T_с.1/273)^0.68 = 6.72978e-5  # Па*с
# Число Рейнольдса по ширине щели:
Re_с1 := ρ_г.1с*u_в.с.1*s_э1с/μ_г1 explicit, ALL → 3.847*152.295*6.406*10^-5/(6.73*10^-5) = 557.714
# Температура торможения:
T_t := T*_г = 1973  # К
# Температурный фактор:
φ_1с := T*_охл.1.t/T_t explicit, ALL → 757.4/1973 = 0.383882
# Расчет эффективности пленки
A(x) := Re_с1^-0.25*b_1с^-1.3*φ_1с^-1.25*x/s_э1с
# Граница  участка:
x_кон.с1 := x_с.2 - x_с.1 = 0.00400974  # м
x_н.с1 := root(A(x) - 3, x, 0, 1) = 0.000874962  # м
θ_п.с1 := 1
x_п.с1 := root(A(x) - 11, x, 0, 1) = 0.00320819  # м
θ_o.с1(x) := (A(x)/7.43)^-0.95
θ_п.с1(x) := (A(x)/3)^-0.285
# Эффективность пленки
θ_с1(x) :=
    1 if x ≤ x_н.с1
    θ_п.с1(x) if x_н.с1 < x ≤ x_п.с1
    θ_o.с1(x) otherwise
x_с.2 = 0.00801948
# Температура пленки:
T_п.с1(x) := T_с.1 - θ_с1(x)*(T_с.1 - T*_охл.1.t)
T_п.с1(x_с.2) = 1614.7  # К
# Расход воздуха через отверстия ряда:
G_c1 := N_отв.с1*π*d_с.1^2/4*ρ_в1с*u_в.с.1 = 0.00313571
G_c1 = 0.00313571  # кг/с
# Отношение расхода воздуха к суммарному расходу охлаждающего воздуха:
G_c1/ΔG_1 explicit, ALL → 3.136*10^-3/0.152 = 0.0206906
# [area: Спинка. Ряд отверстий №2]
# Спинка. Ряд отверстий №2.
# Приведенная скорость потока
П(λ, k) := (1 - (k_г - 1)/(k_г + 1)*λ^2)^(k_г/(k_г - 1))
λ_2 := λ(-x_с.2/l_с) = 0.454002
# Давление газа во внешнем потоке статическое:
p*_г := 2237256  # Па
p_с.2 := p*_г*П(λ_2, k_г) explicit, ALL → 2.237*10^6*0.89 = 1990090  # Па
# Температура внешнего потока статическая:
T_с.2 := T*_г*τ(λ_2, k_г) explicit, ALL → 1973*0.97 = 1923.53  # К
# Температура торможения охлаждающего воздуха
T*_охл.2.t := T_охл.кан.с[2] = 757.4  # К
# Показатель изоэнтропы по параметрам торможения
k_охл.с.2 := c_p.т(T*_охл.2.t)/(c_p.т(T*_охл.2.t) - R) = 1.36069
# Критическая скорость звука охлаждающего воздуха
a_кр.с.2 := sqrt(2*k_охл.с.2/(k_охл.с.2 + 1)*R*T*_охл.2.t) explicit, ALL → sqrt(2*1.361/(1.361 + 1)*289*757.4) = 502.327
# Принимаем давление торможения в охлаждающем канале номер 1:
p*_охл.2.t := p_охл.кан.с[2] = 2300000  # Па
# Плотность газа во внешнем потоке в области входной кромки:
ρ_г.с2 := p_с.2/(R*T_с.2) explicit, ALL → 1.99*10^6/(289*1.924*10^3) = 3.57994  # кг/м^3
# Cкорость основного потока:
u_г.c2 := λ_2*a_кр explicit, ALL → 0.454*799.726 = 363.078  # м/с
# Определение статических параметров потока воздуха
# Первое приближение
# Статическая температура охлаждающего воздуха
T_охл.с.2 := T*_охл.2.t - 80 explicit, ALL → 757.4 - 80 = 677.4  # К
# Статическая плотность охлаждающего воздуха
ρ_в.с.2 := p_с.2/(R_в*T_охл.с.2) = 10.2364
# Скорость истечения охлаждающего воздуха
u_в.с.2 := sqrt(2*(p*_охл.2.t - p_с.2)/ρ_в.с.2) explicit, ALL → sqrt(2*(2.3*10^6 - 1.99*10^6)/10.236) = 246.071  # м/с
# Приведенная скорость
λ_в2с := u_в.с.2/a_кр.с.2 explicit, ALL → 246.071/502.327 = 0.489861
# Статическое давление охлаждающего воздуха
p_охл.с.2 := p*_охл.2.t*П(λ_в2с, k_охл.с.2) explicit, ALL → 2.3*10^6*0.872 = 2006371  # Па
# Статическая температура охлаждающего воздуха
T_охл.с.2 := T*_охл.2.t*τ(λ_в2с, k_охл.с.2) explicit, ALL → 757.4*0.963 = 729.63  # К
# Второе приближение
# Статическая плотность охлаждающего воздуха
ρ_в.с.2 := p_охл.с.2/(R_в*T_охл.с.2) = 9.58135
# Скорость истечения охлаждающего воздуха
u_в.с.2 := sqrt(2*(p*_охл.2.t - p_с.2)/ρ_в.с.2) explicit, ALL → sqrt(2*(2.3*10^6 - 1.99*10^6)/9.581) = 254.343  # м/с
# Приведенная скорость
λ_в2с := u_в.с.2/a_кр.с.2 explicit, ALL → 254.343/502.327 = 0.506329
# Статическое давление охлаждающего воздуха
p_охл.с.2 := p*_охл.2.t*П(λ_в2с, k_охл.с.2) explicit, ALL → 2.3*10^6*0.864 = 1987427  # Па
# Статическая температура охлаждающего воздуха
T_охл.с.2 := T*_охл.2.t*τ(λ_в2с, k_охл.с.2) explicit, ALL → 757.4*0.961 = 727.732  # К
# Третье приближение
# Статическая плотность охлаждающего воздуха
ρ_в.с.2 := p_охл.с.2/(R_в*T_охл.с.2) = 9.51564
# Скорость истечения охлаждающего воздуха
u_в.с.2 := sqrt(2*(p*_охл.2.t - p_с.2)/ρ_в.с.2) explicit, ALL → sqrt(2*(2.3*10^6 - 1.99*10^6)/9.516) = 255.22  # м/с
# Приведенная скорость
λ_в2с := u_в.с.2/a_кр.с.2 explicit, ALL → 255.22/502.327 = 0.508074
# Статическое давление охлаждающего воздуха
p_охл.с.2 := p*_охл.2.t*П(λ_в2с, k_охл.с.2) explicit, ALL → 2.3*10^6*0.863 = 1985392  # Па
# Статическая температура охлаждающего воздуха
T_охл.с.2 := T*_охл.2.t*τ(λ_в2с, k_охл.с.2) explicit, ALL → 757.4*0.961 = 727.527  # К
# Параметр вдува на входной кромке:
b_2с := ρ_в.с.2*u_в.с.2/(ρ_г.с2*u_г.c2) explicit, ALL → 9.5*255.2/(3.6*363.1) = 1.86843
# Вязкость газа:
μ_г2 := 17.6*10^-6*(T_с.2/273)^0.68 = 6.6391e-5  # Па*с
# Эквивалентная высота щели:
s_э2с := N_отв.с2*π*d_с.2^2/4*(N_отв.с2 + 1)/(N_отв.с2*h) explicit, ALL → 20*π*(0.4*10^-3)^2/4*(20 + 1)/(20*0.033) = 7.98637e-5
# Число Рейнольдса по ширине щели:
Re_c2 := ρ_г.с2*u_в.с.2*s_э2с/μ_г2 explicit, ALL → 3.6*255.2*8*10^-5/(6.6*10^-5) = 1099.08
# Температурный фактор:
φ_2с := T*_охл.2.t/T_t explicit, ALL → 757.4/1973 = 0.383882
# Расчет эффективности пленки
x_с.1 = 0.00400974
A(x) := Re_c2^-0.25*b_2с^-1.3*φ_2с^-1.25*x/s_э2с
x_с.2 = 0.00801948
# Граница  участка:
x_с.3 = 0.0140341
x_кон.с2 := x_с.3 - x_с.2 = 0.00601461  # м
x_н.с2 := root(A(x) - 3, x, 0, 1) = 0.000939497  # м
θ_п.с1 := 1
x_п.с2 := root(A(x) - 11, x, 0, 1) = 0.00344482  # м
θ_o.с2(x) := (A(x)/7.43)^-0.95
θ_п.с2(x) := (A(x)/3)^-0.285
# Эффективность пленки
θ_с2(x) :=
    1 if x ≤ x_н.с2
    θ_п.с2(x) if x_н.с2 < x ≤ x_п.с2
    θ_o.с2(x) otherwise
T_п.с1(x_кон.с2) = 1505.45
# Температура пленки в конце  участка:
T_п.с2 := T_п.с1(x_кон.с2) - θ_с2(x_кон.с2)*(T_п.с1(x_кон.с2) - T*_охл.2.t) = 1201.99  # К
# Расход воздуха через отверстия ряда:
G_c2 := N_отв.с2*π*d_с.2^2/4*ρ_в.с.2*u_в.с.2 = 0.00610368
G_c2 = 0.00610368  # кг/с
# Отношение расхода воздуха к суммарному расходу охлаждающего воздуха:
G_c2/ΔG_1 explicit, ALL → 6.104*10^-3/0.152 = 0.0402743
# Температура пленки по участку
T_п.с.2(x) := T_п.с1(x + x_кон.с1) - θ_с2(x)*(T_п.с1(x + x_кон.с1) - T*_охл.2.t)
T_п.с.2(x_с.3) = 1612.04
T_п.с.2(x_кон.с2 + x_кон.с1) = 1508.17
# [area: Спинка. Ряд отверстий №3]
# Ряд отверстий №3.
# Приведенная скорость потока
λ_3 := λ(-x_с.3/l_с) = 0.50685
# Давление газа во внешнем потоке статическое:
p_с.3 := p*_г*П(λ_3, k_г) explicit, ALL → 2.237*10^6*0.864 = 1932620  # Па
# Температура внешнего потока статическая:
T_с.3 := T*_г*τ(λ_3, k_г) explicit, ALL → 1973*0.97 = 1911.34  # К
# Температура торможения охлаждающего воздуха
T*_охл.3.t := T_охл.кан.с[3] = 757.4  # К
# Показатель изоэнтропы по параметрам торможения
k_охл.с.3 := c_p.т(T*_охл.3.t)/(c_p.т(T*_охл.3.t) - R) = 1.36069
# Критическая скорость звука охлаждающего воздуха
a_кр.с.3 := sqrt(2*k_охл.с.3/(k_охл.с.3 + 1)*R*T*_охл.3.t) explicit, ALL → sqrt(2*1.361/(1.361 + 1)*289*757.4) = 502.327
# Принимаем давление торможения в охлаждающем канале номер 1:
p*_охл.3.t := p_охл.кан.с[3] = 2300000  # Па
# Плотность газа во внешнем потоке в области входной кромки:
ρ_г.с3 := p_с.3/(R*T_с.3) explicit, ALL → 1.933*10^6/(289*1.911*10^3) = 3.49873  # кг/м^3
# Cкорость основного потока:
u_г.c3 := λ_3*a_кр explicit, ALL → 0.507*799.726 = 405.341  # м/с
# Определение статических параметров потока воздуха
# Первое приближение
# Статическая температура охлаждающего воздуха
T_охл.с.3 := T*_охл.3.t - 80 explicit, ALL → 757.4 - 80 = 677.4  # К
# Статическая плотность охлаждающего воздуха
ρ_в.с.3 := p_с.3/(R_в*T_охл.с.3) = 9.94075
# Скорость истечения охлаждающего воздуха
u_в.с.3 := sqrt(2*(p*_охл.3.t - p_с.3)/ρ_в.с.3) explicit, ALL → sqrt(2*(2.3*10^6 - 1.933*10^6)/9.941) = 271.871  # м/с
# Приведенная скорость
λ_в3с := u_в.с.3/a_кр.с.3 explicit, ALL → 271.871/502.327 = 0.541223
# Статическое давление охлаждающего воздуха
p_охл.с.3 := p*_охл.3.t*П(λ_в3с, k_охл.с.3) explicit, ALL → 2.3*10^6*0.846 = 1945720  # Па
# Статическая температура охлаждающего воздуха
T_охл.с.3 := T*_охл.3.t*τ(λ_в3с, k_охл.с.3) explicit, ALL → 757.4*0.955 = 723.502  # К
# Второе приближение
# Статическая плотность охлаждающего воздуха
ρ_в.с.3 := p_охл.с.3/(R_в*T_охл.с.3) = 9.37042
# Скорость истечения охлаждающего воздуха
u_в.с.3 := sqrt(2*(p*_охл.3.t - p_с.3)/ρ_в.с.3) explicit, ALL → sqrt(2*(2.3*10^6 - 1.933*10^6)/9.37) = 280.023  # м/с
# Приведенная скорость
λ_в3с := u_в.с.3/a_кр.с.3 explicit, ALL → 280.023/502.327 = 0.557451
# Статическое давление охлаждающего воздуха
p_охл.с.3 := p*_охл.3.t*П(λ_в3с, k_охл.с.3) explicit, ALL → 2.3*10^6*0.837 = 1925628  # Па
# Статическая температура охлаждающего воздуха
T_охл.с.3 := T*_охл.3.t*τ(λ_в3с, k_охл.с.3) explicit, ALL → 757.4*0.953 = 721.439  # К
# Третье приближение
# Статическая плотность охлаждающего воздуха
ρ_в.с.3 := p_охл.с.3/(R_в*T_охл.с.3) = 9.30018
# Скорость истечения охлаждающего воздуха
u_в.с.3 := sqrt(2*(p*_охл.3.t - p_с.3)/ρ_в.с.3) explicit, ALL → sqrt(2*(2.3*10^6 - 1.933*10^6)/9.3) = 281.078  # м/с
# Приведенная скорость
λ_в3с := u_в.с.3/a_кр.с.3 explicit, ALL → 281.078/502.327 = 0.559552
# Статическое давление охлаждающего воздуха
p_охл.с.3 := p*_охл.3.t*П(λ_в3с, k_охл.с.3) explicit, ALL → 2.3*10^6*0.836 = 1922995  # Па
# Статическая температура охлаждающего воздуха
T_охл.с.3 := T*_охл.3.t*τ(λ_в3с, k_охл.с.3) explicit, ALL → 757.4*0.952 = 721.167  # К
# Параметр вдува на входной кромке:
b_3с := ρ_в.с.3*u_в.с.3/(ρ_г.с3*u_г.c3) explicit, ALL → 9.3*281.078/(3.499*405.341) = 1.84326
# Вязкость газа:
μ_г3 := 17.6*10^-6*(T_с.3/273)^0.68 = 6.61046e-5  # Па*с
# Эквивалентная высота щели:
s_э3с := N_отв.с3*π*d_с.3^2/4*(N_отв.с3 + 1)/(N_отв.с3*h) explicit, ALL → 19*π*(0.4*10^-3)^2/4*(19 + 1)/(19*0.033) = 7.60607e-5
# Число Рейнольдса по ширине щели:
Re_s.c3 := ρ_г.с3*u_в.с.3*s_э3с/μ_г3 = 1131.53
# Температурный фактор:
φ_3с := T_охл.с.3/T_t explicit, ALL → 721.167/(1.973*10^3) = 0.365518
# Расчет эффективности пленки
A(x) := Re_s.c3^-0.25*b_3с^-1.3*φ_3с^-1.25*x/s_э3с
# Граница  участка:
x_кон.s3 := x_с.4 - x_с.3 = 0.00935606  # м
x_n.s3 := root(A(x) - 3, x, 0, 1) = 0.000832909  # м
θ_п.s1 := 1
x_p.s3 := root(A(x) - 11, x, 0, 1) = 0.003054  # м
θ_o.s3(x) := (A(x)/7.43)^-0.95
θ_п.s3(x) := (A(x)/3)^-0.285
T_п.с2 = 1201.99
# Эффективность пленки
x_кон.s3 = 0.00935606
θ_с3(x) :=
    1 if x ≤ x_n.s3
    θ_п.s3(x) if x_n.s3 < x ≤ x_p.s3
    θ_o.s3(x) otherwise
T_п.с.2(x_кон.s3) = 1484.14
# Температура пленки в конце  участка:
T_п.с.2(x_кон.с2) = 1306.38
T_п.s3 := T_п.с.2(x_кон.s3) - θ_с3(x_кон.s3)*(T_п.с.2(x_кон.s3) - T*_охл.3.t) = 1311.32  # К
T_п.с.2(x_кон.s3) = 1484.14
# Расход воздуха через отверстия ряда:
G_c3 := N_отв.с3*π*d_с.3^2/4*ρ_в.с.3*u_в.с.3 = 0.0062414
G_c3 = 0.0062414  # кг/с
# Отношение расхода воздуха к суммарному расходу охлаждающего воздуха:
G_c3/ΔG_1 explicit, ALL → 6.241*10^-3/0.152 = 0.0411831
# Температура пленки по участку
T_п.с3(x) := T_п.с.2(x + x_кон.с2) - θ_с3(x)*(T_п.с.2(x + x_кон.с2) - T*_охл.3.t)
# [area: Спинка. Ряд отверстий №4]
# Ряд отверстий №4.
# Приведенная скорость потока
λ_4 := λ(-x_с.4/l_с) = 0.731396
# Давление газа во внешнем потоке статическое:
p_с.4 := p*_г*П(λ_4, k_г) explicit, ALL → 2.237*10^6*0.733 = 1640556  # Па
# Температура внешнего потока статическая:
T_с.4 := T*_г*τ(λ_4, k_г) explicit, ALL → 1.973*10^3*0.935 = 1844.6  # К
# Температура торможения охлаждающего воздуха
T*_охл.4.t := T_охл.кан.с[4] = 757.4  # К
# Показатель изоэнтропы по параметрам торможения
k_охл.с.4 := c_p.т(T*_охл.4.t)/(c_p.т(T*_охл.4.t) - R) = 1.36069
# Критическая скорость звука охлаждающего воздуха
a_кр.с.4 := sqrt(2*k_охл.с.4/(k_охл.с.4 + 1)*R*T*_охл.4.t) explicit, ALL → sqrt(2*1.361/(1.361 + 1)*289*757.4) = 502.327
# Принимаем давление торможения в охлаждающем канале номер 1:
p*_охл.4.t := p_охл.кан.с[4] = 2300000  # Па
# Плотность газа во внешнем потоке в области входной кромки:
ρ_г.с4 := p_с.4/(R*T_с.4) explicit, ALL → 1.641*10^6/(289*1.845*10^3) = 3.07744  # кг/м^3
# Cкорость основного потока:
u_г.c4 := λ_4*a_кр explicit, ALL → 0.731*799.726 = 584.916  # м/с
# Определение статических параметров потока воздуха
# Первое приближение
# Статическая температура охлаждающего воздуха
T_охл.с.4 := T*_охл.4.t - 80 explicit, ALL → 757.4 - 80 = 677.4  # К
# Статическая плотность охлаждающего воздуха
ρ_в.с.4 := p_с.4/(R_в*T_охл.с.4) = 8.43848
# Скорость истечения охлаждающего воздуха
u_в.с.4 := sqrt(2*(p*_охл.4.t - p_с.4)/ρ_в.с.4) explicit, ALL → sqrt(2*(2.3*10^6 - 1.641*10^6)/8.438) = 395.341  # м/с
# Приведенная скорость
λ_в4с := u_в.с.4/a_кр.с.4 explicit, ALL → 395.341/502.327 = 0.787019
# Статическое давление охлаждающего воздуха
p_охл.с.4 := p*_охл.4.t*П(λ_в4с, k_охл.с.4) explicit, ALL → 2.3*10^6*0.697 = 1602797  # Па
# Статическая температура охлаждающего воздуха
T_охл.с.4 := T*_охл.4.t*τ(λ_в4с, k_охл.с.4) explicit, ALL → 757.4*0.905 = 685.721  # К
# Второе приближение
# Статическая плотность охлаждающего воздуха
ρ_в.с.4 := p_охл.с.4/(R_в*T_охл.с.4) = 8.14422
# Скорость истечения охлаждающего воздуха
u_в.с.4 := sqrt(2*(p*_охл.4.t - p_с.4)/ρ_в.с.4) explicit, ALL → sqrt(2*(2.3*10^6 - 1.641*10^6)/8.144) = 402.42  # м/с
# Приведенная скорость
λ_в4с := u_в.с.4/a_кр.с.4 explicit, ALL → 402.42/502.327 = 0.80111
# Статическое давление охлаждающего воздуха
p_охл.с.4 := p*_охл.4.t*П(λ_в4с, k_охл.с.4) explicit, ALL → 2.3*10^6*0.687 = 1581156  # Па
# Статическая температура охлаждающего воздуха
T_охл.с.4 := T*_охл.4.t*τ(λ_в4с, k_охл.с.4) explicit, ALL → 757.4*0.902 = 683.131  # К
# Третье приближение
# Статическая плотность охлаждающего воздуха
ρ_в.с.4 := p_охл.с.4/(R_в*T_охл.с.4) = 8.06472
# Скорость истечения охлаждающего воздуха
u_в.с.4 := sqrt(2*(p*_охл.4.t - p_с.4)/ρ_в.с.4) explicit, ALL → sqrt(2*(2.3*10^6 - 1.641*10^6)/8.065) = 404.398  # м/с
# Приведенная скорость
λ_в4с := u_в.с.4/a_кр.с.4 explicit, ALL → 404.398/502.327 = 0.805049
# Статическое давление охлаждающего воздуха
p_охл.с.4 := p*_охл.4.t*П(λ_в4с, k_охл.с.4) explicit, ALL → 2.3*10^6*0.685 = 1575080  # Па
# Статическая температура охлаждающего воздуха
T_охл.с.4 := T*_охл.4.t*τ(λ_в4с, k_охл.с.4) explicit, ALL → 757.4*0.901 = 682.399  # К
# Параметр вдува на входной кромке:
b_4с := ρ_в.с.4*u_в.с.4/(ρ_г.с4*u_г.c4) explicit, ALL → 8.065*404.398/(3.077*584.916) = 1.81182
# Вязкость газа:
μ_г4 := 17.6*10^-6*(T_с.4/273)^0.68 = 6.45262e-5  # Па*с
# Эквивалентная высота щели:
s_э4с := N_отв.с4*π*d_с.4^2/4*(N_отв.с4 + 1)/(N_отв.с4*h) explicit, ALL → 20*π*(0.4*10^-3)^2/4*(20 + 1)/(20*0.033) = 7.98637e-5
# Число Рейнольдса по ширине щели:
Re_s.c4 := ρ_г.с4*u_в.с.4*s_э4с/μ_г4 explicit, ALL → 3.077*404.398*7.986*10^-5/(6.453*10^-5) = 1540.33
# Температурный фактор:
φ_4с := T_охл.с.4/T_t explicit, ALL → 682.399/(1.973*10^3) = 0.345869
# Расчет эффективности пленки
A(x) := Re_s.c4^-0.25*b_4с^-1.3*φ_4с^-1.25*x/s_э4с
# Граница  участка:
x_кон.s4 := x_с.5 - x_с.4 = 0.0233901  # м
x_n.s4 := root(A(x) - 3, x, 0, 1) = 0.000862109  # м
θ_п.s1 := 1
x_p.s4 := root(A(x) - 11, x, 0, 1) = 0.00316107  # м
θ_o.s4(x) := (A(x)/7.43)^-0.95
θ_п.s4(x) := (A(x)/3)^-0.285
# Эффективность пленки
θ_с4(x) :=
    1 if x ≤ x_n.s4
    θ_п.s4(x) if x_n.s4 < x ≤ x_p.s4
    θ_o.s4(x) otherwise
# Температура пленки в конце  участка:
T_п.s4 := T_п.с3(x_кон.s4) - θ_с4(x_кон.s4)*(T_п.с3(x_кон.s4) - T*_охл.4.t) = 1577.38  # К
# Расход воздуха через отверстия ряда:
G_c4 := N_отв.с4*π*d_с.4^2/4*ρ_в.с.4*u_в.с.4 = 0.00819669
G_c4 = 0.00819669  # кг/с
# Отношение расхода воздуха к суммарному расходу охлаждающего воздуха:
G_c4/ΔG_1 explicit, ALL → 8.197*10^-3/0.152 = 0.0540848
# Температура пленки по участку
T_п.с4(x) := T_п.с3(x + x_кон.s3) - θ_с4(x)*(T_п.с3(x + x_кон.s3) - T*_охл.4.t)
# [area: Спинка. Ряд отверстий №5]
# Ряд отверстий №5.
# Приведенная скорость потока
λ_5 := λ(-x_с.5/l_с) = 0.93
# Давление газа во внешнем потоке статическое:
p_с.5 := p*_г*П(λ_5, k_г) explicit, ALL → 2.237*10^6*0.599 = 1340081  # Па
# Температура внешнего потока статическая:
T_с.5 := T*_г*τ(λ_5, k_г) explicit, ALL → 1.973*10^3*0.895 = 1765.41  # К
# Температура торможения охлаждающего воздуха
T*_охл.5.t := T_охл.кан.с[5] = 757.4  # К
# Показатель изоэнтропы по параметрам торможения
k_охл.с.5 := c_p.т(T*_охл.5.t)/(c_p.т(T*_охл.5.t) - R) = 1.36069
# Критическая скорость звука охлаждающего воздуха
a_кр.с.5 := sqrt(2*k_охл.с.5/(k_охл.с.5 + 1)*R*T*_охл.4.t) explicit, ALL → sqrt(2*1.361/(1.361 + 1)*289*757.4) = 502.327
# Принимаем давление торможения в охлаждающем канале номер 1:
p*_охл.5.t := p_охл.кан.с[5] = 2300000  # Па
# Плотность газа во внешнем потоке в области входной кромки:
ρ_г.с5 := p_с.5/(R*T_с.5) explicit, ALL → 1.34*10^6/(289*1.765*10^3) = 2.62656  # кг/м^3
# Cкорость основного потока:
u_г.c5 := λ_5*a_кр explicit, ALL → 0.93*799.726 = 743.745  # м/с
# Определение статических параметров потока воздуха
# Первое приближение
# Статическая температура охлаждающего воздуха
T_охл.с.5 := T*_охл.5.t - 80 explicit, ALL → 757.4 - 80 = 677.4  # К
# Статическая плотность охлаждающего воздуха
ρ_в.с.5 := p_с.5/(R_в*T_охл.с.5) = 6.89293
# Скорость истечения охлаждающего воздуха
u_в.с.5 := sqrt(2*(p*_охл.5.t - p_с.5)/ρ_в.с.5) explicit, ALL → sqrt(2*(2.3*10^6 - 1.34*10^6)/6.893) = 527.753  # м/с
# Приведенная скорость
λ_в5с := u_в.с.5/a_кр.с.5 explicit, ALL → 527.753/502.327 = 1.05061
# Статическое давление охлаждающего воздуха
p_охл.с.5 := p*_охл.5.t*П(λ_в5с, k_охл.с.5) explicit, ALL → 2.3*10^6*0.514 = 1183141  # Па
# Статическая температура охлаждающего воздуха
T_охл.с.5 := T*_охл.5.t*τ(λ_в5с, k_охл.с.5) explicit, ALL → 757.4*0.831 = 629.665  # К
# Второе приближение
# Статическая плотность охлаждающего воздуха
ρ_в.с.5 := p_охл.с.5/(R_в*T_охл.с.5) = 6.54704
# Скорость истечения охлаждающего воздуха
u_в.с.5 := sqrt(2*(p*_охл.5.t - p_с.5)/ρ_в.с.5) explicit, ALL → sqrt(2*(2.3*10^6 - 1.34*10^6)/6.547) = 541.514  # м/с
# Приведенная скорость
λ_в5с := u_в.с.5/a_кр.с.5 explicit, ALL → 541.514/502.327 = 1.07801
# Статическое давление охлаждающего воздуха
p_охл.с.5 := p*_охл.5.t*П(λ_в5с, k_охл.с.5) explicit, ALL → 2.3*10^6*0.495 = 1139102  # Па
# Статическая температура охлаждающего воздуха
T_охл.с.5 := T*_охл.5.t*τ(λ_в5с, k_охл.с.5) explicit, ALL → 757.4*0.822 = 622.916  # К
# Третье приближение
# Статическая плотность охлаждающего воздуха
ρ_в.с.5 := p_охл.с.5/(R_в*T_охл.с.5) = 6.37164
# Скорость истечения охлаждающего воздуха
u_в.с.5 := sqrt(2*(p*_охл.5.t - p_с.5)/ρ_в.с.5) explicit, ALL → sqrt(2*(2.3*10^6 - 1.34*10^6)/6.372) = 548.917  # м/с
# Приведенная скорость
λ_в5с := u_в.с.5/a_кр.с.5 explicit, ALL → 548.917/502.327 = 1.09275
# Статическое давление охлаждающего воздуха
p_охл.с.5 := p*_охл.5.t*П(λ_в5с, k_охл.с.5) explicit, ALL → 2.3*10^6*0.485 = 1115494  # Па
# Статическая температура охлаждающего воздуха
T_охл.с.5 := T*_охл.5.t*τ(λ_в5с, k_охл.с.5) explicit, ALL → 757.4*0.818 = 619.214  # К
# Параметр вдува на входной кромке:
b_5с := ρ_в.с.5*u_в.с.5/(ρ_г.с5*u_г.c5) explicit, ALL → 6.372*548.917/(2.627*743.745) = 1.79038
# Вязкость газа:
μ_г5 := 17.6*10^-6*(T_с.5/273)^0.68 = 6.26292e-5  # Па*с
# Эквивалентная высота щели:
s_э5с := N_отв.с5*π*d_с.5^2/4*(N_отв.с5 + 1)/(N_отв.с5*h) explicit, ALL → 22*π*(0.4*10^-3)^2/4*(22 + 1)/(22*0.033) = 8.74698e-5
# Число Рейнольдса по ширине щели:
Re_s.c5 := ρ_г.с5*u_в.с.5*s_э5с/μ_г5 explicit, ALL → 2.627*548.917*8.747*10^-5/(6.263*10^-5) = 2013.61
# Температурный фактор:
φ_5с := T_охл.с.4/T_t explicit, ALL → 682.399/(1.973*10^3) = 0.345869
# Расчет эффективности пленки
A(x) := Re_s.c5^-0.25*b_5с^-1.3*φ_5с^-1.25*x/s_э5с
# Граница  участка:
x_кон.s5 := x_с.6 - x_с.5 = 0.0200487  # м
x_n.s5 := root(A(x) - 3, x, 0, 1) = 0.000994127  # м
θ_п.s1 := 1
x_p.s5 := root(A(x) - 11, x, 0, 1) = 0.00364513  # м
θ_o.s5(x) := (A(x)/7.43)^-0.95
θ_п.s5(x) := (A(x)/3)^-0.285
# Эффективность пленки
θ_с5(x) :=
    1 if x ≤ x_n.s5
    θ_п.s5(x) if x_n.s5 < x ≤ x_p.s5
    θ_o.s5(x) otherwise
# Температура пленки в конце  участка:
T_п.s5 := T_п.с4(x_кон.s5) - θ_с5(x_кон.s5)*(T_п.с4(x_кон.s5) - T*_охл.5.t) = 1487.56  # К
# Расход воздуха через отверстия ряда:
G_c5 := N_отв.с5*π*d_с.5^2/4*ρ_в.с.5*u_в.с.5 = 0.0096692
G_c5 = 0.0096692  # кг/с
# Отношение расхода воздуха к суммарному расходу охлаждающего воздуха:
G_c5/ΔG_1 explicit, ALL → 9.669*10^-3/0.152 = 0.0638009
# Температура пленки по участку
T_п.с5(x) := T_п.с4(x + x_кон.s4) - θ_с4(x)*(T_п.с4(x + x_кон.s4) - T*_охл.5.t)
# [area: Корытце. Ряд отверстий №1]
# Корытце. Ряд отверстий №1.
# Приведенная скорость потока
λ_1 := λ(-x_к.1/l_к) = 0.263538
# Давление газа во внешнем потоке статическое:
p_к.1 := p*_г*П(λ_1, k_г) explicit, ALL → 2.237*10^6*0.962 = 2151433  # Па
# Температура внешнего потока статическая:
T_к.1 := T*_г*τ(λ_1, k_г) explicit, ALL → 1.973*10^3*0.992 = 1956.33  # К
# Температура торможения охлаждающего воздуха:
T*_охл.1.t := T_охл.кан.к[1] = 757.4  # К
# Показатель изоэнтропы по параметрам торможения
k_охл.к.1 := c_p.т(T*_охл.1.t)/(c_p.т(T*_охл.1.t) - R) = 1.36069
# Критическая скорость звука охлаждающего воздуха
a_кр.к.1 := sqrt(2*k_охл.к.1/(k_охл.к.1 + 1)*R*T*_охл.1.t) explicit, ALL → sqrt(2*1.361/(1.361 + 1)*289*757.4) = 502.327
# Принимаем давление торможения в охлаждающем канале номер 1:
p*_охл.1.t := p_охл.кан.к[1] = 2300000  # Па
# Плотность газа во внешнем потоке в области входной кромки:
ρ_г.1к := p_к.1/(R*T_к.1) explicit, ALL → 2.151*10^6/(289*1.956*10^3) = 3.80529  # кг/м^3
# Cкорость основного потока:
u_г.1к := λ_1*a_кр explicit, ALL → 0.264*799.726 = 210.759  # м/с  # возможно, надо будет поменять это для этого отверстия
# Определение статических параметров потока воздуха
# Первое приближение
# Статическая температура охлаждающего воздуха
T_охл.к.1 := T*_охл.1.t - 80 explicit, ALL → 757.4 - 80 = 677.4  # К
# Статическая плотность охлаждающего воздуха
ρ_в.к.1 := p_к.1/(R_в*T_охл.к.1) = 11.0663
# Скорость истечения охлаждающего воздуха
u_в.к.1 := sqrt(2*(p*_охл.1.t - p_к.1)/ρ_в.к.1) explicit, ALL → sqrt(2*(2.3*10^6 - 2.151*10^6)/11.066) = 163.861
# Приведенная скорость
λ_в1к := u_в.к.1/a_кр.к.1 explicit, ALL → 163.861/502.327 = 0.326204
# Статическое давление охлаждающего воздуха
p_охл.к.1 := p*_охл.1.t*П(λ_в1к, k_охл.к.1) explicit, ALL → 2.3*10^6*0.942 = 2165914
# Статическая температура охлаждающего воздуха
T_охл.к.1 := T*_охл.1.t*τ(λ_в1к, k_охл.к.1) explicit, ALL → 757.4*0.984 = 745.086  # К
# Второе приближение
# Статическая плотность охлаждающего воздуха
ρ_в1к := p_охл.к.1/(R_в*T_охл.к.1) = 10.1287
# Скорость истечения охлаждающего воздуха
u_в.к.1 := sqrt(2*(p*_охл.1.t - p_к.1)/ρ_в.к.1) explicit, ALL → sqrt(2*(2.3*10^6 - 2.151*10^6)/11.066) = 163.861
# Приведенная скорость
λ_в1к := u_в.к.1/a_кр.к.1 explicit, ALL → 163.861/502.327 = 0.326204
# Статическое давление охлаждающего воздуха
p_охл.к.1 := p*_охл.1.t*П(λ_в1к, k_охл.к.1) explicit, ALL → 2.3*10^6*0.942 = 2165914
# Статическая температура охлаждающего воздуха
T_охл.к.1 := T*_охл.1.t*τ(λ_в1к, k_охл.к.1) explicit, ALL → 757.4*0.984 = 745.086  # К
# Третье приближение
# Статическая плотность охлаждающего воздуха
ρ_в1к := p_охл.к.1/(R_в*T_охл.к.1) = 10.1287
# Скорость истечения охлаждающего воздуха
u_в.к.1 := sqrt(2*(p*_охл.1.t - p_к.1)/ρ_в.к.1) explicit, ALL → sqrt(2*(2.3*10^6 - 2.151*10^6)/11.066) = 163.861
# Приведенная скорость
λ_в1к := u_в.к.1/a_кр.к.1 explicit, ALL → 163.861/502.327 = 0.326204
# Статическое давление охлаждающего воздуха
p_охл.к.1 := p*_охл.1.t*П(λ_в1к, k_охл.к.1) explicit, ALL → 2.3*10^6*0.942 = 2165914
# Статическая температура охлаждающего воздуха
T_охл.к.1 := T*_охл.1.t*τ(λ_в1к, k_охл.к.1) explicit, ALL → 757.4*0.984 = 745.086  # К
# Эквивалентная высота щели:
s_э1к := N_отв.к1*π*d_к.1^2/4*(N_отв.к1 + 1)/(N_отв.к1*h) explicit, ALL → 21*π*(0.36*10^-3)^2/4*(21 + 1)/(21*0.033) = 6.77701e-5
# Параметр вдува на входной кромке:
b_1к := ρ_в1к*u_в.к.1/(ρ_г.1к*u_г.1к) explicit, ALL → 10.129*163.861/(3.805*210.759) = 2.06946
# Вязкость газа:
μ_г1 := 17.6*10^-6*(T_к.1/273)^0.68 = 6.71588e-5  # Па*с
# Число Рейнольдса по ширине щели:
Re_к1 := ρ_г.1к*u_в.к.1*s_э1к/μ_г1 explicit, ALL → 3.805*163.861*6.777*10^-5/(6.716*10^-5) = 629.216
# Температура торможения:
T_t := T*_г = 1973  # К
# Температурный фактор:
φ_1к := T*_охл.1.t/T_t explicit, ALL → 757.4/1973 = 0.383882
# Расчет эффективности пленки
A(x) := Re_к1^-0.25*b_1к^-1.3*φ_1к^-1.25*x/s_э1к
# Граница  участка:
x_кон.к1 := x_к.2 - x_к.1 = 0.0049008  # м
x_н.к1 := root(A(x) - 3, x, 0, 1) = 0.000791992  # м
θ_н.к1 := 1
x_п.к1 := root(A(x) - 11, x, 0, 1) = 0.00290397  # м
θ_o.к1(x) := (A(x)/7.43)^-0.95
θ_п.к1(x) := (A(x)/3)^-0.285
# Эффективность пленки
θ_к1(x) :=
    1 if x ≤ x_н.к1
    θ_п.к1(x) if x_н.к1 < x ≤ x_п.к1
    θ_o.к1(x) otherwise
# Температура пленки в конце  участка:
T_п.к1(x) := T_к.1 - θ_к1(x)*(T_к.1 - T*_охл.1.t)
T_п.к1(x_к.2) = 1679.86  # К
# Расход воздуха через отверстия ряда:
G_к1 := N_отв.к1*π*d_к.1^2/4*ρ_в1к*u_в.к.1 = 0.00354767
G_к1 = 0.00354767  # кг/с
# Отношение расхода воздуха к суммарному расходу охлаждающего воздуха:
G_к1/ΔG_1 explicit, ALL → 3.548*10^-3/0.152 = 0.0234089
# [area: Корытце. Ряд отверстий №2]
# Ряд отверстий №2.
# Приведенная скорость потока
λ_2к := λ(x_к.2/l_к) = 0.582779
# Давление газа во внешнем потоке статическое:
p_к.2 := p*_г*П(λ_2к, k_г) explicit, ALL → 2.237*10^6*0.823 = 1841774  # Па
# Температура внешнего потока статическая:
T_к.2 := T*_г*τ(λ_2к, k_г) explicit, ALL → 1973*0.96 = 1891.48  # К
# Температура торможения охлаждающего воздуха:
T*_охл.2.t := T_охл.кан.к[2] = 757.4  # К
# Показатель изоэнтропы по параметрам торможения
k_охл.к.2 := c_p.т(T*_охл.2.t)/(c_p.т(T*_охл.2.t) - R) = 1.36069
# Критическая скорость звука охлаждающего воздуха
a_кр.к.2 := sqrt(2*k_охл.к.2/(k_охл.к.2 + 1)*R*T*_охл.2.t) explicit, ALL → sqrt(2*1.361/(1.361 + 1)*289*757.4) = 502.327
# Принимаем давление торможения в охлаждающем канале номер 1:
p*_охл.2.t := p_охл.кан.к[2] = 2300000  # Па
# Плотность газа во внешнем потоке в области входной кромки:
ρ_г.2к := p_к.2/(R*T_к.2) explicit, ALL → 1841773.69104/(289*1891.48221763) = 3.36927  # кг/м^3
# Cкорость основного потока:
u_г.к2 := λ_2*a_кр explicit, ALL → 0.454*799.726 = 363.078  # м/с
# Определение статических параметров потока воздуха
# Первое приближение
# Статическая температура охлаждающего воздуха
T_охл.к.2 := T*_охл.2.t - 80 explicit, ALL → 757.4 - 80 = 677.4  # К
# Статическая плотность охлаждающего воздуха
ρ_в.к.2 := p_к.2/(R_в*T_охл.к.2) = 9.47347
# Скорость истечения охлаждающего воздуха
u_в.к.2 := sqrt(2*(p*_охл.2.t - p_к.2)/ρ_в.к.2) explicit, ALL → sqrt(2*(2.3*10^6 - 1.842*10^6)/9.473) = 311.029
# Приведенная скорость
λ_в2к := u_в.к.2/a_кр.к.2 explicit, ALL → 311.029/502.327 = 0.619175
# Статическое давление охлаждающего воздуха
p_охл.к.2 := p*_охл.2.t*П(λ_в2к, k_охл.к.2) explicit, ALL → 2.3*10^6*0.802 = 1845455
# Статическая температура охлаждающего воздуха
T_охл.к.2 := T*_охл.2.t*τ(λ_в2к, k_охл.к.2) explicit, ALL → 757.4*0.941 = 713.034  # К
# Второе приближение
# Статическая плотность охлаждающего воздуха
ρ_в2к := p_охл.к.2/(R_в*T_охл.к.2) = 9.01802
# Скорость истечения охлаждающего воздуха
u_в.к.2 := sqrt(2*(p*_охл.2.t - p_к.2)/ρ_в.к.2) explicit, ALL → sqrt(2*(2.3*10^6 - 1.842*10^6)/9.473) = 311.029
# Приведенная скорость
λ_в2к := u_в.к.2/a_кр.к.2 explicit, ALL → 311.029/502.327 = 0.619175
# Статическое давление охлаждающего воздуха
p_охл.к.2 := p*_охл.2.t*П(λ_в2к, k_охл.к.2) explicit, ALL → 2.3*10^6*0.802 = 1845455
# Статическая температура охлаждающего воздуха
T_охл.к.2 := T*_охл.2.t*τ(λ_в2к, k_охл.к.2) explicit, ALL → 757.4*0.941 = 713.034  # К
# Третье приближение
# Статическая плотность охлаждающего воздуха
ρ_в2к := p_охл.к.2/(R_в*T_охл.к.2) = 9.01802
# Скорость истечения охлаждающего воздуха
u_в.к.2 := sqrt(2*(p*_охл.2.t - p_к.2)/ρ_в.к.2) explicit, ALL → sqrt(2*(2.3*10^6 - 1.842*10^6)/9.473) = 311.029
# Приведенная скорость
λ_в2к := u_в.к.2/a_кр.к.2 explicit, ALL → 311.029/502.327 = 0.619175
# Статическое давление охлаждающего воздуха
p_охл.к.2 := p*_охл.2.t*П(λ_в2к, k_охл.к.2) explicit, ALL → 2.3*10^6*0.802 = 1845455
# Статическая температура охлаждающего воздуха
T_охл.к.2 := T*_охл.2.t*τ(λ_в2к, k_охл.к.2) explicit, ALL → 757.4*0.941 = 713.034
# Эквивалентная высота щели:
s_э2к := N_отв.к1*π*d_к.2^2/4*(N_отв.к2 + 1)/(N_отв.к2*h) explicit, ALL → 21*π*(0.4*10^-3)^2/4*(20 + 1)/(20*0.033) = 8.38569e-5
# Параметр вдува на входной кромке:
b_2к := ρ_в2к*u_в.к.2/(ρ_г.2к*u_г.к2) explicit, ALL → 9.018*311.029/(3.369*363.078) = 2.29285
# Вязкость газа:
μ_г2 := 17.6*10^-6*(T_к.2/273)^0.68 = 6.56368e-5  # Па*с
# Число Рейнольдса по ширине щели:
Re_к2 := ρ_г.2к*u_в.к.2*s_э2к/μ_г2 explicit, ALL → 3.369*311.029*8.386*10^-5/(6.564*10^-5) = 1338.84
# Температура торможения:
T_t := T*_г = 1973  # К
# Температурный фактор:
φ_2к := T*_охл.2.t/T_t explicit, ALL → 757.4/1973 = 0.383882
# Расчет эффективности пленки
A(x) := Re_к2^-0.25*b_2к^-1.3*φ_2к^-1.25*x/s_э2к
# Граница  участка:
x_кон.к2 := x_к.3 - x_к.2 = 0.0055134  # м
x_n.к2 := root(A(x) - 3, x, 0, 1) = 0.00135232  # м
θ_п.s1 := 1
x_p.к2 := root(A(x) - 11, x, 0, 1) = 0.0049585  # м
θ_o.к2(x) := (A(x)/7.43)^-0.95
θ_п.к2(x) := (A(x)/3)^-0.285
# Эффективность пленки
θ_к2(x) :=
    1 if x ≤ x_n.к2
    θ_п.к2(x) if x_n.к2 < x ≤ x_p.к2
    θ_o.к2(x) otherwise
# Температура пленки в конце  участка:
T_п.к2 := T_п.к1(x_кон.к2) - θ_к2(x_кон.к2)*(T_п.к1(x_кон.к2) - T*_охл.2.t) = 1040.21  # К
# Расход воздуха через отверстия ряда:
G_к2 := N_отв.к2*π*d_к.2^2/4*ρ_в2к*u_в.к.2 = 0.00704939
G_к2 = 0.00704939  # кг/с
# Отношение расхода воздуха к суммарному расходу охлаждающего воздуха:
G_к2/ΔG_1 explicit, ALL → 7.049*10^-3/0.152 = 0.0465145
# Температура пленки по участку
T_п.к2(x) := T_п.к1(x + x_кон.к1) - θ_к2(x)*(T_п.к1(x + x_кон.к1) - T*_охл.2.t)
# [area: Корыто. Ряд отверстий 3]
# Ряд отверстий №3.
# Приведенная скорость потока
λ_3к := λ(x_к.3/l_к) = 0.786639
# Давление газа во внешнем потоке статическое:
p_к.3 := p*_г*П(λ_3к, k_г) explicit, ALL → 2.237*10^6*0.697 = 1559638  # Па
# Температура внешнего потока статическая:
T_к.3 := T*_г*τ(λ_3к, k_г) explicit, ALL → 1.973*10^3*0.925 = 1824.48  # К
# Температура торможения охлаждающего воздуха:
T*_охл.3.t := T_охл.кан.к[3] = 757.4  # К
# Показатель изоэнтропы по параметрам торможения
k_охл.к.3 := c_p.т(T*_охл.3.t)/(c_p.т(T*_охл.3.t) - R) = 1.36069
# Критическая скорость звука охлаждающего воздуха
a_кр.к.3 := sqrt(2*k_охл.к.3/(k_охл.к.3 + 1)*R*T*_охл.3.t) explicit, ALL → sqrt(2*1.361/(1.361 + 1)*289*757.4) = 502.327
# Принимаем давление торможения в охлаждающем канале номер 1:
p*_охл.3.t := p_охл.кан.к[3] = 2300000  # Па
# Плотность газа во внешнем потоке в области входной кромки:
ρ_г.3к := p_к.3/(R*T_к.3) explicit, ALL → 1.56*10^6/(289*1.824*10^3) = 2.95793  # кг/м^3
# Cкорость основного потока:
u_г.к3 := λ_3*a_кр explicit, ALL → 0.507*799.726 = 405.341  # м/с
# Определение статических параметров потока воздуха | м/с
# Первое приближение
# Статическая температура охлаждающего воздуха
T_охл.к.3 := T*_охл.3.t - 80 explicit, ALL → 757.4 - 80 = 677.4  # К
# Статическая плотность охлаждающего воздуха
ρ_в.к.3 := p_к.3/(R_в*T_охл.к.3) = 8.02226
# Скорость истечения охлаждающего воздуха
u_в.к.3 := sqrt(2*(p*_охл.3.t - p_к.3)/ρ_в.к.3) explicit, ALL → sqrt(2*(2.3*10^6 - 1.56*10^6)/8.022) = 429.624
# Приведенная скорость
λ_в3к := u_в.к.3/a_кр.к.3 explicit, ALL → 429.624/502.327 = 0.855267
# Статическое давление охлаждающего воздуха
p_охл.к.3 := p*_охл.3.t*П(λ_в3к, k_охл.к.3) explicit, ALL → 2.3*10^6*0.651 = 1496699
# Статическая температура охлаждающего воздуха
T_охл.к.3 := T*_охл.3.t*τ(λ_в3к, k_охл.к.3) explicit, ALL → 757.4*0.888 = 672.75  # К
# Второе приближение
# Статическая плотность охлаждающего воздуха
ρ_в3к := p_охл.к.3/(R_в*T_охл.к.3) = 7.75174
# Скорость истечения охлаждающего воздуха
u_в.к.3 := sqrt(2*(p*_охл.3.t - p_к.3)/ρ_в.к.3) explicit, ALL → sqrt(2*(2.3*10^6 - 1.56*10^6)/8.022) = 429.624
# Приведенная скорость
λ_в3к := u_в.к.3/a_кр.к.3 explicit, ALL → 429.624/502.327 = 0.855267
# Статическое давление охлаждающего воздуха
p_охл.к.3 := p*_охл.3.t*П(λ_в3к, k_охл.к.3) explicit, ALL → 2.3*10^6*0.651 = 1496699
# Статическая температура охлаждающего воздуха
T_охл.к.3 := T*_охл.3.t*τ(λ_в3к, k_охл.к.3) explicit, ALL → 757.4*0.888 = 672.75  # К
# Третье приближение
# Статическая плотность охлаждающего воздуха
ρ_в3к := p_охл.к.3/(R_в*T_охл.к.3) = 7.75174
# Скорость истечения охлаждающего воздуха
u_в.к.3 := sqrt(2*(p*_охл.3.t - p_к.3)/ρ_в.к.3) explicit, ALL → sqrt(2*(2.3*10^6 - 1.56*10^6)/8.022) = 429.624
# Приведенная скорость
λ_в3к := u_в.к.3/a_кр.к.3 explicit, ALL → 429.624/502.327 = 0.855267
# Статическое давление охлаждающего воздуха
p_охл.к.3 := p*_охл.3.t*П(λ_в3к, k_охл.к.3) explicit, ALL → 2.3*10^6*0.651 = 1496699
# Статическая температура охлаждающего воздуха
T_охл.к.3 := T*_охл.3.t*τ(λ_в3к, k_охл.к.3) explicit, ALL → 757.4*0.888 = 672.75  # К
# Эквивалентная высота щели:
s_э3к := N_отв.к3*π*d_к.3^2/4*(N_отв.к3 + 1)/(N_отв.к3*h) explicit, ALL → 19*π*(0.4*10^-3)^2/4*(19 + 1)/(19*0.033) = 7.60607e-5
# Параметр вдува на входной кромке:
b_3к := ρ_в3к*u_в.к.3/(ρ_г.3к*u_г.к3) explicit, ALL → 7.752*429.624/(2.958*405.341) = 2.77766
# Вязкость газа:
μ_г3 := 17.6*10^-6*(T_к.3/273)^0.68 = 6.40466e-5  # Па*с
# Число Рейнольдса по ширине щели:
Re_к3 := ρ_г.3к*u_в.к.3*s_э3к/μ_г3 explicit, ALL → 2.958*429.624*7.606*10^-5/(6.405*10^-5) = 1509.18
# Температура торможения:
T_t := T*_г = 1973  # К
# Температурный фактор:
φ_3к := T*_охл.3.t/T_t explicit, ALL → 757.4/1973 = 0.383882
# Расчет эффективности пленки
A(x) := Re_к3^-0.25*b_3к^-1.3*φ_3к^-1.25*x/s_э3к
# Граница  участка:
x_кон.к3 := x_к.4 - x_к.3 = 0.0098016  # м
x_n.к3 := root(A(x) - 3, x, 0, 1) = 0.0016218  # м
θ_п.s1 := 1
x_p.к3 := root(A(x) - 11, x, 0, 1) = 0.00594661  # м
θ_o.к3(x) := (A(x)/7.43)^-0.95
θ_п.к3(x) := (A(x)/3)^-0.285
# Эффективность пленки
θ_к3(x) :=
    1 if x ≤ x_n.к3
    θ_п.к3(x) if x_n.к3 < x ≤ x_p.к3
    θ_o.к3(x) otherwise
# Температура пленки в конце  участка:
T_п.к3 := T_п.к2(x_кон.к3) - θ_к3(x_кон.к3)*(T_п.к2(x_кон.к3) - T*_охл.3.t) = 1130.9  # К
# Расход воздуха через отверстия ряда:
G_к3 := N_отв.к3*π*d_к.3^2/4*ρ_в3к*u_в.к.3 = 0.00795154
G_к3 = 0.00795154  # кг/с
# Отношение расхода воздуха к суммарному расходу охлаждающего воздуха:
G_к3/ΔG_1 explicit, ALL → 7.952*10^-3/0.152 = 0.0524672
# Температура пленки по участку
T_п.к3(x) := T_п.к2(x + x_кон.к2) - θ_к3(x)*(T_п.к2(x + x_кон.к2) - T*_охл.3.t)
# [area: Корыто. Ряд отверстий 4]
# Ряд отверстий №4.
# Приведенная скорость потока
λ_4к := λ(x_к.4/l_к) = 0.995229
# Давление газа во внешнем потоке статическое:
p_к.4 := p*_г*П(λ_4к, k_г) explicit, ALL → 2.237*10^6*0.553 = 1237805  # Па
# Температура внешнего потока статическая:
T_к.4 := T*_г*τ(λ_4к, k_г) explicit, ALL → 1973*0.88 = 1735.27  # К
# Температура торможения охлаждающего воздуха:
T*_охл.4.t := T_охл.кан.к[4] = 757.4  # К
# Показатель изоэнтропы по параметрам торможения
k_охл.к.4 := c_p.т(T*_охл.4.t)/(c_p.т(T*_охл.4.t) - R) = 1.36069
# Критическая скорость звука охлаждающего воздуха
a_кр.к.4 := sqrt(2*k_охл.к.4/(k_охл.к.4 + 1)*R*T*_охл.4.t) explicit, ALL → sqrt(2*1.361/(1.361 + 1)*289*757.4) = 502.327
# Принимаем давление торможения в охлаждающем канале номер 1:
p*_охл.4.t := p_охл.кан.к[4] = 2300000  # Па
# Плотность газа во внешнем потоке в области входной кромки:
ρ_г.4к := p_к.4/(R*T_к.4) explicit, ALL → 1.238*10^6/(289*1.735*10^3) = 2.46824  # кг/м^3
# Cкорость основного потока:
u_г.к4 := λ_4*a_кр explicit, ALL → 0.731*799.726 = 584.916  # м/с
# Определение статических параметров потока воздуха
# Первое приближение
# Статическая температура охлаждающего воздуха
T_охл.к.4 := T*_охл.4.t - 80 explicit, ALL → 757.4 - 80 = 677.4  # К
# Статическая плотность охлаждающего воздуха
ρ_в.к.4 := p_к.4/(R_в*T_охл.к.4) = 6.36686
# Скорость истечения охлаждающего воздуха
u_в.к.4 := sqrt(2*(p*_охл.4.t - p_к.4)/ρ_в.к.4) explicit, ALL → sqrt(2*(2.3*10^6 - 1.238*10^6)/6.367) = 577.636
# Приведенная скорость
λ_в4к := u_в.к.4/a_кр.к.4 explicit, ALL → 577.636/502.327 = 1.14992
# Статическое давление охлаждающего воздуха
p_охл.к.4 := p*_охл.4.t*П(λ_в4к, k_охл.к.4) explicit, ALL → 2.3*10^6*0.446 = 1024691
# Статическая температура охлаждающего воздуха
T_охл.к.4 := T*_охл.4.t*τ(λ_в4к, k_охл.к.4) explicit, ALL → 757.4*0.798 = 604.376  # К
# Второе приближение
# Статическая плотность охлаждающего воздуха
ρ_в4к := p_охл.к.4/(R_в*T_охл.к.4) = 5.9075
# Скорость истечения охлаждающего воздуха
u_в.к.4 := sqrt(2*(p*_охл.4.t - p_к.4)/ρ_в.к.4) explicit, ALL → sqrt(2*(2.3*10^6 - 1.238*10^6)/6.367) = 577.636
# Приведенная скорость
λ_в4к := u_в.к.4/a_кр.к.4 explicit, ALL → 577.636/502.327 = 1.14992
# Статическое давление охлаждающего воздуха
p_охл.к.4 := p*_охл.4.t*П(λ_в4к, k_охл.к.4) explicit, ALL → 2.3*10^6*0.446 = 1024691
# Статическая температура охлаждающего воздуха
T_охл.к.4 := T*_охл.4.t*τ(λ_в4к, k_охл.к.4) explicit, ALL → 757.4*0.798 = 604.376  # К
# Третье приближение
# Статическая плотность охлаждающего воздуха
ρ_в4к := p_охл.к.4/(R_в*T_охл.к.4) = 5.9075
# Скорость истечения охлаждающего воздуха
u_в.к.4 := sqrt(2*(p*_охл.4.t - p_к.4)/ρ_в.к.4) explicit, ALL → sqrt(2*(2.3*10^6 - 1.238*10^6)/6.367) = 577.636
# Приведенная скорость
λ_в4к := u_в.к.4/a_кр.к.4 explicit, ALL → 577.636/502.327 = 1.14992
# Статическое давление охлаждающего воздуха
p_охл.к.4 := p*_охл.4.t*П(λ_в4к, k_охл.к.4) explicit, ALL → 2.3*10^6*0.446 = 1024691
# Статическая температура охлаждающего воздуха
T_охл.к.4 := T*_охл.4.t*τ(λ_в4к, k_охл.к.4) explicit, ALL → 757.4*0.798 = 604.376  # К
# Эквивалентная высота щели:
s_э4к := N_отв.к4*π*d_к.4^2/4*(N_отв.к4 + 1)/(N_отв.к4*h) explicit, ALL → 20*π*(0.4*10^-3)^2/4*(20 + 1)/(20*0.033) = 7.98637e-5
# Параметр вдува на входной кромке:
b_4к := ρ_в4к*u_в.к.4/(ρ_г.4к*u_г.к4) explicit, ALL → 5.907*577.636/(2.468*584.916) = 2.36361
# Вязкость газа:
μ_г4 := 17.6*10^-6*(T_к.4/273)^0.68 = 6.19001e-5  # Па*с
# Число Рейнольдса по ширине щели:
Re_к4 := ρ_г.4к*u_в.к.4*s_э4к/μ_г4 explicit, ALL → 2.468*577.636*7.986*10^-5/(6.19*10^-5) = 1839.51
# Температура торможения:
T_t := T*_г = 1973  # К
# Температурный фактор:
φ_4к := T*_охл.4.t/T_t explicit, ALL → 757.4/1973 = 0.383882
# Расчет эффективности пленки
A(x) := Re_к4^-0.25*b_4к^-1.3*φ_4к^-1.25*x/s_э4к
# Граница  участка:
x_кон.к4 := x_к.5 - x_к.4 = 0.0232788  # м
x_н.к4 := root(A(x) - 3, x, 0, 1) = 0.00145058  # м
θ_п.к1 := 1
x_п.к4 := root(A(x) - 11, x, 0, 1) = 0.00531881  # м
θ_o.к4(x) := (A(x)/7.43)^-0.95
θ_п.к4(x) := (A(x)/3)^-0.285
# Эффективность пленки
θ_к4(x) :=
    1 if x ≤ x_н.к4
    θ_п.к4(x) if x_н.к4 < x ≤ x_п.к4
    θ_o.к4(x) otherwise
# Температура пленки в конце  участка:
T_п.к4 := T_п.к3(x_кон.к4) - θ_к4(x_кон.к4)*(T_п.к3(x_кон.к4) - T*_охл.4.t) = 1413.68  # К
# Расход воздуха через отверстия ряда:
G_к4 := N_отв.к4*π*d_к.4^2/4*ρ_в4к*u_в.к.4 = 0.00857626
G_к4 = 0.00857626  # кг/с
# Отношение расхода воздуха к суммарному расходу охлаждающего воздуха:
G_к4/ΔG_1 explicit, ALL → 8.576*10^-3/0.152 = 0.0565893
# Температура пленки по участку
T_п.к4(x) := T_п.к3(x + x_кон.к3) - θ_к4(x)*(T_п.к3(x + x_кон.к3) - T*_охл.4.t)
# [area: Корыто. Ряд отверстий 5]
# Ряд отверстий №5.
# Приведенная скорость потока
λ_5к := λ(x_к.5/l_к) = 1.06873
# Давление газа во внешнем потоке статическое:
p_к.5 := p*_г*П(λ_5к, k_г) explicit, ALL → 2.237*10^6*0.502 = 1122526  # Па
# Температура внешнего потока статическая:
T_к.5 := T*_г*τ(λ_5к, k_г) explicit, ALL → 1973*0.86 = 1698.86  # К
# Температура торможения охлаждающего воздуха:
T*_охл.5.t := T_охл.кан.к[5] = 757.4  # К
# Показатель изоэнтропы по параметрам торможения
k_охл.к.5 := c_p.т(T*_охл.5.t)/(c_p.т(T*_охл.5.t) - R) = 1.36069
# Критическая скорость звука охлаждающего воздуха
a_кр.к.5 := sqrt(2*k_охл.к.5/(k_охл.к.5 + 1)*R*T*_охл.5.t) explicit, ALL → sqrt(2*1.361/(1.361 + 1)*289*757.4) = 502.327
# Принимаем давление торможения в охлаждающем канале номер 1:
p*_охл.5.t := p_охл.кан.к[5] = 2300000  # Па
# Плотность газа во внешнем потоке в области входной кромки:
ρ_г.5к := p_к.5/(R*T_к.5) explicit, ALL → 1.123*10^6/(289*1.699*10^3) = 2.28634  # кг/м^3
# Cкорость основного потока:
u_г.к5 := λ_5*a_кр explicit, ALL → 0.93*799.726 = 743.745  # м/с
# Определение статических параметров потока воздуха
# Первое приближение
# Статическая температура охлаждающего воздуха
T_охл.к.5 := T*_охл.5.t - 80 explicit, ALL → 757.4 - 80 = 677.4  # К
# Статическая плотность охлаждающего воздуха
ρ_в.к.5 := p_к.5/(R_в*T_охл.к.5) = 5.7739
# Скорость истечения охлаждающего воздуха
u_в.к.5 := sqrt(2*(p*_охл.5.t - p_к.5)/ρ_в.к.5) explicit, ALL → sqrt(2*(2.3*10^6 - 1.123*10^6)/5.774) = 638.64
# Приведенная скорость
λ_в5к := u_в.к.5/a_кр.к.5 explicit, ALL → 638.64/502.327 = 1.27136
# Статическое давление охлаждающего воздуха
p_охл.к.5 := p*_охл.5.t*П(λ_в5к, k_охл.к.5) explicit, ALL → 2.3*10^6*0.364 = 838248
# Статическая температура охлаждающего воздуха
T_охл.к.5 := T*_охл.5.t*τ(λ_в5к, k_охл.к.5) explicit, ALL → 757.4*0.753 = 570.348  # К
# Второе приближение
# Статическая плотность охлаждающего воздуха
ρ_в5к := p_охл.к.5/(R_в*T_охл.к.5) = 5.12095
# Скорость истечения охлаждающего воздуха
u_в.к.5 := sqrt(2*(p*_охл.5.t - p_к.5)/ρ_в.к.5) explicit, ALL → sqrt(2*(2.3*10^6 - 1.123*10^6)/5.774) = 638.64
# Приведенная скорость
λ_в5к := u_в.к.5/a_кр.к.5 explicit, ALL → 638.64/502.327 = 1.27136
# Статическое давление охлаждающего воздуха
p_охл.к.5 := p*_охл.5.t*П(λ_в5к, k_охл.к.5) explicit, ALL → 2.3*10^6*0.364 = 838248
# Статическая температура охлаждающего воздуха
T_охл.к.5 := T*_охл.5.t*τ(λ_в5к, k_охл.к.5) explicit, ALL → 757.4*0.753 = 570.348
# Третье приближение
# Статическая плотность охлаждающего воздуха
ρ_в5к := p_охл.к.5/(R_в*T_охл.к.5) = 5.12095
# Скорость истечения охлаждающего воздуха
u_в.к.5 := sqrt(2*(p*_охл.5.t - p_к.5)/ρ_в.к.5) explicit, ALL → sqrt(2*(2.3*10^6 - 1.123*10^6)/5.774) = 638.64
# Приведенная скорость
λ_в5к := u_в.к.5/a_кр.к.5 explicit, ALL → 638.64/502.327 = 1.27136
# Статическое давление охлаждающего воздуха
p_охл.к.5 := p*_охл.5.t*П(λ_в5к, k_охл.к.5) explicit, ALL → 2.3*10^6*0.364 = 838248
# Статическая температура охлаждающего воздуха
T_охл.к.5 := T*_охл.5.t*τ(λ_в5к, k_охл.к.5) explicit, ALL → 757.4*0.753 = 570.348
# Эквивалентная высота щели:
s_э5к := N_отв.к5*π*d_к.5^2/4*(N_отв.к5 + 1)/(N_отв.к5*h) explicit, ALL → 22*π*(0.4*10^-3)^2/4*(22 + 1)/(22*0.033) = 8.74698e-5
# Параметр вдува на входной кромке:
b_5к := ρ_в5к*u_в.к.5/(ρ_г.5к*u_г.к5) explicit, ALL → 5.121*638.64/(2.286*743.745) = 1.92327
# Вязкость газа:
μ_г5 := 17.6*10^-6*(T_к.5/273)^0.68 = 6.10139e-5  # Па*с
# Число Рейнольдса по ширине щели:
Re_к5 := ρ_г.5к*u_в.к.4*s_э5к/μ_г5 explicit, ALL → 2.286*577.636*8.747*10^-5/(6.101*10^-5) = 1893.33
# Температура торможения:
T_t := T*_г = 1973  # К
# Температурный фактор:
φ_5к := T*_охл.5.t/T_t explicit, ALL → 757.4/1973 = 0.383882
# Расчет эффективности пленки
A(x) := Re_к5^-0.25*b_5к^-1.3*φ_5к^-1.25*x/s_э5к
# Граница  участка:
x_кон.к5 := x_к.6 - x_к.5 = 0.0134772  # м
x_н.к5 := root(A(x) - 3, x, 0, 1) = 0.00122402  # м
x_п.к5 := root(A(x) - 11, x, 0, 1) = 0.00448806  # м
θ_o.к5(x) := (A(x)/7.43)^-0.95
θ_п.к5(x) := (A(x)/3)^-0.285
# Эффективность пленки
θ_к5(x) :=
    1 if x ≤ x_н.к5
    θ_п.к5(x) if x_н.к5 < x ≤ x_п.к5
    θ_o.к5(x) otherwise
# Температура пленки в конце  участка:
T_п.к5 := T_п.к4(x_кон.к3) - θ_к5(x_кон.к5)*(T_п.к4(x_кон.к5) - T*_охл.5.t) = 1072.68
# Расход воздуха через отверстия ряда:
G_к5 := N_отв.к5*π*d_к.5^2/4*ρ_в5к*u_в.к.5 = 0.00904148
G_к4 = 0.00857626  # кг/с
# Отношение расхода воздуха к суммарному расходу охлаждающего воздуха:
G_к5/ΔG_1 explicit, ALL → 9.041*10^-3/0.152 = 0.059659
# Температура пленки по участку
T_п.к5(x) := T_п.к4(x + x_кон.к4) - θ_к5(x)*(T_п.к4(x + x_кон.к4) - T*_охл.5.t)
# Графики пленочного охлаждения
# Эффективность пленки
θ_с(x) :=
    θ_с1(x - x_с.1) if x_с.1 ≤ x < x_с.2
    θ_с2(x - x_с.2) if x_с.2 ≤ x < x_с.3
    θ_с3(x - x_с.3) if x_с.3 ≤ x < x_с.4
    θ_с4(x - x_с.4) if x_с.4 ≤ x < x_с.5
    θ_с5(x - x_с.5) if x_с.5 ≤ x < x_с.6
θ_к(x) :=
    θ_к1(x - x_к.1) if x_к.1 ≤ x < x_к.2
    θ_к2(x - x_к.2) if x_к.2 ≤ x < x_к.3
    θ_к3(x - x_к.3) if x_к.3 ≤ x < x_к.4
    θ_к4(x - x_к.4) if x_к.4 ≤ x < x_к.5
    θ_к5(x - x_к.5) if x_к.5 ≤ x < x_к.6
x_с := 0, 0.000001 .. x_с.6
x_к := 0, 0.000001 .. x_к.6
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# Температура пленки на спинке | Температура пленки на корытце
T_п.с(x) :=
    T_п.с1(x) if 0 ≤ x < x_с.1
    T_п.с1(x - x_с.1) if x_с.1 ≤ x < x_с.2
    T_п.с.2(x - x_с.2) if x_с.2 ≤ x < x_с.3
    T_п.с3(x - x_с.3) if x_с.3 ≤ x < x_с.4
    T_п.с4(x - x_с.4) if x_с.4 ≤ x < x_с.5
    T_п.с5(x - x_с.5) if x_с.5 ≤ x < x_с.6
T_п.к(x) :=
    T_п.к1(x) if 0 ≤ x < x_к.1
    T_п.к1(x - x_к.1) if x_к.1 ≤ x < x_к.2
    T_п.к2(x - x_к.2) if x_к.2 ≤ x < x_к.3
    T_п.к3(x - x_к.3) if x_к.3 ≤ x < x_к.4
    T_п.к4(x - x_к.4) if x_к.4 ≤ x < x_к.5
    T_п.к5(x - x_к.5) if x_к.5 ≤ x < x_к.6
x_к := 0, 0.000001 .. x_к.6
x_с := 0, 0.000001 .. x_с.6
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# тут вопрос (мб формулы идиотские)
# Коэфффициент теплоотдачи плёнки
α_пл.с(x) :=
    α_сп(x)*(1 + 2*b_1с*s_э1с/x) if 0 ≤ x < x_с.1
    α_сп(x)*(1 + 2*b_1с*s_э1с/x) if x_с.1 ≤ x < x_с.2
    α_сп(x)*(1 + 2*b_2с*s_э2с/x) if x_с.2 ≤ x < x_с.3
    α_сп(x)*(1 + 2*b_3с*s_э3с/x) if x_с.3 ≤ x < x_с.4
    α_сп(x)*(1 + 2*b_4с*s_э4с/x) if x_с.4 ≤ x < x_с.5
    α_сп(x)*(1 + 2*b_5с*s_э5с/x) if x_с.5 ≤ x < x_с.6
α_пл.к(x) :=
    α_к(x)*(1 + 2*b_1к*s_э1к/x) if 0 ≤ x < x_к.1
    α_к(x)*(1 + 2*b_1к*s_э1к/x) if x_к.1 ≤ x < x_к.2
    α_к(x)*(1 + 2*b_2к*s_э2к/x) if x_к.2 ≤ x < x_к.3
    α_к(x)*(1 + 2*b_3к*s_э3к/x) if x_к.3 ≤ x < x_к.4
    α_к(x)*(1 + 2*b_4к*s_э4к/x) if x_к.4 ≤ x < x_к.5
    α_к(x)*(1 + 2*b_5к*s_э5к/x) if x_к.5 ≤ x < x_к.6
# формулы для плёнки рассчитаны
# не пойми зачем (вдруг понадобятся)
# Может быть, имеет смысл посмотреть
# стр. 355 Леонтьева дабы уточнить альфапл,
# но пока что считаем теплопередаче по альфе
# газа
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# Суммарный расход охлаждающего воздуха на спинке:
G_Σc1 := G_c1 + G_c2 + G_c3 + G_c4 + G_c5 explicit, ALL → 0.003 + 0.006 + 0.006 + 0.008 + 0.01 = 0.0333467
# Суммарный расход охлаждающего воздуха на корыте:
G_Σк1 := G_к1 + G_к2 + G_к3 + G_к4 + G_к5 explicit, ALL → 0.004 + 0.007 + 0.008 + 0.009 + 0.009 = 0.0361663
# Толщина канала между дефлектором и лопаткой
Δ_с := 0.4*10^-3
# Коэффициент теплоотдачи воздуха:
α_в.с(x) :=
    0.52*G_Σc1^0.8*T*_охл.1.t^0.276/(h^0.8*Δ_с) if 0 ≤ x < x_с.1
    0.52*(G_Σc1 - G_c1)^0.8*T*_охл.1.t^0.276/(h^0.8*Δ_с) if x_с.1 ≤ x < x_с.2
    0.52*(G_Σc1 - G_c1 - G_c2)^0.8*T*_охл.2.t^0.276/(h^0.8*Δ_с) if x_с.2 ≤ x < x_с.3
    0.52*(G_Σc1 - G_c1 - G_c2 - G_c3)^0.8*T*_охл.3.t^0.276/(h^0.8*Δ_с) if x_с.3 ≤ x < x_с.4
    0.52*(G_Σc1 - G_c1 - G_c2 - G_c3 - G_c4)^0.8*T*_охл.4.t^0.276/(h^0.8*Δ_с) if x_с.4 ≤ x < x_с.5
    0.52*(G_Σc1 - G_c1 - G_c2 - G_c3 - G_c4)^0.8*T*_охл.5.t^0.276/(h^0.8*Δ_с) if x_с.5 ≤ x < x_с.6
# Разобраться, что делать с шестым участком
# (мб там просто какие-то отверстия по высоте)
α_в.к(x) :=
    0.52*G_Σк1^0.8*T*_охл.1.t^0.276/(h^0.8*Δ_с) if 0 ≤ x < x_к.1
    0.52*(G_Σк1 - G_к1)^0.8*T*_охл.1.t^0.276/(h^0.8*Δ_с) if x_к.1 ≤ x < x_к.2
    0.52*(G_Σк1 - G_к1 - G_к2)^0.8*T*_охл.2.t^0.276/(h^0.8*Δ_с) if x_к.2 ≤ x < x_к.3
    0.52*(G_Σк1 - G_к1 - G_к2 - G_к3)^0.8*T*_охл.3.t^0.276/(h^0.8*Δ_с) if x_к.3 ≤ x < x_к.4
    0.52*(G_Σк1 - G_к1 - G_к2 - G_к3 - G_к4)^0.8*T*_охл.4.t^0.276/(h^0.8*Δ_с) if x_к.4 ≤ x < x_к.5
    0.52*(G_Σк1 - G_к1 - G_к2 - G_к3 - G_к4)^0.8*T*_охл.5.t^0.276/(h^0.8*Δ_с) if x_к.5 ≤ x < x_к.6
# Коэффициент теплопередачи на спинке
K_с1(x) := 1/(δ_тзп/λ_тзп + δ/λ_мет + 1/α_в.с(x) + 1/α_сп(x))
# Коэффициент теплопередачи на корытце:
K_к1(x) := 1/(δ_тзп/λ_тзп + δ/λ_мет + 1/α_в.к(x) + 1/α_к(x))
# Коэффициент теплопередачи от пленки к стенке лопатки на спинке
K_с2(x) := 1/(δ_тзп/λ_тзп + 1/α_сп(x))
# Коэффициент теплопередачи от пленки к стенке лопатки на корытце
K_к2(x) := 1/(δ_тзп/λ_тзп + 1/α_к(x))
# Температура на поверхности спинки лопатки
T*_лоп.с(x) := T_п.с(x) - (T_п.с(x) - 757.4)*K_с1(x)/K_с2(x)  # Добавить тут изменение температуры охлаждайки по участкам
# Температура на поверхности корыта лопатки
T*_лоп.к(x) := T_п.к(x) - (T_п.к(x) - 757.4)*K_к1(x)/K_к2(x)
# Температура на поверхности ТЗП спинки лопатки
T*_тзп.с(x) := T_п.с(x) - (T_п.с(x) - 757.4)*K_с1(x)/α_пл.с(x)
# Температура на поверхности ТЗП корыта лопатки
T*_тзп.к(x) := T_п.к(x) - (T_п.к(x) - 757.4)*K_к1(x)/α_пл.к(x)
x_к := 0, 0.000001 .. x_к.6
x_с := 0, 0.000001 .. x_с.6
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# То, что снизу,-габелла, оставленная пока что из жалости
# Расчет конвективного охлаждения
# Распределение коэффициентов теплоотдачи по каналам охлаждения
# Расход через отверстия в выходной кромке
# Число отверстий выходной кромки:
N_вых := 20
G_вых.кр := N_вых*ΔG_1*0.00305 = 0.00924471  # кг/с
# Расходы воздуха на входе в охлаждающие каналы
G_охл.1 := G_c1 + G_c2 + G_к1 + G_к2 + G_c3 + G_к3 = 0.0340294  # кг/с
G_охл.2 := G_c3 + G_к3 = 0.0141929  # кг/с  # поменять
G_охл.3 := G_c5 + G_к4 + G_к5 + G_вых.кр + G_c4 = 0.0447283  # кг/с
G_охл.4 := G_c5 + G_к5 + G_вых.кр = 0.0279554  # кг/с
# Канал №1
(G_c1 + G_c2 + G_c3 + G_c4 + G_c5 + G_к1 + G_к2 + G_к3 + G_к4 + G_вых.кр)*45 = 3.13723
# Параметры потока
Δp_пот.1 := 1228  # Па  # поменять
T_охл.кан1 := 757.4 = 757.4  # К
p_охл.кан1 := p_к.t - Δp_пот.1 = 3439472  # Па
# Истинная теплоемкость охлаждающего воздуха:
c_p.т750(T) := (0.26 + 0.032*(1.176*10^-3*T - 0.88235) + (-1)*((0.374*10^-2)*(5.5556*10^-6*T^2 - 1.3056*10^-2*T + 6.67)))
c_p.т749(T) := (0.2407 + 0.0193*(2.5*10^-3*T - 0.875) + ((2*10^-3)*(2.5*10^-5*T^2 - 0.0275*T + 6.5625)))
c_p.т749(T) := c_p.т749(T)*4187  # Дж/(кг*К)
c_p.т750(T) := c_p.т750(T)*4187  # Дж/(кг*К)
c_p.т(T) :=
    c_p.т750(T) if T ≥ 750
    c_p.т749(T) otherwise
c_p.т(T_охл.кан1) = 1090.23  # Дж/(кг*К)
# Показатель адиабаты
k_охл1 := c_p.т(T_охл.кан1)/(c_p.т(T_охл.кан1) - R_в) = 1.35731
# Критическая скорость звука
a_кр.кан.1 := sqrt(2*k_охл1/(k_охл1 + 1)*R_в*T_охл.кан1) explicit, ALL → sqrt(2*1.4/(1.4 + 1)*287*757.4) = 500.322  # м/с
# Расход воздуха в среднем сечении
G_охл.1ср := (G_c1*0.5 + G_c2*0.5 + G_к1*0.5 + G_к2*0.5 + G_c3 + G_к3) = 0.0241112  # кг/с
# Приведенная скорость в среднем сечении
q_кан1 := G_охл.1ср*sqrt(T_охл.кан1)/(0.0396*p_охл.кан1*S_ср.1) = 0.0620223
q(λ, k) := ((k + 1)/2)^(1/(k - 1))*λ*(1 - (k - 1)/(k + 1)*λ^2)^(1/(k - 1))
λ_кан1 := root(q_кан1 - q(λ, k_охл1), λ, 0, 1) = 0.0391779
# Скорость потока
С_охл.1 := λ_кан1*a_кр.кан.1 explicit, ALL → 0.039*500.322 = 19.6016  # м/с
# Плотность по параметрам торможения
ρ_охл.1т := p_охл.кан1/(R_в*T_охл.кан1) explicit, ALL → 3439472/(287*757.4) = 15.8228  # кг/м^3
# Плотность по статическим параметрам
ρ_охл.1 := ρ_охл.1т*(1 - (k_охл1 - 1)/(k_охл1 + 1)*λ_кан1^2)^(1/(k_охл1 - 1)) explicit, ALL → 15.82*(1 - (1.36 - 1)/(1.36 + 1)*0.04^2)^(1/(1.36 - 1)) = 15.8125
ρ_охл.1 = 15.8125  # кг/м^3
# Вязкость воздуха:
μ_в.кан.1 := 17.6*10^-6*(T_охл.кан1/273)^0.68 = 3.5226e-5  # Па*с
# Число Рейнольдса
Re_охл.1 := С_охл.1*d_г.ср.1*ρ_охл.1/μ_в.кан.1 explicit, ALL → 19.6*0.01*15.81/(3.52*10^-5) = 74257.8
# Коэффициент теплопроводности воздуха:
λ_в.кан.1 := 0.0244*(T_охл.кан1/273)^0.82 = 0.0563356  # Вт/(м*К)
# Коэффициент теплоотдачи по каналу охлаждения
α_охл.1 := λ_в.кан.1/d_г.ср.1*0.018*Re_охл.1^0.8 explicit, ALL → 0.06/(8.44*10^-3)*0.02*(7.43*10^4)^0.8 = 946.97  # Вт/(м^2*К)
# Потери давления от входа до среднего сечения лопатки:
Δp_пот.1 := 0.3164/Re_охл.1^0.25*ρ_охл.1*С_охл.1^2/2*h/(2*d_г.ср.1) = 113.983  # Па
Δp_пв1 := (1.95*(0.01*180) - 1.21*(0.01*180)^2 + 0.322*(0.01*180)^3)*1.2*ρ_охл.1*С_охл.1^2/2 = 5349.5
Δp_пв1 = 5349.5  # Па
# Канал №2
# Параметры потока
R_в := 287
T_охл.кан2 := T_охл.кан1 = 757.4  # К
Δp_пот.2 := 103.8  # Па  # поменять
p_охл.кан2 := p_охл.кан1 - Δp_пв1 - Δp_пот.1 - Δp_пот.2 = 3433905  # Па
c_p.т(T_охл.кан2) = 1090.23  # Дж/(кг*К)
# Показатель адиабаты
k_охл2 := c_p.т(T_охл.кан2)/(c_p.т(T_охл.кан2) - R_в) explicit, ALL → 1.091*10^3/(1.091*10^3 - 287) = 1.35708
# Критическая скорость звука
a_кр.кан2 := sqrt(2*k_охл2/(k_охл2 + 1)*R_в*T_охл.кан2) explicit, ALL → sqrt(2*1.4/(1.4 + 1)*287*757.4) = 500.304  # м/с
# Расход воздуха в среднем сечении
G_охл.2ср := G_охл.2*0.5 = 0.00709647  # кг/с
# Приведенная скорость в среднем сечении
q_кан2 := G_охл.2ср*sqrt(T_охл.кан2)/(0.0396*0.65*p_охл.кан2*S_ср.2) = 0.0178249
q(λ, k) := ((k + 1)/2)^(1/(k - 1))*λ*(1 - (k - 1)/(k + 1)*λ^2)^(1/(k - 1))
λ_кан2 := root(q_кан2 - q(λ, k_охл2), λ, 0, 1) = 0.0112525
# Скорость потока
С_охл.2 := λ_кан2*a_кр.кан2 explicit, ALL → 0.011*500.304 = 5.62969  # м/с
# Плотность по параметрам торможения
ρ_охл.2т := p_охл.кан2/(R_в*T_охл.кан2) explicit, ALL → 3.434*10^6/(287*757.4) = 15.7972  # кг/м^3
# Плотность по статическим параметрам
ρ_охл.2 := ρ_охл.2т*(1 - (k_охл2 - 1)/(k_охл2 + 1)*λ_кан2^2)^(1/(k_охл2 - 1)) explicit, ALL → 15.8*(1 - (1.36 - 1)/(1.36 + 1)*0.01^2)^(1/(1.36 - 1)) = 15.7964
ρ_охл.2 = 15.7964  # кг/м^3
# Вязкость воздуха:
μ_в.кан.2 := 17.6*10^-6*(T_охл.кан2/273)^0.68 = 3.5226e-5  # Па*с
# Число Рейнольдса
Re_охл.2 := С_охл.2*d_г.ср.2*ρ_охл.2/μ_в.кан.2 explicit, ALL → 5.63*9.832*10^-3*15.796/(3.523*10^-5) = 24821.7
# Коэффициент теплопроводности воздуха:
λ_в.кан.2 := 0.0244*(T_охл.кан2/273)^0.82 = 0.0563356  # Вт/(м*К)
# Коэффициент теплоотдачи по каналу охлаждения
α_охл.2 := λ_в.кан.2/d_г.ср.2*0.018*Re_охл.2^0.8 explicit, ALL → 0.06/(9.83*10^-3)*0.02*(2.48*10^4)^0.8 = 338.274  # Вт/(м^2*К)
# Потери давления от входа до среднего сечения лопатки:
Δp_пот.2 := 0.3164/Re_охл.2^0.25*ρ_охл.2*С_охл.2^2/2*h/(2*d_г.ср.2) = 10.6028  # Па
Δp_пв2 := (1.95*0.01*180 - 1.21*(0.01*180)^2 + 0.322*(0.01*180)^3)*1.2*ρ_охл.2*С_охл.2^2/2 = 440.816
Δp_пв2 = 440.816  # Па
# [area: Канал №3]
# Канал №3
# Параметры потока
Δp_пот.3 := 4.364*10^3  # Па
T_охл.кан3 := T_охл.кан2 = 757.4  # К
p_охл.кан3 := p_охл.кан1 - Δp_пот.3 = 3435108  # Па
c_p.т(T_охл.кан3) = 1090.23  # Дж/(кг*К)
# Показатель адиабаты
k_охл3 := c_p.т(T_охл.кан3)/(c_p.т(T_охл.кан3) - R_в) explicit, ALL → 1.091*10^3/(1.091*10^3 - 287) = 1.35708
# Критическая скорость звука
a_кр.кан3 := sqrt(2*k_охл3/(k_охл3 + 1)*R_в*T_охл.кан3) explicit, ALL → sqrt(2*1.4/(1.4 + 1)*287*757.4) = 500.304  # м/с
# Расход воздуха в среднем сечении
G_охл.3ср := G_к5 + G_c5 + 0.5*G_к4 + G_вых.кр + G_c4*0.5 = 0.0363419  # кг/с
# Приведенная скорость в среднем сечении
q_кан3 := G_охл.3ср*sqrt(T_охл.кан3)/(0.0396*0.65*p_охл.кан3*S_ср.3) = 0.117449
q(λ, k) := ((k + 1)/2)^(1/(k - 1))*λ*(1 - (k - 1)/(k + 1)*λ^2)^(1/(k - 1))
λ_кан3 := root(q_кан3 - q(λ, k_охл3), λ, 0, 1) = 0.0743136
# Скорость потока
С_охл.3 := λ_кан3*a_кр.кан3 explicit, ALL → 0.074*500.304 = 37.1794  # м/с
# Плотность по параметрам торможения
ρ_охл.3т := p_охл.кан3/(R_в*T_охл.кан3) explicit, ALL → 3435108/(287*757.4) = 15.8028  # кг/м^3
# Плотность по статическим параметрам
ρ_охл.3 := ρ_охл.3т*(1 - (k_охл3 - 1)/(k_охл3 + 1)*λ_кан3^2)^(1/(k_охл3 - 1)) explicit, ALL → 15.8*(1 - (1.36 - 1)/(1.36 + 1)*0.07^2)^(1/(1.36 - 1)) = 15.7658
кг/м^3
ρ_охл.3 = 15.7658  # кг/м^3
# Вязкость воздуха:
μ_в.кан.3 := 17.6*10^-6*(T_охл.кан3/273)^0.68 = 3.5226e-5  # Па*с
# Число Рейнольдса
Re_охл.3 := С_охл.3*d_г.ср.3*ρ_охл.3/μ_в.кан.3 explicit, ALL → 37.179*7.482*10^-3*15.766/(3.523*10^-5) = 124498
# Коэффициент теплопроводности воздуха:
λ_в.кан.3 := 0.0244*(T_охл.кан3/273)^0.82 = 0.0563356  # Вт/(м*К)
# Коэффициент теплоотдачи по каналу охлаждения
α_охл.3 := λ_в.кан.3/d_г.ср.3*0.018*Re_охл.3^0.8 explicit, ALL → 0.06/(7.48*10^-3)*0.02*(1.24*10^5)^0.8 = 1615.02  # Вт/(м^2*К)
# Потери давления от входа до среднего сечения лопатки:
Δp_пот.3 := 0.3164/Re_охл.3^0.25*ρ_охл.3*С_охл.3^2/2*h/(2*d_г.ср.3) = 405.3  # Па
Δp_пв3 := (1.95*0.01*180 - 1.21*(0.01*180)^2 + 0.322*(0.01*180)^3)*1.2*ρ_охл.3*С_охл.3^2/2 = 19188.9
Δp_пв3 = 19188.9  # Па
# [area: Канал №4]
# Канал №4
# Параметры потока
Δp_пот.4 := 1.124*10^4  # Па
T_охл.кан4 := T_охл.кан3 = 757.4  # К
p_охл.кан4 := p_охл.кан3 - Δp_пв3 - Δp_пот.3 - Δp_пот.4 = 3404274  # Па
c_p.т(T_охл.кан4) = 1090.23  # Дж/(кг*К)
# Показатель адиабаты
k_охл4 := c_p.т(T_охл.кан4)/(c_p.т(T_охл.кан4) - R_в) explicit, ALL → 1.091*10^3/(1.091*10^3 - 287) = 1.35708
# Критическая скорость звука
a_кр.кан4 := sqrt(2*k_охл4/(k_охл4 + 1)*R_в*T_охл.кан4) explicit, ALL → sqrt(2*1.4/(1.4 + 1)*287*757.4) = 500.304  # м/с
# Расход воздуха в среднем сечении
G_охл.4ср := G_охл.4*0.5 = 0.0139777  # кг/с
# Приведенная скорость в среднем сечении
q_кан4 := G_охл.4*sqrt(T_охл.кан4)/(0.0396*0.65*p_охл.кан4*S_ср.4) = 0.157659
q(λ, k) := ((k + 1)/2)^(1/(k - 1))*λ*(1 - (k - 1)/(k + 1)*λ^2)^(1/(k - 1))
λ_кан4 := root(q_кан4 - q(λ, k_охл4), λ, 0, 1) = 0.0999448
# Скорость потока
С_охл.4 := λ_кан4*a_кр.кан4 explicit, ALL → 0.1*500.304 = 50.0028  # м/с
# Плотность по параметрам торможения
ρ_охл.4т := p_охл.кан4/(R_в*T_охл.кан4) explicit, ALL → 3.404*10^6/(287*757.4) = 15.6609  # кг/м^3
# Плотность по статическим параметрам
ρ_охл.4 := ρ_охл.4т*(1 - (k_охл4 - 1)/(k_охл4 + 1)*λ_кан4^2)^(1/(k_охл4 - 1)) explicit, ALL → 15.66*(1 - (1.36 - 1)/(1.36 + 1)*0.1^2)^(1/(1.36 - 1)) = 15.5946
кг/м^3
ρ_охл.4 = 15.5946  # кг/м^3
# Вязкость воздуха:
μ_в.кан.4 := 17.6*10^-6*(T_охл.кан4/273)^0.68 = 3.5226e-5  # Па*с
# Число Рейнольдса
Re_охл.4 := С_охл.4*d_г.ср.4*ρ_охл.4/μ_в.кан.4 explicit, ALL → 50.003*4.816*10^-3*15.595/(3.523*10^-5) = 106618
# Коэффициент теплопроводности воздуха:
λ_в.кан.4 := 0.0244*(T_охл.кан4/273)^0.82 = 0.0563356  # Вт/(м*К)
p_охл.кан := [713.4; 724.1; 745.5; 803.8; 741; 779]
# Коэффициент теплоотдачи по каналу охлаждения
α_охл.4 := λ_в.кан.4/d_г.ср.4*0.018*Re_охл.4^0.8 explicit, ALL → 0.06/(4.82*10^-3)*0.02*(1.07*10^5)^0.8 = 2216.13  # Вт/(м^2*К)
# Потери давления от входа до среднего сечения лопатки:
Δp_пот.4 := 0.3164/Re_охл.4^0.25*ρ_охл.4*С_охл.4^2/2*h/(2*d_г.ср.4) = 1170.95  # Па
# Координаты каналов охлаждения
x_кан.с1 := 12.28*10^-3  # мм
x_кан.к1 := 9.66*10^-3  # мм
x_кан.с2 := 24.03*10^-3  # мм
x_кан.к2 := 19.14*10^-3 = 0.01914  # мм
x_кан.с3 := 33.36*10^-3  # мм
x_кан.к3 := 27.59*10^-3  # мм
x_кан.с.вых := l_с
x_кан.к.вых := l_к
# Распределение коэффициентов теплоотдачи
α_кан.с(x) :=
    α_охл.1 if 0 ≤ x < x_кан.с1
    α_охл.2 if x_кан.с1 ≤ x < x_кан.с2
    α_охл.3 if x_кан.с2 ≤ x < x_кан.с3
    α_охл.4 if x_кан.с3 ≤ x < x_кан.с.вых
α_кан.к(x) :=
    α_охл.1 if 0 ≤ x < x_кан.к1
    α_охл.2 if x_кан.к1 ≤ x < x_кан.к2
    α_охл.3 if x_кан.к2 ≤ x < x_кан.к3
    α_охл.4 if x_кан.к3 ≤ x < x_кан.к.вых
x_кан.с := 0, 0.000001 .. l_с
x_кан.к := 0, 0.000001 .. l_к
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T_охл.кан.к(x) :=
    T_охл.кан1 if 0 ≤ x < x_кан.к1
    T_охл.кан2 if x_кан.к1 ≤ x < x_кан.к2
    T_охл.кан3 if x_кан.к2 ≤ x < x_кан.к3
    T_охл.кан4 if x_кан.к3 ≤ x < l_к
# Коэффициент теплопроводности металла
T_охл.кан.сп(x) :=
    T_охл.кан1 if 0 ≤ x < x_кан.с1
    T_охл.кан2 if x_кан.с1 ≤ x < x_кан.с2
    T_охл.кан3 if x_кан.с2 ≤ x < x_кан.с3
    T_охл.кан4 if x_кан.с3 ≤ x < l_с
λ_мет := 21  # Вт/(м*К)
# Толщина стенки лопатки
δ := 1*10^-3  # мм
# Коэффициент теплопередачи на спинке
K_сп(x) := 1/(1/α_кан.с(x) + δ/λ_мет + 1/α_сп(x))
# Коэффициент теплопередачи на корыте
K_к(x) := 1/(1/α_кан.к(x) + δ/λ_мет + 1/α_к(x))
# Тепловой поток в лопатке на спинке
Q_сп(x) := K_сп(x)*(T_п.с(x) - T_охл.кан.сп(x))
# Тепловой поток в лопатке на корытце
Q_к(x) := K_к(x)*(T_п.к(x) - T_охл.кан.к(x))
# Температура спинки
Т_ст.внеш.с(x) := T_п.с(x) - Q_сп(x)/α_сп(x)
# Температура корытца
Т_ст.внеш.к(x) := T_п.к(x) - Q_к(x)/α_к(x)
# Температура внутренней поверхности спинки
Т_ст.внут.с(x) := Т_ст.внеш.с(x) - δ/λ_мет*Q_сп(x)
# Температура внутренней поверхности корытца
Т_ст.внут.к(x) := Т_ст.внеш.к(x) - δ/λ_мет*Q_к(x)
# Распределение температуры по обводу профиля
x_сп := 0, 0.0001 .. l_с
x_кор := 0, 0.0001 .. l_к
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i := 1 .. 4
T_охл.кан := [T_охл.кан1; T_охл.кан2; T_охл.кан3; T_охл.кан4]
x_кан.с := [x_кан.с1; x_кан.с2; x_кан.с3; x_кан.с.вых]
x_кан.к := [x_кан.к1; x_кан.к2; x_кан.к3; x_кан.к.вых]
p_охл.кан := [p_охл.кан1; p_охл.кан2; p_охл.кан3; p_охл.кан4]
G_охл := [G_охл.1; G_охл.2; G_охл.3; G_охл.4]
α_кан := [α_охл.1; α_охл.2; α_охл.3; α_охл.4]
# Средняя температура внутренней поверхности стенки в канале
Π_ср := [Π_ср.1; Π_ср.2; Π_ср.3; Π_ср.4]
Т_ст.внут[i] :=
    ((integral(Т_ст.внут.с(x), x = 0 .. x_кан.с[1])/x_кан.с[1] + integral(Т_ст.внут.к(x), x = 0 .. x_кан.к[1])/x_кан.к[1])*0.5) if i == 1
    ((integral(Т_ст.внут.с(x), x = x_кан.с[i - 1] .. x_кан.с[i])/(x_кан.с[i] - x_кан.с[i - 1]) + integral(Т_ст.внут.к(x), x = x_кан.к[i - 1] .. x_кан.к[i])/(x_кан.к[i] - x_кан.к[i - 1]))*0.5) otherwise
p_охл.кан := [1.599*10^6; 1.571*10^6; 1.595*10^6; 1.518*10^6; 741; 779]
# Теплота подводимая к охлаждающему воздуху
Q_кан[i] := α_кан[i]*Π_ср[i]*0.5*h*(Т_ст.внут[i] - T_охл.кан[i])
Т_ст.внут = [933.634; 960.451; 923.475; 1019.27]  # К
Q_кан = [102.652; 57.2283; 228.168; 443.451]  # Дж
# Температуры охлаждающего воздуха с учетом подогрева
T_охл.кан1 := T_к.t + Q_кан[1]/(G_охл[1]*c_p.т(T_охл.кан[1])) = 862.567  # К
T_охл.кан2 := T_охл.кан1 + Q_кан[1]/(G_охл[1]*c_p.т(T_охл.кан[1])) = 865.334  # К
T_охл.кан := [713.2; 724.5; 727; 777.8; 741; 779]
T_охл.кан3 := T_к.t + Q_кан[2]/(G_охл[2]*c_p.т(T_охл.кан[2])) = 863.528  # К
T_охл.кан4 := T_охл.кан3 + Q_кан[3]/(G_охл[3]*c_p.т(T_охл.кан[3])) = 868.242  # К
# Суммарный расход охлаждающего воздуха фактический:
(G_c1 + G_c2 + G_c3 + G_c4 + G_c5 + G_к1 + G_к2 + G_к3 + G_к4 + G_к5 + G_вых.кр)*45 = 3.5441  # кг/с
# Суммарный расход охлаждающего воздуха заданный
ΔG := 1.026  # кг/с  # меняем
