# Исходные данные:
R_сум := 33*10^3
# Теплоёмкость от температуры:
# Расчет цикла
# Степень двухконтурности:
m := 4.2
# Коэффициент полного давления при входе:
σ_вх := 0.98
l_0 := 14.61
# Политропический КПД компрессора:
η*_к.п := 0.91
# Политропический КПД вентилятора:
η*_вл.п := 0.89
# Коэффициент полноты горения:
η_г := 0.99
c_piв := [1016; 1032; 1048; 1076; 1100; 1120; 1140; 1156; 1172; 1190; 1202; 1216; 1222; 1232; 1240; 1246; 1252]
c_pmг := [1036; 1048; 1052; 1076; 1092; 1104; 1120; 1136; 1148; 1160; 1174; 1188; 1196; 1208; 1220; 1230; 1240]
c_pmв := [1002; 1008; 1014; 1020; 1028; 1036; 1048; 1056; 1064; 1074; 1084; 1092; 1100; 1108; 1112; 1120; 1126]
T_те := [400; 500; 600; 700; 800; 900; 1000; 1100; 1200; 1300; 1400; 1500; 1600; 1700; 1800; 1900; 2000]
# Коэффициент полного давления в камере сгорания:
c_piг := [1092; 1118; 1152; 1184; 1214; 1244; 1268; 1292; 1312; 1332; 1352; 1368; 1384; 1392; 1404; 1416; 1424]
σ_г := 0.97
# Политропический КПД турбин:
η*_т.п := 0.90
# Лопаточный КПД:
η_л := 0.9
# Механический КПД:
η_м := 0.99
# Коэффициент давления во втором контуре:
σ_II := 0.99
# Коэффициент давления в камере смешения:
σ_см := 0.98
# Коэффициент скорости сопла:
φ_с := 0.99
Сы := lspline(T_те, c_piг)
# Низшая теплота сгорания топлива (кероси ТС-1):
c_pig(T) := interp(Сы, T_те, c_piг, T)
См := lspline(T_те, c_pmг)
Q_н.р := 43*10^6
c_pmg(T) := interp(См, T_те, c_pmг, T)
# Утечки:
Св := lspline(T_те, c_piв)
g_ут := 0.01
c_pia(T) := interp(Св, T_те, c_piв, T)
R_пр.сг. := 290
Свм := lspline(T_те, c_pmв)
c_pma(T) := interp(Свм, T_те, c_pmв, T)
# Параметры на входе в компрессор:
T_а := 288
c_pgi(T, α) := c_pia(T) + (1 + l_0)/(1 + α*l_0)*(c_pig(T) - c_pia(T))
p_а := 0.1013*10^6
# Работа компрессора:
c_pgm(T, α) := c_pma(T) + (1 + l_0)/(1 + α*l_0)*(c_pmg(T) - c_pma(T))
R := 287.3
k_см := (1.33 + 1.4*m)/(1 + m) = 1.38654
# ==============================================================================
# Расчёт для выбора оптимального значения Пк и Тг
# Примем
π*_к := 1, 2 .. 30
R := 287.3
π*_вл := 1.7
π*_кΣ(π*_к) := π*_вл*π*_к
π*_кΣ(16) = 27.2
# Средняя температура компрессора
T_mk := 544
c_pк := c_pia(T_mk) = 1038.09
k := c_pia(T_mk)/(c_pia(T_mk) - R) = 1.38266
# Средняя температура сжатия в вентиляторе:
T_mv := 310
c_pв := c_pia(T_mv) = 1001.44
k_в := c_pв/(c_pв - R) = 1.4023
# КПД компрессора:
η*_к(π*_к) := (π*_к^((k - 1)/k) - 1)/(π*_к^((k - 1)/(k*η*_к.п)) - 1)
η*_к(16) = 0.871714
# КПД вентилятора:
η*_вл := (π*_вл^((k_в - 1)/k_в) - 1)/(π*_вл^((k_в - 1)/(k_в*η*_вл.п)) - 1) = 0.881443
# Температура за вентилятором:
T*_вл := T_а*(1 + (π*_вл^((k_в - 1)/k_в) - 1)/η*_вл) = 341.725
# Температура за компрессором в первом приближении:
T*_к(π*_к) := T*_вл*(1 + (π*_к^((k - 1)/k) - 1)/η*_к(π*_к))
T*_к(16) = 794.117
T_mk(π*_к) := (288 + T*_к(π*_к))/2
c_pк(π*_к) := c_pia(T_mk(π*_к))
c_pк(16) = 1037.67
k(π*_к) := c_pia(T_mk(π*_к))/(c_pia(T_mk(π*_к)) - R)
k(16) = 1.38288
# Температура за компрессором уточнённая:
T*_к(π*_к) := T*_вл*(1 + (π*_к^((k(π*_к) - 1)/k(π*_к)) - 1)/η*_к(π*_к))
T*_к(16) = 794.38
# Давление за компрессором:
p*_к(π*_к) := p_а*π*_кΣ(π*_к)*σ_вх
p*_к(16) = 2700253
# Давление за вентилятором:
p*_вл := p_а*π*_вл*σ_вх = 168766
# Работа вентилятора:
L_вл := c_pв*T_а*(π*_вл^((k_в - 1)/k_в) - 1)/η*_вл = 53802.2
# Работа компрессора высокого давления:
L_квд(π*_к) := c_pк(π*_к)*T*_вл*(π*_к^((k(π*_к) - 1)/k(π*_к)) - 1)/η*_к(π*_к)
L_квд(16) = 469707
# Давление газа перед турбиной:
p*_г(π*_к) := p*_к(π*_к)*σ_г
p*_г(16) = 2619245
# Относительный расход топлива:
g_m(π*_к, T*_г) := (c_pma(T*_г)*T*_г - c_pma(T*_к(π*_к))*T*_к(π*_к))/(Q_н.р*η_г - (1 + l_0)*(c_pmg(T*_г)*T*_г - c_pmg(288)*288) + l_0*(c_pma(T*_г)*T*_г - c_pma(288)*288))
g_m(16, 1600) = 0.0243061
# Коэффициент избытка воздуха:
α_Σ(π*_к, T*_г) := 1/(g_m(π*_к, T*_г)*l_0)
α_Σ(16, 1600) = 2.81601
# Расход воздуха на охлаждение турбины высокого давления:
θ(π*_к, T*_г) := (T*_г - 1100)/(T*_г - T*_к(π*_к) - 100)
θ(16, 1600) = 0.708597
g_охл(π*_к, T*_г) := 2*θ(π*_к, T*_г)/10
g_охл(16, 1600) = 0.141719
# Относительный расход воздуха через турбину:
g_т(π*_к, T*_г) := (1 + g_m(π*_к, T*_г))*(1 - g_ут - g_охл(π*_к, T*_г))
g_т(16, 1600) = 0.868899
# Работа турбины высокого давления:
L_твд(π*_к, T*_г) := L_квд(π*_к)/(η_м*g_т(π*_к, T*_г))
L_твд(16, 1600) = 546038
# Принимае среднюю температуру расширения в турбиние:
T_mt := 1360
c_pг(π*_к, T*_г) := c_pgi(T_mt, α_Σ(π*_к, T*_г))
k_г(π*_к, T*_г) := c_pг(π*_к, T*_г)/(c_pг(π*_к, T*_г) - 290)
# Температура за турбиной высокого давления без учёта охлаждения:
T*_твд(π*_к, T*_г) := T*_г - L_твд(π*_к, T*_г)/c_pг(π*_к, T*_г)
# Второе приближение:
T_mt(π*_к, T*_г) := (T*_г + T*_твд(π*_к, T*_г))/2
k_г(π*_к, T*_г) := c_pг(π*_к, T*_г)/(c_pг(π*_к, T*_г) - 290)
c_pг(π*_к, T*_г) := c_pgi(T_mt(π*_к, T*_г), α_Σ(π*_к, T*_г))
c_pг(16, 1600) = 1254.91
k_г(16, 1600) = 1.30153
# Степень понижения давления в турбине:
π*_твд(π*_к, T*_г) := root(L_твд(π*_к, T*_г) - c_pг(π*_к, T*_г)*T*_г*(1 - π*_т1^((1 - k_г(π*_к, T*_г))/k_г(π*_к, T*_г)))*η*_т.п, π*_т1, 1, 20)
π*_твд(16, 1600) = 4.72542
# Пересчитанный КПД турбины
η*_т(π*_к, T*_г) := (1 - π*_твд(π*_к, T*_г)^((1 - k_г(π*_к, T*_г))*η*_т.п/k_г(π*_к, T*_г)))/(1 - π*_твд(π*_к, T*_г)^((1 - k_г(π*_к, T*_г))/k_г(π*_к, T*_г)))
η*_т(16, 1600) = 0.9154
# Степень понижения давления в турбине:
π*_твд(π*_к, T*_г) := root(L_твд(π*_к, T*_г) - c_pг(π*_к, T*_г)*T*_г*(1 - π*_т1^((1 - k_г(π*_к, T*_г))/k_г(π*_к, T*_г)))*η*_т(π*_к, T*_г), π*_т1, 1, 20)
π*_твд(16, 1600) = 4.57967
# Температура за турбиной высокого давления без учёта охлаждения:
T*_твд(π*_к, T*_г) := T*_г - L_твд(π*_к, T*_г)/c_pг(π*_к, T*_г)
T*_твд(16, 1600) = 1164.88
# Температура за турбиной высокого давления с учётом охлаждения в первом приближении:
T*'_твд(π*_к, T*_г) := (c_pgm(T*_твд(π*_к, T*_г), α_Σ(π*_к, T*_г))*T*_твд(π*_к, T*_г)*g_т(π*_к, T*_г) + c_pma(T*_к(π*_к) + 200)*(T*_к(π*_к) + 200)*(g_охл(π*_к, T*_г) - 0.02))/(c_pgm(T*_твд(π*_к, T*_г), α_Σ(π*_к, T*_г))*g_т(π*_к, T*_г) + c_pma(T*_к(π*_к) + 200)*(g_охл(π*_к, T*_г) - 0.02))
T*'_твд(16, 1600) = 1144.68
# Относительный расход воздуха через турбину вентилятора:
g_твл(π*_к, T*_г) := (1 + g_m(π*_к, T*_г))*(1 - g_ут - 0.02)
g_твл(16, 1600) = 0.993577
# Работа турбины вентилятора:
L_твл(π*_к, T*_г) := L_вл*(1 + m)/(η_м*g_твл(π*_к, T*_г))
L_твл(16, 1600) = 284424
# Учёт изменеия коэффициента воздуха:
g_m2(π*_к, T*_г) := g_m(π*_к, T*_г)*(1 - g_ут - g_охл(π*_к, T*_г))/((1 + g_m(π*_к, T*_г))*(1 - g_ут - g_охл(π*_к, T*_г)) + (g_охл(π*_к, T*_г) - 0.02))
g_m2(14.286, 1600) = 0.0215447
α_т2(π*_к, T*_г) := 1/(g_m2(π*_к, T*_г)*l_0)
α_т2(16, 1600) = 3.28852
# Принимае среднюю температуру расширения в турбиние:
T_mtv := 1000
c_pгв(π*_к, T*_г) := c_pgi(T_mtv, α_т2(π*_к, T*_г))
k_гв(π*_к, T*_г) := c_pгв(π*_к, T*_г)/(c_pгв(π*_к, T*_г) - R)
# Температура за турбиной вентилятора:
T*_твл(π*_к, T*_г) := T*'_твд(π*_к, T*_г) - L_твл(π*_к, T*_г)/c_pгв(π*_к, T*_г)
# Второе приближение:
T_mtv(π*_к, T*_г) := (T*'_твд(π*_к, T*_г) + T*_твл(π*_к, T*_г))/2
c_pгв(π*_к, T*_г) := c_pgi(T_mt(π*_к, T*_г), α_Σ(π*_к, T*_г))
k_гв(π*_к, T*_г) := c_pгв(π*_к, T*_г)/(c_pгв(π*_к, T*_г) - R)
c_pгв(16, 1600) = 1254.91
k_гв(16, 1600) = 1.29692
# Степень понижения давления в турбине:
π*_твл(π*_к, T*_г) := root(L_твл(π*_к, T*_г) - c_pгв(π*_к, T*_г)*T*'_твд(π*_к, T*_г)*(1 - π*_т1^((1 - k_гв(π*_к, T*_г))/k_гв(π*_к, T*_г)))*η*_т.п, π*_т1, 1, 20)
π*_твл(14.286, 1600) = 2.88235
# Пересчитанный КПД турбины
η*_тв(π*_к, T*_г) := (1 - π*_твл(π*_к, T*_г)^((1 - k_гв(π*_к, T*_г))*η*_т.п/k_гв(π*_к, T*_г)))/(1 - π*_твл(π*_к, T*_г)^((1 - k_гв(π*_к, T*_г))/k_гв(π*_к, T*_г)))
η*_тв(16, 1600) = 0.910806
# Степень понижения давления в турбине:
π*_твл(π*_к, T*_г) := root(L_твл(π*_к, T*_г) - c_pгв(π*_к, T*_г)*T*'_твд(π*_к, T*_г)*(1 - π*_т1^((1 - k_гв(π*_к, T*_г))/k_гв(π*_к, T*_г)))*η*_тв(π*_к, T*_г), π*_т1, 1, 20)
π*_твл(14.286, 1600) = 2.84281
# Температура за турбиной вентилятора:
T*_твл(π*_к, T*_г) := T*'_твд(π*_к, T*_г) - T*'_твд(π*_к, T*_г)*(1 - π*_твл(π*_к, T*_г)^((1 - k_гв(π*_к, T*_г))/k_гв(π*_к, T*_г)))*η*_тв(π*_к, T*_г)
T*_твл(14.286, 1600) = 943.04
# Степень понижения давления в турбине:
π*_т(π*_к, T*_г) := π*_твд(π*_к, T*_г)*π*_твл(π*_к, T*_г)
π*_т(16, 1600) = 13.3606
# Давление за турбиной: | Давление за вентилятором:
p*_т(π*_к, T*_г) := p_а*π*_кΣ(π*_к)*σ_вх*σ_г/π*_т(π*_к, T*_г)
p*_вл := p_а*π*_вл*σ_вх = 168766
p*_т(16, 1600) = 196042
# Давление за камерой смешения:
p*_см(π*_к, T*_г) := p*_т(π*_к, T*_г)*σ_см
# Температура смеси:
T*_см(π*_к, T*_г) := (c_pгв(π*_к, T*_г)*T*_твл(π*_к, T*_г) + m*c_pв*T*_вл)/(c_pгв(π*_к, T*_г) + m*c_pв)
# Степень понижения давления в сопле:
π*_c(π*_к, T*_г) := p*_см(π*_к, T*_г)/p_а
π*_c(14.286, 1600) = 1.95524
# Скорость истечения из сопла:
c_с(π*_к, T*_г) := φ_с*sqrt(2*k_см/(k_см - 1)*288*T*_см(π*_к, T*_г)*(1 - π*_c(π*_к, T*_г)^((1 - k_см)/k_см)))
c_с(14.286, 1600) = 407.184
# Удельная тяга, отнесённая к суммарному расходу:
R_уд(π*_к, T*_г) := c_с(π*_к, T*_г)*(1 + g_m(π*_к, T*_г)*(1 - g_ут - 0.02)/(1 + m))
# Удельный расход топлива:
C_R(π*_к, T*_г) := g_m(π*_к, T*_г)*3600*(1 - g_ут - 0.02)*10/(R_уд(π*_к, T*_г)*(1 + m))  # кг/(даН*час)
# Расход воздуха через первый контур:
C_R(14.286, 1600) = 0.410898
R_уд(14.286, 1600) = 409.085
G_1(π*_к, T*_г) := R_сум/(R_уд(π*_к, T*_г)*(1 + m))
# Расход через второй контур:
G_2(π*_к, T*_г) := G_1(π*_к, T*_г)*m
# Суммарный расход воздуха:
G_Σ(π*_к, T*_г) := G_1(π*_к, T*_г) + G_2(π*_к, T*_г)
π*_к := 1, 3 .. 30
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г7
# =================================================================================================================================================================================
# Расчёт для конкретных значений Пк
# Примем
π*_кΣ1 := 20
R := 287.3
π*_вл := 1.7
π*_квд := π*_кΣ1/π*_вл = 11.7647
# Средняя температура компрессора
T_mk := 544
c_pк := c_pia(T_mk) = 1038.09
k := c_pia(T_mk)/(c_pia(T_mk) - R) = 1.38266
# Средняя температура сжатия в вентиляторе:
T_mv := 310
c_pв := c_pia(T_mv) = 1001.44
k_в := c_pв/(c_pв - R) = 1.4023
# КПД компрессора:
η*_к := (π*_квд^((k - 1)/k) - 1)/(π*_квд^((k - 1)/(k*η*_к.п)) - 1) = 0.876306
# КПД вентилятора:
η*_вл := (π*_вл^((k_в - 1)/k_в) - 1)/(π*_вл^((k_в - 1)/(k_в*η*_вл.п)) - 1) explicit, ALL → (1.7^((1.402 - 1)/1.402) - 1)/(1.7^((1.402 - 1)/(1.402*0.89)) - 1) = 0.881443
# Температура за вентилятором:
T*_вл := T_а*(1 + (π*_вл^((k_в - 1)/k_в) - 1)/η*_вл) = 341.725
# Температура за компрессором:
T*_к := T*_вл*(1 + (π*_квд^((k - 1)/k) - 1)/η*_к) = 723.222
# Давление за компрессором:
p*_к := p_а*π*_кΣ1*σ_вх = 1985480
# Давление за вентилятором:
p*_вл := p_а*π*_вл*σ_вх = 168766
# Работа вентилятора:
L_вл := c_pв*T_а*(π*_вл^((k_в - 1)/k_в) - 1)/η*_вл = 53802.2
# Работа компрессора высокого давления:
L_квд := c_pк*T*_вл*(π*_квд^((k - 1)/k) - 1)/η*_к = 396029
# Давление газа перед турбиной:
p*_г := p*_к*σ_г = 1925916
# Температура газа после камеры сгорания:
T*_г := 1523
# Относительный расход топлива:
g_m := (c_pma(T*_г)*T*_г - c_pma(T*_к)*T*_к)/(Q_н.р*η_г - (1 + l_0)*(c_pmg(T*_г)*T*_г - c_pmg(288)*288) + l_0*(c_pma(T*_г)*T*_г - c_pma(288)*288)) = 0.0237481
# Коэффициент избытка воздуха:
α_Σ := 1/(g_m*l_0) = 2.88218
# Расход воздуха на охлаждение турбины высокого давления:
θ := (T*_г - 1100)/(T*_г - T*_к - 100) explicit, ALL → (1.523*10^3 - 1.1*10^3)/(1.523*10^3 - 723.222 - 100) = 0.604477
g_охл := 2*θ/10 = 0.120895
# Относительный расход воздуха через турбину:
g_т := (1 + g_m)*(1 - g_ут - g_охл) = 0.889744
# Работа турбины высокого давления:
L_твд := L_квд/(η_м*g_т) = 449601
# Принимае среднюю температуру расширения в турбиние:
T_mt := 1360
c_pг := c_pgi(T_mt, α_Σ) = 1250.54
k_г := c_pг/(c_pг - 290) = 1.30191
# Степень понижения давления в турбине:
π*_твд := root(L_твд - c_pг*T*_г*(1 - π*_т1^((1 - k_г)/k_г))*η*_т.п, π*_т1, 1, 20) = 3.71289
# Пересчитанный КПД турбины
η*_т := (1 - π*_твд^((1 - k_г)*η*_т.п/k_г))/(1 - π*_твд^((1 - k_г)/k_г)) = 0.913126
# Степень понижения давления в турбине:
π*_твд := root(L_твд - c_pг*T*_г*(1 - π*_т1^((1 - k_г)/k_г))*η*_т, π*_т1, 1, 20) = 3.63216
# Температура за турбиной высокого давления без учёта охлаждения:
T*_твд := T*_г - T*_г*(1 - π*_твд^((1 - k_г)/k_г))*η*_т = 1163.48
# Температура за турбиной высокого давления с учётом охлаждения в первом приближении:
T*'_твд := (c_pgm(T*_твд, α_Σ)*T*_твд*g_т + c_pma(T*_к + 200)*(T*_к + 200)*(g_охл - 0.02))/(c_pgm(T*_твд, α_Σ)*g_т + c_pma(T*_к + 200)*(g_охл - 0.02)) = 1140.06
# Относительный расход воздуха через турбину вентилятора:
g_охл = 0.120895
g_твл := (1 + g_m)*(1 - g_ут - 0.02) = 0.993036
# Работа турбины вентилятора:
1 - g_ут - 0.02 = 0.97
L_твл := L_вл*(1 + m)/(η_м*g_твл) = 284579
# Учёт изменеия коэффициента воздуха:
g_m2 := g_m*(1 - g_ут - g_охл)/((1 + g_m)*(1 - g_ут - g_охл) + (g_охл - 0.02)) = 0.0208346
α_т2 := 1/(g_m2*l_0) = 3.28522
# Принимае среднюю температуру расширения в турбиние:
T_mtv := 1000
c_pгв := c_pgi(T_mtv, α_т2) = 1180.78
k_гв := c_pгв/(c_pгв - 290) = 1.32556
# Степень понижения давления в турбине:
π*_твл := root(L_твл - c_pгв*T*'_твд*(1 - π*_т1^((1 - k_гв)/k_гв))*η*_т.п, π*_т1, 1, 20) = 2.97463
# Пересчитанный КПД турбины
η*_тв := (1 - π*_твл^((1 - k_гв)*η*_т.п/k_гв))/(1 - π*_твл^((1 - k_гв)/k_гв)) = 0.911612
# Степень понижения давления в турбине:
π*_твл := root(L_твл - c_pгв*T*'_твд*(1 - π*_т1^((1 - k_гв)/k_гв))*η*_тв, π*_т1, 1, 20) = 2.92773
# Температура за турбиной вентилятора:
T*_твл := T*'_твд - T*'_твд*(1 - π*_твл^((1 - k_гв)/k_гв))*η*_тв = 899.055
# Суммарная степень понижения давления в турбинах:
π*_т := π*_твд*π*_твл = 10.634
# Давление за турбиной: | Давление за вентилятором:
p*_т := p_а*π*_кΣ1*σ_вх*σ_г/π*_т = 181109
p*_вл := p_а*π*_вл*σ_вх = 168766
# Давление за камерой смешения:
p*_см := p*_т*σ_см = 177487
σ_см = 0.98
# Температура смеси:
T*_см := (c_pгв*T*_твл + m*c_pв*T*_вл)/(c_pгв + m*c_pв) = 463.89
# Степень понижения давления в сопле:
π*_c := p*_см/p_а = 1.75209
# Скорость истечения из сопла:
c_с := φ_с*sqrt(2*k_см/(k_см - 1)*288*T*_см*(1 - π*_c^((1 - k_см)/k_см))) = 368.73
# Удельная тяга, отнесённая к суммарному расходу:
R_уд := c_с*(1 + g_m*(1 - g_ут - 0.02)/(1 + m)) = 370.364
# Удельный расход топлива:
C_R := g_m*3600*(1 - g_ут - 0.02)*10/(R_уд*(1 + m)) = 0.430597  # кг/(даН*час)
# Расход воздуха через первый контур:
G_1 := R_сум/(R_уд*(1 + m)) = 17.1349
# Расход через второй контур:
G_2 := G_1*m = 71.9667
# Суммарный расход воздуха:
G_Σ := G_1 + G_2 = 89.1016
# Расход газа через турбину высокого давления:
G_г.вд := G_1*(1 + g_m)*(1 - g_ут - g_охл) = 15.2457
# Расход газа через турбину низкого давления:
G_г.твл := G_1*g_твл = 17.0156
# ================================================================================================================================================================================================================================================================================================================================================================================================================================================================================================================================================================================================================================================================
# Определение частоты вращения при заданной необходимой удельной работе турбины:
# Зададимся осевой скоростью:
с_т.а := 230  # м/c
# Располагаемый теплоперепад:
Н_т := (L_твд + с_т.а^2/2)/η_л = 528945  # Дж/кг
# Показатель аддиабаты:
k_г = 1.30191
# Средняя удельная теплоемкость:
c_pг = 1250.54  # Дж/(кг*К)
# Температура за турбиной:
Т_т := T*_г - Н_т*η_л/c_pг = 1142.33  # К
# Статическое давление за турбиной:
p_т := p*_г*(1 - Н_т/(c_pг*T*_г))^(k_г/(k_г - 1)) = 473519  # Па
# Степень понижения давления:
π_т := p*_г/p_т = 4.06724
# Удельный обьем:
v_t := R_пр.сг.*Т_т/p_т = 0.699601
# Площадь кольцевого сечения:
А_т := G_г.твл*v_t/с_т.а = 0.0517571  # м^2
# Допустимые напряжения растяжения в рабочих лопатках:
σ_л := 350  # МПа
к_з := 1.25
σ_л := σ_л/к_з = 280  # МПа
# Коэффициент пропорциональности k_n :
k_n := 6.8*10^-6
# Максимальная частота вращения:
# Частота вращения
n_т.max := sqrt(σ_л/(k_n*А_т)) = 28205.9
n_т := 27500
# Основные размеры многоступенчатой турбины
# Профиль меридионального сечения турбины D_т=const
# Относительная длина рабочей лопатки последней ступени
l_отн := 0.2
# Средний диаметр последней ступени
D_т := sqrt(А_т/(π*l_отн)) = 0.287009  # м
# Длина лопатки на диаметре | D_т
l_л := А_т/(π*D_т) = 0.0574017  # м
# Окружная скорость на диаметре D_т
U_т := π*D_т*n_т/60 = 413.263  # м/c^2
# Средний диаметр при выходе из СА первой ступени:
n_тк := n_т/60
D_1 := D_т = 0.287009  # м
# Окружная скорость на диаметре D_1:
U_1 := π*D_1*n_тк = 413.263  # м/c^2
# Средняя окружная скорость по турбине:
U_ср := U_т = 413.263  # м/c^2
# Оптимальное отношения для выбранной степени реактивности:
y_0 := 0.55
# Условная адиабатная скорость:
С_0 := sqrt(2*Н_т) = 1028.54
# Средняя скорость за ступенями:
C_2ср := 230  # м/с
# Коэффициент использования скорости:
μ := 1
# Число ступеней:
z := (С_0^2/(μ*C_2ср)^2 - 1)/(U_ср^2/((μ*C_2ср)^2*y_0^2) - 1) explicit, ALL → ((1.029*10^3)^2/230^2 - 1)/(413.263^2/(230^2*0.55^2) - 1) = 1.96409
z := 2
# Выбираем число ступеней турбины - 2
# Коэффициент возврата теплоты;
α := (z - 1)/(2*z)*(π_т^((k_г - 1)/k_г) - 1)*(1 - η_л)
C_21 := 169.204
α = 0.00961276
# Теплоперепад на первой  ступени:
H_01 := Н_т*(1 + α)*2*0.5/2 + ((μ*C_21)^2)/2 = 281330  # Дж/кг
# Распределение степеней пеактивности по ступеням:
ρ_1 := 0.35
# Располагаемый теплоперепад в СА первой ступени
H_с1 := H_01*(1 - ρ_1) = 182864  # Дж/кг
# Угол потока за СА 1-й ступени:
α_11 := 14.5 deg
α_11 = 0.253073
# Скорость за СА 1-ой ступени:
φ_1 := 0.967
c_11 := φ_1*sqrt(2*H_с1) = 584.798
c_1а := c_11*sin(α_11) = 146.422
# Температура за CA 1-ой ступени:
T_c1 := T*_г - H_с1*φ_1^2/c_pг = 1386.26
T_c1 = 1386.26  # К
# Давление за СА 1-ой ступенью:
p_c1 := p*_г*(1 - H_с1/(c_pг*T*_г))^(k_г/(k_г - 1)) = 1246232  # Па
# Удельный объём газа за турбиной:
ν_c1 := R_пр.сг.*T_c1/p_c1 = 0.322586  # м^3/кг
# Длина на выходе сопловой лопатки 1-ой ступени:
l_c1 := G_г.вд*ν_c1/(sin(α_11)*D_т*π*c_11) = 0.0372513  # м
l_c1 := 0.039
# Длины рабочих и сопловых лопаток по ступеням:
D_т = 0.287009
l_л1 := 0.04  # м
l_c1 = 0.039  # м
l_л2 := l_л = 0.0574017  # м
l_c2 := 0.0493  # м
# Ширина рабочей лопатки по ступеням:
b_л1 := l_л1/1.6 = 0.025  # м
b_л2 := l_л2/1.8 = 0.0318898  # м
# Ширина сопловой лопатки:
b_с1 := 1.2*b_л1 = 0.03  # м
b_с1 := 0.028
b_с2 := 1.2*b_л2 = 0.0382678  # м
# Осевой зазор за сопловыми  лопатками по ступеням:
δ_ас1 := 0.25*b_с1 = 0.007  # м
δ_ас2 := 0.2*b_с2 = 0.00765356  # м
# Осевой зазор за рабочими  лопатками по ступеням:
δ_ал1 := 0.25*b_л1 = 0.00625  # м
δ_ал2 := 0.2*b_л2 = 0.00637797  # м
# Поступенчатый расчет турбины
# Первая ступень турбины:
# Располагаемый теплоперепад первой ступени:
H_01 = 281330
# Степень реактивности:
ρ_1 = 0.35
# Располагаемый теплоперепад в СА:
H_11 := H_01*(1 - ρ_1) = 182864
# Коэффициент скорости:
φ_1 = 0.967
# Скорость за СА 1-ой ступени:
c_11 = 584.798  # м/c
# Приведённая скорость:
λ_СА1 := c_11/sqrt(2*k_г/(k_г + 1)*R_пр.сг.*T*_г) = 0.827362
# Окружная составляющая скорости за СА первой ступени:
c_11u := c_11*cos(α_11) = 566.171
# Температура за СА:
T_11 := T*_г - H_11*φ_1^2/c_pг = 1386.26
# Температура в конце адиабатного расширения в СА:
T'_11 := T*_г - H_11/c_pг = 1376.77
# Давление перед рабочими лопатками:
p_11 := p*_г*(T'_11/T*_г)^(k_г/(k_г - 1)) = 1246232
# Кольцевая площадь сечения перед рабочими лопатками:
А_11 := π*D_1*l_c1 = 0.0351649
# Удельный объем перед рабочими лопатками:
ν_11 := R_пр.сг.*T_11/p_11 = 0.322586
# Осевая скорость перед рабочими лопатками:
с_11а := c_1а = 146.422
# Угол потока за СА проверка:
# Относительная скорость при входе в рабочие лопатки:
w_11 := sqrt(c_11^2 + U_т^2 - 2*c_11*U_т*cos(α_11)) = 211.708
# Угол входа потока на рабочие лопатки:
β_11 := atan(с_11а/(c_11*cos(α_11) - U_т))/deg = 43.7586
U_т = 413.263
# Располагаемый теплоперепад в РК:
Н_12 := ρ_1*H_01*T_11/T'_11 = 99144.3
T_11/T'_11 = 1.00689
# Окружная скорость при входе на рабочие лопатки:
u_1 := U_т = 413.263
# Диаметр на входе из рабочих лопаток
D_2 := D_1 - 0.004 = 0.283009
# Окружная скорость на выходе из рабочих лопаток:
u_2 := π*D_2*n_т/60 = 407.503
# Коэффициент скорости в рабочих лопатках:
ψ_1 := 0.955
# Относиельная скорость за рабочими лопатками:
w_12 := ψ_1*sqrt(w_11^2 + 2*Н_12 + u_2^2 - u_1^2) = 466.272
# Температура за рабочими лопатками:
T_12 := T_11 - (w_12^2 - w_11^2 - u_2^2 + u_1^2)/(2*c_pг) = 1315.37
# Температура к конце адиабатного расширения в рабочих лопатках:
T'_12 := T_11 - Н_12/c_pг = 1306.98
# Давление за рабочими лопатками:
p_12 := p_11*(T'_12/T_11)^(k_г/(k_г - 1)) = 966740
# Удельный объем за рабочими лопатками:
ν_12 := R_пр.сг.*T_12/p_12 = 0.394581
# Площадь кольцевого сечения за рабочими лопатками:
А_12 := π*D_2*l_л1 = 0.0355639
# Осевая скорость за рабочими лопатками:
с_12а := G_г.вд*ν_12/А_12 = 169.151
# Угол выхода потока из рабочих лопаток:
β_12 := asin(с_12а/w_12)/deg = 21.2705
# Скорость закрутки потока за рабочими лопатками:
с_12u := w_12*cos(β_12*deg) - u_2 = 27.0059
# Угол выхода потока из рабочих лопаток:
α_12 := atan(с_12а/с_12u)/deg = 80.929
# Скорость газа за рабочими лопатками:
с_12 := sqrt(с_12а^2 + с_12u^2) = 171.293
# Работа на окружности РК:
L_1u := u_1*с_12u + c_11u*u_2 = 241877
с_11а = 146.422
с_12а = 169.151
c_11u = 566.171
с_12u = 27.0059
c_11 = 584.798
с_12 = 171.293
α_11 = 14.5 deg
α_12 = 80.929
β_11 = 43.7586
β_12 = 21.2705
# КПД на окружности РК:
η_1u := L_1u/H_01 = 0.859763
# Удельные параметры а СА:
h_1c := (φ_1^-2 - 1)*c_11^2/2 = 11869.9
# То же, с учетом их использования в РК:
h'_1c := h_1c*T'_12/T_11 = 11191.1
# Относительные потери в СА:
ξ_1с := h_1c/H_01 = 0.0421922
# То же, с учетом их использования в рабочих лопатках:
ξ'_1c := ξ_1с*T'_12/T_11 = 0.0397792
# Удельные потери в рабочих лопатках:
h_1л := (ψ_1^-2 - 1)*w_12^2/2 = 10485.8
# Относительные потери в рабочих лопатках:
ξ_1л := h_1л/H_01 = 0.0372723
# Удельные потери с выходной скоростью:
h_1в := с_12^2/2 = 14670.6
# Относительные потери с выходной скоростью:
ξ_1в := h_1в/H_01 = 0.0521474
# КПД на окружности РК:
η_1u := 1 - ξ'_1c - ξ_1л - ξ_1в = 0.870801
# Радиальный зазор между корпусом и сопловыми лопатками:
δ_1с := 0.5*10^-3 = 0.0005
# Радиальный зазор между корпусом и рабочими лопатками:
δ_1л := 0.5*10^-3 = 0.0005
# Удельные потери в радиальном зазоре:
h_1з := 1.37*(1 + 1.6*ρ_1)*(1 + l_л1/D_т)*δ_1л/l_л1*L_1u = 7362.31
# Относительные потери в радиальном зазоре:
ξ_1з := h_1з/H_01 = 0.0261697
# Удельная работа ступени с учетом потери в радиальном зазоре:
L_uз := L_1u - h_1з = 234515
# Мощностной КПД ступени:
η'_1т := η_1u - ξ_1з = 0.844632
# Лопаточный КПД ступени:
η'_1л := η'_1т + ξ_1в = 0.896779
# Площадь открытой части соплового аппарата
ε := 1
# Средняя плотность газа  с обеих сторон диска
ρ_1cp := (ν_11^-1 + ν_12^-1)/2 = 2.81714
# Затраты мощности на трение и вентиляцию:
N_1т.в := (1.07*D_т^2 + 61*(1 - ε)*D_т*l_л1)*(u_1/100)^3*ρ_1cp = 17.5251
# Удельные потери на трение и вентиляцию:
h_1т.в := N_1т.в*1000/G_г.вд = 1149.51
# Относительные потери на трение и вентиляцию:
ξ_1т.в := h_1т.в/H_01 = 0.004086
# Мощностной КПД ступени с учетом потери на трение и вентиляцию:
η_1т := η'_1т - ξ_1т.в = 0.840546
# Лопаточный КПД ступени с учетом потери на трение и вентиляцию:
η_1л := η'_1л - ξ_1т.в = 0.892693
# Удельная работа ступени:
L_1т := H_01*η_1т = 236471
# Температура за первой ступенью:
T'_ст1 := T_12 + h_1з/c_pг + h_1т.в/c_pг = 1322.17
# Температура торможения за первой ступенью:
T*_ст1 := T'_ст1 + h_1в/c_pг = 1333.91
# Давление торможения за первой ступенью:
p*_ст1 := p_12*(T*_ст1/T'_ст1)^(k_г/(k_г - 1)) = 1004276
# Располагаемый теплоперепад по параметрам торможения:
H*_01 := c_pг*T*_г*(1 - (p*_ст1/p*_г)^((k_г - 1)/k_г)) = 266927
# КПД ступени по параметрам торможения:
η*_1т := L_1т/H*_01 = 0.885899
# Уточнение коэффициентов скорости φ и ψ.
# Коэффициент скорости в сопловом аппарате первой ступени:
# a) Потери на трения
# Вход в турбину - осевой
α_0 := 90*deg
x := (α_11 + α_0)/deg explicit, ALL → (14.5*deg + 90*deg)/deg = 104.5
x_с :=
    x
    110 if x > 110
    = 104.5
y := sin(α_0)/sin(α_11) = 3.99393
y_с :=
    y
    1.7 if y > 1.7
    = 1.7
ζ_с.тр.1 := 0.02185*(0.01065*x_с^2 - 2.295*x_с + 160.5)*(0.1055*y_с^2 - 0.3427*y_с + 0.295) = 0.0139801
# б) Кромочные потери | 2
# Угол установки профиля в СА
γ_11 := (70 - 0.127*(α_0 - α_11)/deg - 0.0041*((α_0 - α_11)/deg)^2) = 37.0405
# Хорда лопатки:
b_с11 := b_с1/sin(γ_11*deg) = 0.0464824  # м
b_с1 = 0.028
# Оптимальный относительный шаг
K := 0.45
c'_max1 := 0.179
C_maxc1 := c'_max1*b_с11 = 0.00832034
t/b_2.опт := K*(180/(180 - (α_0 + α_11)/deg)*sin(α_0)/sin(α_11))^(1/3)*(1 - c'_max1) = 0.783065
(t/b)_с.опт1 := 0.763
# Найдем шаг решетки
8.4/46.9 = 0.179104
t_c1 := (t/b)_с.опт1*b_с11 = 0.035466  # м
# Диаметр кромки соплового аппарата
s_с1 := 2*10^-3  # м
# Относительные кромочные потери в сопловом аппарате
ζ_с.кр1 := 0.2*s_с1/(t_c1*sin(α_11)) = 0.0450451
# Профильные потери в сопловом аппарате
ζ_с.пр1 := ζ_с.тр.1 + ζ_с.кр1 = 0.0590252
# в) Концевые потери
ζ_с.к1 := 2*ζ_с.тр.1*t_c1*sin(α_11)/l_c1 = 0.0063663
# г) Суммарные потери в сопловом аппарате первой ступени
ζ_с1 := ζ_с.пр1 + ζ_с.к1 = 0.0653915
# Коэффициент скорости
φ_1У := sqrt(1 - ζ_с1) = 0.966752
# 2. Коэффициент скорости в рабочем колесе первой ступени
# а) Потери на трение
x := β_12 + β_11 = 65.0291
x :=
    x
    110 if x > 110
    = 65.0291
y := sin(β_11*deg)/sin(β_12*deg) = 1.90649
y :=
    y
    1.7 if y > 1.7
    = 1.7
ζ_тр.1 := 0.02185*(0.01065*x^2 - 2.295*x + 160.5)*(0.1055*y^2 - 0.3427*y + 0.295) = 0.0212858
# Угол установки профиля в РК:
γ_1рк := (70 - 0.127*(β_11 - β_12) - 0.0041*(β_11 - β_12)^2) = 65.0706
# Хорда лопатки:
b_л11 := b_л1/sin(γ_1рк*deg) = 0.0275686  # м
b_л1 = 0.025  # м
# Оптимальный относительный шаг
K := 0.6
c'_max2 := 0.2 = 0.2
t/b_1.опт := K*(180/(180 - (β_11 + β_12))*sin(β_11*deg)/sin(β_12*deg))^(1/3)*(1 - c'_max2) = 0.691111
(t/b)_опт1 := 0.7
# Найдем шаг решетки
t_1 := (t/b)_опт1*b_л11
t_1 = 0.019298  # м
# Диаметр кромки рабочего колеса
s_1 := 2*10^-3  # м
# Относительные кромочные потери в рабочем колесе
ζ_кр1 := 0.2*s_1/(t_1*sin(β_12*deg)) = 0.0571364
# Профильные потери в рабочем колесе
ζ_пр1 := ζ_тр.1 + ζ_кр1 = 0.0784223
# в) Концевые потери
ζ_к1 := 2*ζ_тр.1*t_1*sin(β_12*deg)/l_л1 = 0.00745088
# г) Суммарные потери в рабочем колесе первой ступени
ζ_1 := ζ_пр1 + ζ_к1 = 0.0858732
# Коэффициент скорости
ψ_1У := sqrt(1 - ζ_1) = 0.9561
# Температура за первой ступенью с учётом охлаждения в первом приближении:
T*_ст1 = 1333.91
T*_ст1 := (c_pgm(T*_ст1, α_Σ)*T*_ст1*g_т + c_pma(T*_к + 200)*(T*_к + 200)*(g_охл - 0.02)*0.6)/(c_pgm(T*_ст1, α_Σ)*g_т + c_pma(T*_к + 200)*(g_охл - 0.02)*0.6) = 1309.3
# Расход за первой ступенью:
G_г.вд2 := G_1*(1 + g_m)*(1 - g_ут - 0.4*(g_охл - 0.02) - 0.02) = 16.3076
# Относительный расход через вторую ступень:
g_т2 := (1 + g_m)*(1 - g_ут - 0.4*(g_охл - 0.02) - 0.02) = 0.951719
# Расчет второй ступени ТВД:
# Температура торможения перед второй ступенью:
T*_ст1 = 1309.3
# Давления торможения перед второй ступенью:
p*_ст1 = 1004276
# Располагаемый теплоперепад второй ступени: ступени:
H_02 := c_pг*T*_ст1*(1 - (p_т/p*_ст1)^((k_г - 1)/k_г)) = 261969
# Удельная работа второй ступени:
η_т2 := 0.815
L_т2 := H_02*η_т2 explicit, ALL → 2.62*10^5*0.815 = 213504
# Степень реактивности:
ρ_2 := 0.326
# Располагаемый теплоперепад в СА:
H_21 := H_02*(1 - ρ_2) = 176567
# Коэффициент скорости:
φ_2 := 0.972
# Скорость за СА 2-ой ступени:
c_21 := φ_2*sqrt(2*H_21) = 577.612  # м/c
# Угол потока за СА второй ступени:
α_21 := 20.3
# Окружная составляющая скорости за СА второй ступени:
c_21u := c_21*cos(α_21*deg) = 541.735
# Температура за СА:
T_21 := T*_ст1 - H_21*φ_2^2/c_pг = 1175.91
# Температура в конце адиабатного расширения в СА:
T'_21 := T*_ст1 - H_21/c_pг = 1168.11
# Давление перед рабочими лопатками:
p_21 := p*_ст1*(T'_21/T*_ст1)^(k_г/(k_г - 1)) = 613983
# Кольцевая площадь сечения перед рабочими лопатками:
А_21 := π*D_1*l_c2 explicit, ALL → π*0.287*0.049 = 0.044452
# Удельный объем перед рабочими лопатками:
ν_21 := R_пр.сг.*T_21/p_21 = 0.555412
# Осевая скорость перед рабочими лопатками:
с_21а := G_г.вд2*ν_21/А_21 = 203.758
# Угол потока за СА проверка:
α_21 := asin(с_21а/c_21)/deg = 20.6562
# Относительная скорость при входе в рабочие лопатки:
w_21 := sqrt(c_21^2 + U_т^2 - 2*c_21*U_т*cos(α_21*deg)) = 240.211
# Угол входа потока на рабочие лопатки:
β_21 := atan(с_21а/(c_21*cos(α_21*deg) - U_т))/deg = 58.0213
# Располагаемый теплоперепад в РК:
Н_22 := ρ_2*H_02*T_21/T'_21 = 85971.7
# Окружная скорость при входе на рабочие лопатки:
u_22 := U_т = 413.263
# Коэффициент скорости в рабочих лопатках:
ψ_2 := 0.971
# Относительная скорость за рабочими лопатками:
w_22 := ψ_2*sqrt(w_21^2 + 2*Н_22) = 465.315
# Температура за рабочими лопатками:
T_22 := T_21 - (w_22^2 - w_21^2)/(2*c_pг) = 1112.41
# Температура к конце адиабатного расширения в рабочих лопатках:
T'_22 := T_21 - Н_22/c_pг = 1107.16
# Давление за рабочими лопатками:
p_22 := p_21*(T'_22/T_21)^(k_г/(k_г - 1)) = 473519
# Удельный объем за рабочими лопатками:
ν_22 := R_пр.сг.*T_22/p_22 = 0.68128
# Площадь кольцевого сечения за рабочими лопатками:
А_22 := π*D_т*l_л2 = 0.0517571
# Осевая скорость за рабочими лопатками:
с_22а := G_г.вд2*ν_22/А_22 = 214.658
# Угол выхода потока из рабочих лопаток:
β_22 := asin(с_22а/w_22)/deg = 27.4721
# Скорость закрутки потока за рабочими лопатками:
с_22u := w_22*cos(β_22*deg) - u_2 = 5.34131
# Угол выхода потока из рабочих лопаток:
α_22 := atan(с_22а/с_22u)/deg = 88.5746
# Скорость газа за рабочими лопатками:
с_22 := sqrt(с_22а^2 + с_22u^2) = 214.724
# Работа на окружности РК:
L_2u := u_22*(с_22u + c_21u) = 226086
с_21а = 203.758
с_22а = 214.658
c_21u = 541.735
с_22u = 5.34131
c_21 = 577.612
с_22 = 214.724
α_21 = 20.6562
α_22 = 88.5746
β_21 = 58.0213
β_22 = 27.4721
# КПД на окружности РК:
η_2u := L_2u/H_02 = 0.863029
# Удельные параметры а СА:
h_2c := (φ_2^-2 - 1)*c_21^2/2 = 9749.31
# То же, с учетом их использования в РК:
h'_2c := h_2c*T'_22/T_21 = 9179.34
# Относительные потери в СА:
ξ_2с := h_2c/H_02 = 0.0372156
# То же, с учетом их использования в рабочих лопатках:
ξ'_2c := ξ_2с*T'_22/T_21 = 0.0350398
# Удельные потери в рабочих лопатках:
h_2л := (ψ_2^-2 - 1)*w_22^2/2 = 6563.13
# Относительные потери в рабочих лопатках:
ξ_2л := h_2л/H_02 = 0.0250531
# Удельные потери с выходной скоростью:
h_2в := с_22^2/2 = 23053.2
# Относительные потери с выходной скоростью:
ξ_2в := h_2в/H_02 = 0.088
# КПД на окружности РК:
η_2u := 1 - ξ'_2c - ξ_2л - ξ_2в = 0.851907
# Радиальный зазор между корпусом и сопловыми лопатками:
δ_2с := 0.5*10^-3 = 0.0005
# Радиальный зазор между корпусом и рабочими лопатками:
δ_2л := 0.5*10^-3 = 0.0005
# Удельные потери в радиальном зазоре:
h_2з := 1.37*(1 + 1.6*ρ_2)*(1 + l_л2/D_т)*δ_2л/l_л2*L_2u = 4926.31
# Относительные потери в радиальном зазоре:
ξ_2з := h_2з/H_02 = 0.018805
# Удельная работа ступени с учетом потери в радиальном зазоре:
L_2uз := L_2u - h_2з = 221160
# Мощностной КПД ступени:
η'_2т := η_2u - ξ_2з = 0.833102
# Лопаточный КПД ступени:
η'_2л := η'_2т + ξ_2в = 0.921102
# Площадь открытой части соплового аппарата
ε := 1
# Средняя плотность газа  с обеих сторон диска
ρ_2cp := (ν_21^-1 + ν_22^-1)/2 = 1.63415
# Затраты мощности на трение и вентиляцию:
N_2т.в := (1.07*D_т^2 + 61*(1 - ε)*D_т*l_л2)*(u_2/100)^3*ρ_2cp = 9.74669
# Удельные потери на трение и вентиляцию:
h_2т.в := N_2т.в*1000/G_г.вд2 = 597.677
# Относительные потери на трение и вентиляцию:
ξ_2т.в := h_2т.в/H_02 = 0.00228148
# Мощностной КПД ступени с учетом потери на трение и вентиляцию:
η_2т := η'_2т - ξ_2т.в = 0.830821
# Лопаточный КПД ступени с учетом потериь на трение и вентиляцию:
η_2л := η'_2л - ξ_2т.в = 0.918821
# Удельная работа ступени:
L_2т := H_02*η_2т = 217649
# Температура за второй ступенью:
T'_ст2 := T_22 + h_2з/c_pг + h_2т.в/c_pг = 1116.83
# Температура торможения за второй ступенью:
T*_ст2 := T'_ст2 + h_2в/c_pг = 1135.26
# Давление торможения за второй ступенью:
p*_ст2 := p_22*(T*_ст2/T'_ст2)^(k_г/(k_г - 1)) = 508156
# Располагаемый теплоперепад по параметрам торможения:
H_02 = 261969
H*_02 := c_pг*T*_ст1*(1 - (p*_ст2/p*_ст1)^((k_г - 1)/k_г)) = 239266
# КПД ступени по параметрам торможения:
η*_2т := L_2т/H*_02 = 0.909651
# Уточнение коэффициентов скорости φ и ψ.
# Коэффициент скорости в сопловом аппарате первой ступени:
# a) Потери на трения
# Вход в турбину - осевой
α_12 = 80.929
x := α_21 + α_12
x_с :=
    x
    110 if x > 110
    = 101.585
y := sin(α_12*deg)/sin(α_21*deg) = 2.79934
y_с :=
    y
    1.7 if y > 1.7
    = 1.7
ζ_с.тр.2 := 0.02185*(0.01065*x_с^2 - 2.295*x_с + 160.5)*(0.1055*y_с^2 - 0.3427*y_с + 0.295) = 0.0140905
# б) Кромочные потери
# Угол установки профиля в СА
γ_с2 := (70 - 0.127*(α_12 - α_21) - 0.0041*(α_12 - α_21)^2) = 47.4508
# Хорда лопатки:
b_с2 = 0.0382678
b_с22 := b_с2/sin(γ_с2*deg) = 0.0519451  # м
# Оптимальный относительный шаг
K := 0.45
c'_max2 := 0.2
t/b_2.опт := K*(180/(180 - (α_12 + α_21))*sin(α_12*deg)/sin(α_21*deg))^(1/3)*(1 - c'_max2) = 0.669287
(t/b)_с.опт2 := 0.7
# Найдем шаг решетки
t_c2 := (t/b)_с.опт2*b_с22 = 0.0363616  # м
# Диаметр кромки соплового аппарата
s_с2 := 2*10^-3  # м
# Относительные кромочные потери в сопловом аппарате
ζ_с.кр2 := 0.2*s_с2/(t_c2*sin(α_21*deg)) = 0.0311845
# Профильные потери в сопловом аппарате
ζ_с.пр2 := ζ_с.тр.2 + ζ_с.кр2 = 0.045275
# в) Концевые потери
ζ_с.к2 := 2*ζ_с.тр.2*t_c2*sin(α_21*deg)/l_c2 = 0.00733214
# г) Суммарные потери в сопловом аппарате первой ступени
ζ_с2 := ζ_с.пр2 + ζ_с.к2 = 0.0526072
# Коэффициент скорости
φ_2 := sqrt(1 - ζ_с2) = 0.973341
# 2. Коэффициент скорости в рабочем колесе первой ступени
# а) Потери на трение
x := β_22 + β_21 = 85.4934
x :=
    x
    110 if x > 110
    = 85.4934
y := sin(β_21*deg)/sin(β_22*deg) = 1.83875
y :=
    y
    1.7 if y > 1.7
    = 1.7
ζ_тр.2 := 0.02185*(0.01065*x^2 - 2.295*x + 160.5)*(0.1055*y^2 - 0.3427*y + 0.295) = 0.0159318
# б) Кромочные потери
# Угол установки профиля в РК:
γ_рк2 := (70 - 0.127*(β_21 - β_22) - 0.0041*(β_21 - β_22)^2) = 62.2939
# Хорда лопатки:
b_л22 := b_л2/sin(γ_рк2*deg) = 0.0360197  # м
b_л2 = 0.0318898  # м
# Оптимальный относительный шаг
K := 0.6
c'_max2 := 0.2 = 0.2
t/b_2.опт := K*(180/(180 - (β_21 + β_22))*sin(β_21*deg)/sin(β_22*deg))^(1/3)*(1 - c'_max2) = 0.728929
(t/b)_опт2 := 0.7
# Найдем шаг решетки
t_2 := (t/b)_опт2*b_л22 explicit, ALL → 0.7*0.036 = 0.0252138  # м
# Диаметр кромки рабочего колеса
s_2 := 2*10^-3  # м
# Относительные кромочные потери в рабочем колесе
ζ_кр2 := 0.2*s_2/(t_2*sin(β_22*deg)) = 0.0343892
# Профильные потери в рабочем колесе
ζ_пр2 := ζ_тр.2 + ζ_кр2 = 0.050321
# в) Концевые потери
ζ_к2 := 2*ζ_тр.2*t_2*sin(β_22*deg)/l_л2 = 0.00645664
# г) Суммарные потери в рабочем колесе первой ступени
ζ_2 := ζ_пр2 + ζ_к2 = 0.0567776
# Коэффициент скорости
ψ_2 := sqrt(1 - ζ_2) = 0.971196
# Расчет параметров турбины:
# Суммарная работа турбины
L_тΣ := L_1т + L_2т explicit, ALL → 2.365*10^5 + 2.176*10^5 = 454119  # Дж/кг
# Располагаемый теплоперепад
Н_т = 528945  # Дж/кг
L_твд = 449601
# Мощностной КПД турбины
η_т := L_тΣ/Н_т = 0.858538
# Лопаточный КПД турбины
η_л := (L_тΣ + h_2в)/Н_т = 0.902121
# Профилирование лопаток по радиусу
# Закон профилирования:
α_1 == const
# Угол выхода из СА 1 ступени:
α_11 = 14.5 deg
# Средний радиус СА и РК:
r_ср := D_т/2 = 0.143504  # м
D_т = 0.287009
# Корневой радиус | Периферийный радиус СА:
r_к := D_т/2 - l_c1/2 = 0.124004  # м
r_п := D_т/2 + (l_c1 - 0.002)/2 = 0.162004  # м
# Окружная скорость на выходе из СА на среднем радиусе:
c_11u = 566.171  # м/c
м/c
cos(60 deg) = 0.5
# Абсолютная скорость на выходе из СА на среднем радиусе:
c_11 = 584.798
α_11 = 0.253073
# Распределение давления по радиусу
P_ст(r) := p_11*(1 + (k_г - 1)/2*k_г*R_пр.сг.*T'_11*(1 - (r_ср/r)^(2*cos(α_11)^2)))^(-k_г/(k_г - 1))
P_ст(r_ср) = 1246232  # Па
p_11 = 1246232
# Степень понижения давления в РК
π_рк(r) := P_ст(r)/p_21
# Осевая скорость за СА: | Окружная скорость за СА: | Полная скорость за СА:
c_1a(r) := с_11а*(r_ср/r)^(cos(α_11)^2)
c_1u(r) := c_11u*(r_ср/r)^(cos(α_11)^2)
c_1(r) := c_11*(r_ср/r)^(cos(α_11)^2)
c_1a(r_к) = 167.903  # м/c
c_1u(r_к) = 649.231  # м/c
c_1(r_к) = 670.591  # м/c
c_1a(r_ср) = 146.422  # м/c
c_1u(r_ср) = 566.171
c_1(r_ср) = 584.798  # м/c
c_1a(r_п) = 130.691  # м/c
c_1u(r_п) = 505.344  # м/c
c_1(r_п) = 521.97  # м/c
# Адиабатическая скорость за СА:
c_1ад(r) := c_1(r)/φ_1
c_1ад(r_к) = 693.476
c_1ад(r_ср) = 604.755
c_1ад(r_п) = 539.783
c_11 = 584.798
# Перепад на СА:
H_с11(r) := c_1ад(r)^2/2
H_с11(r_к) = 240454
H_с11(r_ср) = 182864
H_11 = 182864
T_11/T'_11 = 1.00689
H_с11(r_п) = 145683
# Перепад на РК:
2.954*10^5
H_01 = 281330
H_рк(r) := (H_01 - H_с11(r))*T_11/T'_11
(2.954*10^5 - 2.069*10^5)*1.008 = 89208
H_рк(r_к) = 41157.2
Н_12 = 99144.3
H_рк(r_ср) = 99144.3
H_рк(r_п) = 136582
# Степень реактивности
ρ_r(r) := 1 - (1 - ρ_1)*(r_ср/r)^(2*cos(α_11)^2)
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ρ_r(r_к) = 0.145293
ρ_r1(r) := H_рк(r)/H_01
ρ_r(r_ср) = 0.35
ρ_r(r_п) = 0.482163
ρ_r1(r_к) = 0.146295
# Окружная скорость:
ρ_r1(r_ср) = 0.352413
u(r) := U_т*r/r_ср
ρ_r1(r_п) = 0.485487
u(r_к) = 357.107  # м/c
u(r_ср) = 413.263  # м/c
u(r_п) = 466.539  # м/c
# Угол выхода потока из СА в относительном движении
β_1(r) := atan(c_1a(r)/(c_1(r)*cos(α_11) - u(r)))
β_1(r_к) = 29.8887 deg
β_1(r_ср) = 43.7586 deg
β_1(r_п) = 73.4625 deg
# Окружная скорость на выходе из РК
c_2u(r) := L_1u/u(r) - c_1u(r)
c_2u(r_к) = 28.0927  # м/c
c_2u(r_ср) = 19.1152  # м/c
c_2u(r_п) = 13.1055  # м/c
# Относительная скорость за СА:
w_1(r) := sqrt(c_1(r)^2 + u(r)^2 - 2*c_1(r)*u(r)*cos(α_11))
w_1(r_к) = 336.939  # м/с
w_1(r_ср) = 211.708  # м/с
w_1(r_п) = 136.33  # м/с
# Относительная скорость за РК:
w_2(r) := ψ_1*sqrt(w_1(r)^2 + 2*H_рк(r))
w_2(r_к) = 422.627  # м/с
w_2(r_ср) = 470.873  # м/с
w_2(r_п) = 515.833  # м/с
# Окружная составляющая относительной скорости за РК:
w_2u(r) := c_2u(r) + u(r)
w_2u(r_к) = 385.199  # м/с
w_2u(r_ср) = 432.378  # м/с
w_2u(r_п) = 479.644  # м/с
# Осевая составляющая относительной скорости за РК:
w_2a(r) := sqrt(w_2(r)^2 - w_2u(r)^2)
w_2a(r_к) = 173.881  # м/с
w_2a(r_ср) = 186.469  # м/с
w_2a(r_п) = 189.802  # м/с
# Осевая составляющая абсолютной скорости за РК:
c_2a(r) := w_2a(r)
# Полная абсолютная скорость за РК:
c_2(r) := sqrt(c_2a(r)^2 + c_2u(r)^2)
c_2(r_к) = 176.136  # м/с
c_2(r_ср) = 187.446  # м/с
c_2(r_п) = 190.254  # м/с
# Угол выхода потока из РК в относительном движении:
β_2(r) := atan(w_2a(r)/w_2u(r))
β_2(r_к) = 24.2947 deg
β_2(r_ср) = 23.3288 deg
β_2(r_п) = 21.5894 deg
# Угол выхода потока из РК в абсолютном движении:
α_2(r) := atan(c_2a(r)/c_2u(r))
α_2(r_к) = 80.8224 deg
α_2(r_ср) = 84.147 deg
α_2(r_п) = 86.0501 deg
# Число лопаток в СА:
z_с := π*D_т/t_c1 = 25.4233
z_с := 25
# Число лопаток в РК:
z_рк := π*D_т/t_1 = 46.7231
z_рк := 47
# Пересчитаю шаг решетки СА и РК:
t_ск := π*2*r_к/z_с = 0.0311657  # м
t_с := π*2*r_ср/z_с = 0.0360666  # м
t_сп := π*2*r_п/z_с = 0.0407161  # м
t_ркк := π*2*r_к/z_рк = 0.0165775  # м
t_рк := π*2*r_ср/z_рк = 0.0191843  # м
t_ркп := π*2*r_п/z_рк = 0.0216575  # м
# Средний диаметр
# Ширина лопаток:, м: | Горло
b_с1 = 0.028
a_рк.ср := t_рк*sin(β_2(r_ср)) = 0.00759713
b_л1 = 0.025
# Хорда, м:
a_c.ср := t_с*sin(α_11) = 0.00903035
b_с11 = 0.0464824  # CA
b_л11 = 0.0275686
r_1CA := 0.0355*b_с1 = 0.000994
# Газовые углы:
d_1CA := 2*r_1CA = 0.001988
α_0 := 90 deg
RK
α_11 = 0.253073
r_1RK := 0.03*b_л1 = 0.00075
β_1(r_ср) = 43.7586 deg
d_1CA := 2*r_1RK = 0.0015
β_2(r_ср) = 23.3288 deg
# Шаг, м:
C_maxc1 := c'_max1*46.9 = 8.3951
t_с = 0.0360666
t_рк = 0.0191843
# Втулочный диаметр.
# Газовые углы: | CA
r_1CA := 0.045*b_с1 = 0.00126
α_0к := 90 deg
α_1к := α_11 = 0.253073
d_1CA := 2*r_1CA = 0.00252
β_1(r_к) = 29.8887 deg
RK
β_2(r_к) = 24.2947 deg
# Ширина лопаток, м:
r_1RK := 0.06*b_л1 = 0.0015
b_a.с.к := b_с1 = 0.028
d_1CA := 2*r_1RK = 0.003
# Шаг профилей, м:
t_с.к := π*r_к*2/z_с = 0.0311657  # Горло
t_рк.к := π*r_к*2/z_рк = 0.0165775
a_рк.к := t_рк.к*sin(β_2(r_к)) = 0.00682047
a_c.к := t_с.к*sin(α_11) = 0.00780326
C_maxc1 := c'_max1*44.3 = 7.9297
# Периферийный диаметр.
# Газовые углы: | Шаг профилей, м:
α_0п := 90 deg
t_с.п := π*r_п*2/z_с = 0.0407161
α_1п := α_11 = 0.253073
β_1(r_п) = 73.4625 deg
t_рк.п := π*r_п*2/z_рк = 0.0216575
β_2(r_п) = 21.5894 deg
# Горло
a_рк.п := t_рк.п*sin(β_2(r_п)) = 0.00796893
a_c.п := t_с.п*sin(α_11) = 0.0101945
# Толщина профиля:
C_maxc1 := c'_max1*49.5 = 8.8605
u(r_к) = 357.107
c_1(r_к) = 670.591  # м/c
w_1(r_к) = 336.939
c_1a(r_к) = 167.903  # м/c
c_1u(r_к) = 649.231  # м/c
β_1(r_к) = 29.8887 deg
w_1(r_ср) = 211.708
β_1(r_ср) = 43.7586 deg
u(r_ср) = 413.263
c_1(r_ср) = 584.798  # м/c
α_11 = 14.5 deg
c_1a(r_ср) = 146.422  # м/c
c_1u(r_ср) = 566.171
β_1(r_п) = 73.4625 deg
w_1(r_п) = 136.33
c_1(r_п) = 521.97  # м/c
c_1a(r_п) = 130.691  # м/c
c_1u(r_п) = 505.344  # м/c
u(r_п) = 466.539
c_2u(r_к) = 28.0927  # м/c
c_2(r_к) = 176.136  # м/с
w_2(r_к) = 422.627  # м/с
w_2a(r_к) = 173.881  # м/с
β_2(r_к) = 24.2947 deg
α_2(r_к) = 80.8224 deg
w_2u(r_к) = 385.199  # м/с
β_2(r_ср) = 23.3288 deg
α_2(r_ср) = 84.147 deg
c_2u(r_ср) = 19.1152  # м/c
c_2(r_ср) = 187.446  # м/с
w_2(r_ср) = 470.873  # м/с
w_2a(r_ср) = 186.469  # м/с
w_2u(r_ср) = 432.378  # м/с
β_2(r_п) = 21.5894 deg
α_2(r_п) = 86.0501 deg
w_2(r_п) = 515.833  # м/с
c_2u(r_п) = 13.1055  # м/c
c_2(r_п) = 190.254  # м/с
w_2a(r_п) = 189.802  # м/с
w_2u(r_п) = 479.644  # м/с
