# Определим максимальную частоту вращения ротора турбины. Выберем рабочую частоту вращения ротора турбины, основные размеры  (D_т, F_т, l_т/D_т) и форму меридионального сечения проточной части
# Из расчёта цикла ГТД имеем
T*_0 := 1773  # K
T*_т := 1399  # К
P*_0 := 2561.1*10^3  # Па
P*_т := 826*10^3  # Па
L_т := 473*10^5  # Дж/кг  # Работа турбины
G := 30.5  # кг/с  # Расход газа через турбину
# α := 2.325  коэффициент избытка воздуха
R := 287.7  # Дж/(кг*К)  # гзовая постоянная продуктов сгорания керосина при α = 2.325
c_р := 1.2521*10^3  # Дж/(кг*К)  # Истинная теплоёмкость продуктов сгорания при средней температуре процесса расширения
k_г := c_р/(c_р - R) → 1.298  # Коэффициент адиабаты
# Решение:
Зададимся
λ := 0.2576  # Приведёная скорость на выходе из рабочего колеса в первом приближении
π_гдф := (1 - (k_г - 1)/(k_г + 1)*λ^2)^(k_г/(k_г - 1)) = 0.963052
P_т := P*_т*π_гдф = 795481  # Па
T_т := T*_т*(1 - (k_г - 1)/(k_г + 1)*λ^2) = 1386.95  # К
# Степень понижения давления
π_т := P*_0/P_т explicit, ALL → 2.561*10^3*10^3/(7.955*10^5) = 3.21956
# Располагаемый теплоперепад
H_т := (c_р*T*_0*(1 - π_т^((1 - k_г)/k_г))) = 523022  # Дж/кг
# Абсолютная скорость после турбины
c_т := λ*sqrt(2*k_г/(k_г + 1)*R*T*_т) explicit, ALL → 0.258*sqrt(2*1.298/(1.298 + 1)*287.7*1399) = 173.71  # м/с
# Лопаточный КПД
η_л := (L_т + c_т^2/2)/H_т explicit, ALL → (473*10^5 + 173.71^2/2)/(5.23*10^5) = 90.4647
# В первом приближении угол выхода потока из турбины
α_2 := 90 deg
# Удельный объем
# ν_т := R*T_т/P_т explicit, ALL → 287.7*1.387*10^3/(7.955*10^5) = 0.501615 м^3/кг
# Осевая скорость после турбины
c_та := c_т*sin(α_2) = 173.71  # м/с
# 6. Площадь кольцевого сечения
# A_т := G*ν_т/c_та explicit, ALL → 30.5*0.502/173.71 = 0.0880735  м^2
# Максимальная частота вращения
# Напряжение при растяжении в РЛ примем
σ_л1 := 250  # МПа
# Примем
K_n := 6.8*10^-6
n_тmax := sqrt(σ_л1/(K_n*A_т)) explicit, ALL → sqrt(250/(6.8*10^-6*0.088)) = 20431.2  # об/мин
# Относительная длина рабочей лопатки
Примем
chem(l_2/D_т) := 1/11 = 0.0909091
# Средний диаметр
D_т := sqrt(A_т/(π*chem(l_2/D_т))) explicit, ALL → sqrt(0.088/(π*0.091)) = 0.555321  # м
l_2 := D_т*chem(l_2/D_т) = 0.0504837  # м
# Окружная скорость на диаметре D_т
u_т := π*D_т*n_тmax/60 explicit, ALL → π*0.555*2.043*10^4/60 = 594.067  # м/с
# Условная адиабатная скорость
c_0 := sqrt(2*H_т) explicit, ALL → sqrt(2*5.23*10^5) = 1022.76  # м/с
u_т/c_0 = 0.580845
# Степень реактивности
ρ := 0.125  # Задаемся в зависимости от относительной длины лопатки
# Оптимальное отношение u/c_0 по КПД
# Обозначим его через
X_опт := 0.53
# Оптимальная по КПД окружная скорость
u_тη := c_0*X_опт explicit, ALL → 1.023*10^3*0.53 = 542.065  # м/с
# Соответствующий максимальному КПД средний диаметр турбины при выходе из рабочих лопаток
D_тη := 60*u_тη/(π*n_тmax) explicit, ALL → 60*542.065/(π*2.043*10^4) = 0.50671  # м
# Длина рабочей лопатки
l_лη := A_т/(π*D_тη) explicit, ALL → 0.088/(π*0.507) = 0.0553269  # м
l_лη/D_тη = 0.109188
# Напряжение
K_u := K_n*3600/π = 0.00779223
σ_л := K_u*u_тη^2*(l_лη/D_тη) explicit, ALL → 7.792*10^-3*542.065^2*0.055/0.507 = 250  # МПа
# Форма мередионального сечения проточной части будет с потоянным средним диаметром.
## Часть 2
# Выполним расчёт ступени газовой турбины. Определим потери в проточной части и уточним коэффициенты φ и ψ.
# Степень реактивности выбираем исходя из значения относительной длины лопаток
l_лη/D_тη = 0.109188
ρ := (l_лη/D_тη - 1/9)*(0.3 - 0.2)/(1/6 - 1/9) + 0.2 = 0.196539  # Интерполяция по двум точкам
# 1. Располагаемый теплоперепад в СА
H_с := H_т*(1 - ρ) explicit, ALL → 5.23*10^5*(1 - 0.197) = 420228  # Дж/кг
# 2. Скорость за СА
# Зададимся коэффициентами скорости
φ := 0.9778
ψ := 0.9697
C_1 := sqrt(2*H_с)*φ explicit, ALL → sqrt(2*4.202*10^5)*0.978 = 896.412  # м/с
# 3. Средняя условная температура ступени
T_у := T*_0 - H_т*φ^2/(2*c_р) explicit, ALL → 1.773*10^3 - 5.23*10^5*0.978^2/(2*1.252*10^3) = 1573.31  # К
# 4. Температура за СА
T_1 := T*_0 - H_с*φ^2/c_р explicit, ALL → 1.773*10^3 - 4.202*10^5*0.978^2/(1.252*10^3) = 1452.12  # К
# 5. Температура в конце адиабатического расширения в СА
T'_1 := T*_0 - H_с/c_р explicit, ALL → 1.773*10^3 - 4.202*10^5/(1.252*10^3) = 1437.38  # К
# 6. Давление перед рабочими лопатками
P_1 := P*_0*(T'_1/T*_0)^(k_г/(k_г - 1)) explicit, ALL → 2.561*10^3*10^3*(1.437*10^3/(1.773*10^3))^(1.298/(1.298 - 1)) = 1027520  # Па
# 7. Удельный объем перед рабочими лопатками
ν_1 := R*T_1/P_1 explicit, ALL → 287.7*1.452*10^3/(1.028*10^6) = 0.406585  # м^3/кг
# 8. Средняя скорость перед рабочими лопатками
# Задаемся углом потока за СА
α_1 := 14.63 deg
C_1a := C_1*sin(α_1) explicit, ALL → 896.412*sin(14.63*deg) = 226.412  # м/с
C_1u := C_1*cos(α_1) explicit, ALL → 896.412*cos(14.63*deg) = 867.347  # м/с
# 9. Кольцевая площадь сечения перед рабочими лопатками
A_1a := G*ν_1/C_1a explicit, ALL → 30.5*0.407/226.412 = 0.0547711  # м^2
# 10. Относительная скорость при входе на рабочие лопатки
# Форма проточной части Dср=const
l_л1 := A_1a/(π*D_тη) = 0.0344066  # м
b_ал := l_л1/3 = 0.0114689  # м
D_к1 := D_тη + l_л1 explicit, ALL → 0.507 + 0.034 = 0.541117  # м
D_вт1 := D_тη - l_л1 explicit, ALL → 0.507 - 0.034 = 0.472303  # м
D_c1 := D_тη = 0.50671  # м
u_1 := π*D_c1*n_тmax/60 explicit, ALL → π*0.507*2.043*10^4/60 = 542.065  # м/с
w_1 := sqrt(C_1^2 + u_1^2 - 2*C_1*u_1*cos(α_1)) explicit, ALL → sqrt(896^2 + 542^2 - 2*896*542*cos(15*deg)) = 396.322  # м/с
# 11. Угол входа потока на рабочие лопатки
β_1 := atan(C_1a/(C_1u - u_1)) explicit, ALL → atan(226.412/(867.347 - 542.065)) = 34.8397 deg
# 12. Длина сопловой лопатки на выходе
l_с := l_л1 = 0.0344066  # м
b_аc := l_с/1.7 = 0.0202392  # м
δ_a := b_аc*0.23 = 0.00465501  # м
# 13. Распологаемый теплоперепад в РК
H_л := ρ*H_т*T_1/T'_1 explicit, ALL → 0.197*5.23*10^5*1.452*10^3/(1.437*10^3) = 103848  # Дж/кг
# 14. Относительная скорость за рабочими лопатками
# Окружная скорость при выходе из рабочих лопаток
u_2 := u_тη = 542.065  # м/с
w_2 := ψ*sqrt(w_1^2 + 2*H_л + u_2^2 - u_1^2) explicit, ALL → 1*sqrt(396^2 + 2*1*10^5 + 542^2 - 542^2) = 585.66  # м/с
# 15. Температура за рабочими лопатками
T_2 := T_1 - (w_2^2 - w_1^2 - u_2^2 + u_1^2)/(2*c_р) explicit, ALL → 1*10^3 - (586^2 - 396^2 - 542^2 + 542^2)/(2*1*10^3) = 1377.87  # К
# 16. Температура в конце адиабатического расширения в рабочих лопатках
T'_2 := T_1 - H_л/c_р explicit, ALL → 1.452*10^3 - 1.038*10^5/(1.252*10^3) = 1369.18  # К
# 17. Давление за рабочими лопатками
P_2 := P_1*(T'_2/T_1)^(k_г/(k_г - 1)) explicit, ALL → 1.028*10^6*(1.369*10^3/(1.452*10^3))^(1.298/(1.298 - 1)) = 795481  # Па
# 18. Удельный объем за рабочими лопатками
ν_2 := R*T_2/P_2 explicit, ALL → 287.7*1.378*10^3/(7.955*10^5) = 0.498332  # м^3/кг
# 19. Площадь кольцевого сечения за рабочими лопатками
l_л2 := l_лη = 0.0553269  # м
D_л2 := D_тη = 0.50671  # м
A_л2а := π*D_л2*l_л2 explicit, ALL → π*0.507*0.055 = 0.0880735  # м^2
# 20. Осевая скорость за рабочими лопатками
C_2a := G*ν_2/A_л2а explicit, ALL → 30.5*0.498/0.088 = 172.573  # м/с
# 21. Угол выхода потока из рабочих лопаток
β_2 := asin(C_2a/w_2) explicit, ALL → asin(172.573/585.66) = 17.1374 deg
# 22. Скорость закрутки потока за рабочими лопатками
C_2u := w_2*cos(β_2) - u_2 explicit, ALL → 585.66*cos(0.299) - 542.065 = 17.5927  # м/с
# 23. Угол выхода потока из рабочих лопаток | Ранее α_2 = 90 deg
α_2 := atan(C_2a/C_2u) explicit, ALL → atan(172.573/17.593) = 84.1792 deg
# 24. Скорость газа за рабочими лопатками
C_2 := sqrt(C_2a^2 + C_2u^2) explicit, ALL → sqrt(172.573^2 + 17.593^2) = 173.468  # м/с
# 25. Работа на окружности РК
C_1u := C_1*cos(α_1) explicit, ALL → 896.412*cos(14.63*deg) = 867.347  # м/с
L_u := C_1u*u_1 + C_2u*u_2 explicit, ALL → 867.347*542.065 + 17.593*542.065 = 479695  # Дж/кг
# 26. КПД на окружности РК
η_u := L_u/H_т explicit, ALL → 4.7969*10^5/(5.2302*10^5) = 0.917159
# 27. Удельные потери в СА
h_c := (φ^-2 - 1)*C_1^2/2 explicit, ALL → (0.978^-2 - 1)*896.412^2/2 = 18451  # Дж/кг
# 28. Удельные потери в СА с учетом их использования в рабочих лопатках
h‘_c := h_c*T'_2/T_1 explicit, ALL → 1.845*10^4*1.369*10^3/(1.452*10^3) = 17397.2  # Дж/кг
# 29. Относительные потери в СА
ξ_c := h_c/H_т explicit, ALL → 1.845*10^4/(5.23*10^5) = 0.0352777
# 30. Относительные потери в СА с учетом их использования в рабочих лопатках
ξ‘_c := ξ_c*T'_2/T_1 explicit, ALL → 0.035*1.369*10^3/(1.452*10^3) = 0.0332628
# 31. Удельные потери в рабочих лопатках
h_л := (ψ^-2 - 1)*w_2^2/2 explicit, ALL → (0.97^-2 - 1)*585.66^2/2 = 10885  # Дж/кг
# 32. Относительные потери в рабочих лопатках
ξ_л := h_л/H_т explicit, ALL → 1.089*10^4/(5.23*10^5) = 0.0208118
# 33. Удельные потери с выходной скоростью
h_в := C_2^2/2 explicit, ALL → 173.468^2/2 = 15045.5  # Дж/кг
# 34. Относительные потери с выходной скоростью
ξ_в := h_в/H_т explicit, ALL → 1.505*10^4/(5.23*10^5) = 0.0287664
# 35. КПД на окружности РК | Ранее η_u = 0.917159
η_u := 1 - ξ‘_c - ξ_л - ξ_в explicit, ALL → 1 - 0.0333 - 0.0208 - 0.0288 = 0.917159
# 36. Удельные потери в радиальном зазоре
Зададимся
chem(δ_л/l_л2) := 0.0055
δ_л := 0.6*10^-3 = 0.0006  # м
h_з := 1.37*(1 + 1.6*ρ)*(1 + l_л2/D_л2)*L_u*chem(δ_л/l_л2)
h_з explicit, ALL → 1.37*(1 + 1.6*0.197)*(1 + 0.055/0.507)*4.797*10^5*5.5*10^-3 = 5269.89  # Дж/кг
# 37. Относительные потери в радиальном зазоре
ξ_з := h_з/H_т explicit, ALL → 1.37*(1 + 1.6*0.197)*(1 + 0.055/0.507)*4.797*10^5*5.5*10^-3/(5.23*10^5) = 0.0100758
# 38. Удельная работа ступени с учетом потери в радиальном зазоре
L_из := L_u - h_з explicit, ALL → 4.797*10^5 - 1.37*(1 + 1.6*0.197)*(1 + 0.055/0.507)*4.797*10^5*5.5*10^-3 = 474425  # Дж/кг
# 39. Мощностной КПД ступени
η‘_т := η_u - ξ_з explicit, ALL → 0.917 - 0.01 = 0.907083
# 40. Лопаточный КПД ступени
η‘_л := η‘_т + ξ_в explicit, ALL → 0.907 + 0.029 = 0.93585
# 41. Затраты мощности на трение и вентиляцию
# Задаемся
ε := 1
ρ_1 := P_1/(R*T_1) explicit, ALL → 1.028*10^6/(287.7*1.452*10^3) = 2.45951  # кг/м^3
ρ_2 := P_2/(R*T_2) explicit, ALL → 7.955*10^5/(287.7*1.378*10^3) = 2.00669  # кг/м^3
ρ_ср := (ρ_1 + ρ_2)/2 explicit, ALL → (2.46 + 2.007)/2 = 2.2331  # кг/м^3
N_т.в. := 1000*(1.07*D_c1^2 + 61*(1 - ε)*D_c1*l_л2)*(u_2/100)^3*ρ_ср = 97715.7  # Вт
# 42. Удельные потери на трение и вентиляцию
h_т.в. := N_т.в./G explicit, ALL → 9.772*10^4/30.5 = 3203.79  # Дж/кг
# 43. Относительные потери на трение и вентиляцию
ξ_т.в. := h_т.в./H_т explicit, ALL → 3.204*10^3/(5.23*10^5) = 0.00612554
# 44. Мощностной КПД ступени с учетом потери на трение и вентиляцию
η_т := η‘_т - ξ_т.в. explicit, ALL → 0.907 - 6.126*10^-3 = 0.900958
# 45. Лопаточный КПД ступени с учетом потерь на трение и вентиляцию
η_л := η‘_л - ξ_т.в. explicit, ALL → 0.936 - 6.126*10^-3 = 0.929724
# 46. Удельная работа ступени
L_т := H_т*η_т explicit, ALL → 5.23*10^5*0.901 = 471221  # Дж/кг
# 47. Температура за первой ступенью
T‘_ст := T_2 + h_з/c_р + h_т.в./c_р explicit, ALL → 1.378*10^3 + 1.37*(1 + 1.6*0.197)*(1 + 0.055/0.507)*4.797*10^5*5.5*10^-3/(1.252*10^3) + 3.204*10^3/(1.252*10^3) = 1384.64
К
# 48. Температура торможения за первой ступенью
T*_ст := T‘_ст + h_в/c_р explicit, ALL → 1.385*10^3 + 1.505*10^4/(1.252*10^3) = 1396.66  # К
# 49. Давление торможения за первой ступенью
P*_ст := P_2*(T*_ст/T‘_ст)^(k_г/(k_г - 1)) explicit, ALL → 7.955*10^5*(1.397*10^3/(1.385*10^3))^(1.298/(1.298 - 1)) = 825965  # Па
# 50. Располагаемый теплоперепад по параметрам торможения
H*_т := c_р*T*_0*(1 - (P*_ст/P*_0)^((k_г - 1)/k_г))
H*_т explicit, ALL → 1.2521*10^3*1.773*10^3*(1 - (8.259651*10^5/(2.5611*10^3*10^3))^((1.2983202 - 1)/1.2983202)) = 508296  # Дж/кг
# 51. КПД ступени по параметрам торможения
η*_т := L_т/H*_т explicit, ALL → 4.712*10^5/(1.252*10^3*1.773*10^3*(1 - (8.26*10^5/(2.561*10^3*10^3))^((1.298 - 1)/1.298))) = 0.92706
η_т = 90.0958 %
η_u = 91.7159 %
η*_т = 92.706 %
η_л = 92.9724 %
# _______________________________________________________________________________________________________
# 52. Механический КПД
η_м := 0.99
# 53. Мощность турбины
N := L_т*G*η_м explicit, ALL → 4.712*10^5*30.5*0.99 = 14228519  # Вт
# 54. Уточненное значение коэффициентов φ и ψ
# Зададимся
b_ал := l_л1/3 explicit, ALL → 0.034/3 = 0.0114689  # м
# Угол установки профиля
γ_л := (70 - 0.127*(β_1/deg - β_2/deg) - 0.0041*(β_1/deg - β_2/deg)^2)*deg
γ_л explicit, ALL → (70 - 0.127*(0.608/deg - 0.299/deg) - 4.1*10^-3*(0.608/deg - 0.299/deg)^2)*deg = 66.467 deg
# Величина хорды
b_л := b_ал/sin(γ_л) explicit, ALL → 0.011/sin((70 - 0.127*(0.608/deg - 0.299/deg) - 4.1*10^-3*(0.608/deg - 0.299/deg)^2)*deg) = 0.0125093  # м
K := 0.6  # для рабочей решётки
# Относительная максимальная толщина профиля для рабочих лопаток
c_maxотн := 0.2  # для рабочей решётки
t_л := b_л*K*(180/(180 - (β_1/deg + β_2/deg))*sin(β_1)/sin(β_2))^(1/3)*(1 - c_maxотн)
t_л explicit, ALL → 0.0125*0.6*(180/(180 - (0.6081/deg + 0.2991/deg))*sin(0.6081)/sin(0.2991))^(1/3)*(1 - 0.2) = 0.0083877  # м
t_л := 0.75*b_л = 0.00938195  # м  # Увеличим, так как слишком малый шаг в корне
# Определим потери на трение
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K_л := sin(β_1)/sin(β_2) = 1.93876
β_1 + β_2 = 51.9771 deg
ξ_трл := 0.02
# Кромочные потери
# Так как T*_0 = 1773  К, то примем лопатки охлаждаемыми
# Относительная толщина выходной кромки рабочей лопатки для охлаждаемой ступени
s_2лотн := 0.17
ξ_крл := 0.2*s_2лотн explicit, ALL → 0.2*0.17 = 0.034
# Профильные потери
ξ_прл := ξ_крл + ξ_трл explicit, ALL → 0.034 + 0.02 = 0.054
# Концевые потери
ξ_концл := 2*ξ_трл*t_л*sin(β_2)/l_л1 explicit, ALL → 2*0.02*9.382*10^-3*sin(0.299)/0.034 = 0.00321395
# Суммарные потери
ξ_Σл := ξ_концл + ξ_прл explicit, ALL → 3.214*10^-3 + 0.054 = 0.0572139
# Уточненное значение
ранее
ψ = 0.9697
ψ := sqrt(1 - ξ_Σл) = 0.970972
# Зададимся
b_аc := l_с/1.7 explicit, ALL → 0.034/1.7 = 0.0202392  # м
α_0 := 90 deg
# Угол установки профиля
γ_с := (70 deg - 0.127*(α_0 - α_1) - 0.0041*(α_0 - α_1)^2)
γ_с explicit, ALL → 70*deg - 0.127*(90*deg - 14.63*deg) - 4.1*10^-3*(90*deg - 14.63*deg)^2 = 60.0215 deg
γ_с := 49.8 deg  # меняю, так как размер горла не получается при профилировании
# Величина хорды
b_с := b_аc/sin(γ_с) explicit, ALL → 0.0202/sin(49.8*deg) = 0.0264982  # м
K := 0.45
c_maxотн := 0.2  # для сопловых лопаток
# Относительная максимальная толщина профиля для сопловых лопаток
# Шаг сопловых лопаток
t_с := b_с*K*(180 deg/(180 deg - (α_0 + α_1))*sin(α_0)/sin(α_1))^(1/3)*(1 - c_maxотн)
t_с explicit, ALL → 0.026*0.45*(180*deg/(180*deg - (90*deg + 14.63*deg))*sin(90*deg)/sin(14.63*deg))^(1/3)*(1 - 0.2) = 0.0201718  # м
# Определим потери на трение
sin(α_0)/sin(α_1) = 3.9592
ξ_трc := 0.016
# по графику. Сумма углов
α_1 + α_0 explicit, ALL → 14.63*deg + 90*deg = 104.63 deg
# Кромочные потери
# Относительная толщина выходной кромки сопловой лопатки для охлаждаемой ступени
s_2cотн := 0.11
ξ_крc := 0.2*s_2cотн explicit, ALL → 0.2*0.11 = 0.022
# Профильные потери
ξ_прc := ξ_крc + ξ_трc explicit, ALL → 0.022 + 0.016 = 0.038
# Концевые потери
ξ_концc := 2*ξ_трc*t_с*sin(α_1)/l_с explicit, ALL → 2*0.016*0.026*0.45*(180*deg/(180*deg - (90*deg + 14.63*deg))*sin(90*deg)/sin(14.63*deg))^(1/3)*(1 - 0.2)*sin(14.63*deg)/0.034 = 0.00473855
# Суммарные потери
ξ_Σc := ξ_концc + ξ_прc explicit, ALL → 4.739*10^-3 + 0.038 = 0.0427386
# Уточненное значение
ранее
φ = 0.9778
φ := sqrt(1 - ξ_Σc) = 0.978397
# Расчёт повторяем до сходимости по φ и ψ.
# Профилирование лопаток по радиусу
# Закон профилирования:
α_1 == const
# Угол выхода из СА:
α_1 = 14.63 deg
# Средний радиус СА и РК:
r_ср := D_тη/2 explicit, ALL → 0.507/2 = 0.253355  # м
# Длина лопатки на входе в СА
l_с0 := 0.116  # м
# Корневой радиус
r_к := D_тη/2 - l_с0/2 explicit, ALL → 0.507/2 - 0.116/2 = 0.195355  # м
# Периферийный радиус СА:
r_п := D_тη/2 + l_с0/2 explicit, ALL → 0.507/2 + 0.116/2 = 0.311355  # м
# Окружная скорость на выходе из СА на среднем радиусе:
C_1u = 867.347  # м/c
# Абсолютная скорость на выходе из СА на среднем радиусе:
C_1 = 896.412  # м/c
# Распределение давления по радиусу
P_ст(r) := P_1*(1 + (k_г - 1)/2*C_1^2/(k_г*R*T'_1)*(1 - (r_ср/r)^(2*cos(α_1)^2)))^(k_г/(k_г - 1))
P_ст(r_ср) = 1027520  # Па
# Степень понижения давления в РК
π_рк(r) := P_ст(r)/P_2
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# Осевая скорость за СА: | Окружная скорость за СА: | Полная скорость за СА:
c_1a(r) := C_1a*(r_ср/r)^(cos(α_1)^2)
c_1u(r) := C_1u*(r_ср/r)^(cos(α_1)^2)
c_1(r) := C_1*(r_ср/r)^(cos(α_1)^2)
c_1a(r_к) = 288.803  # м/c
c_1u(r_к) = 1106.36  # м/c
c_1(r_к) = 1143.43  # м/c
c_1a(r_ср) = 226.412  # м/c
c_1u(r_ср) = 867.347  # м/c
c_1(r_ср) = 896.412  # м/c
c_1a(r_п) = 186.674  # м/c
c_1u(r_п) = 715.119  # м/c
c_1(r_п) = 739.082  # м/c
# Адиабатическая скорость за СА:
c_1ад(r) := c_1(r)/φ
c_1ад(r_к) = 1168.68  # м/c
c_1ад(r_ср) = 916.204  # м/c
c_1ад(r_п) = 755.4  # м/c
# Теплоперепад на СА:
# Теплоперепад на РК:
H_с(r) := c_1ад(r)^2/2
H_рк(r) := (H_т - H_с(r))*T_1/T'_1
H_с(r_к) = 682903
H_рк(r_к) = -161520
H_с(r_ср) = 419715  # Дж/кг
H_рк(r_ср) = 104366  # Дж/кг
H_с(r_п) = 285315
H_рк(r_п) = 240144
# Степень реактивности
ρ_r(r) := 1 - (1 - ρ)*(r_ср/r)^(2*cos(α_1)^2)
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ρ_r(r_к) = -0.307282
ρ_r(r_ср) = 0.196539
ρ_r(r_п) = 0.453821
# Окружная скорость:
u(r) := u_тη*r/r_ср
u(r_к) = 417.971
u(r_ср) = 542.065  # м/c
u(r_п) = 666.158
# Угол выхода потока из СА в относительном движении
β_1(r) := atan(c_1a(r)/(c_1(r)*cos(α_1) - u(r)))
β_1(r_к) = 22.7598 deg
β_1(r_ср) = 34.8397 deg
β_1(r_п) = 75.3036 deg
# Окружная скорость на выходе из РК
c_2u(r) := L_u/u(r) - c_1u(r)
c_2u(r_к) = 41.3177
c_2u(r_ср) = 17.5927  # м/c
c_2u(r_п) = 4.97273
# Относительная скорость за СА:
w_1(r) := sqrt(c_1(r)^2 + u(r)^2 - 2*c_1(r)*u(r)*cos(α_1))
w_1(r_к) = 746.514
w_1(r_ср) = 396.322  # м/с
w_1(r_п) = 192.988
# Относительная скорость за РК:
w_2(r) := ψ*sqrt(w_1(r)^2 + 2*H_рк(r))
w_2(r_к) = 469.938
w_2(r_ср) = 587.261  # м/с
w_2(r_п) = 698.515
# Окружная составляющая относительной скорости за РК:
w_2u(r) := c_2u(r) + u(r)
w_2u(r_к) = 459.289
w_2u(r_ср) = 559.657  # м/с
w_2u(r_п) = 671.131
# Осевая составляющая относительной скорости за РК:
w_2a(r) := sqrt(w_2(r)^2 - w_2u(r)^2)
w_2a(r_к) = 99.476
w_2a(r_ср) = 177.93  # м/с
w_2a(r_п) = 193.666
# Осевая составляющая абсолютной скорости за РК:
c_2a(r) := w_2a(r)
# Полная абсолютная скорость за РК:
c_2(r) := sqrt(c_2a(r)^2 + c_2u(r)^2)
c_2(r_к) = 107.715
c_2(r_ср) = 178.797  # м/с
c_2(r_п) = 193.73
# Угол выхода потока из РК в относительном движении:
β_2(r) := atan(w_2a(r)/w_2u(r))
β_2(r_к) = 12.2208 deg
β_2(r_ср) = 17.6368 deg
β_2(r_п) = 16.0964 deg
# Угол выхода потока из РК в абсолютном движении:
α_2(r) := atan(c_2a(r)/c_2u(r))
α_2(r_к) = 67.4442 deg
α_2(r_ср) = 84.3533 deg
α_2(r_п) = 88.5292 deg
# Число лопаток в СА: | Число лопаток в РК:
z_с := π*D_тη/t_с explicit, ALL → π*0.51/(0.03*0.45*(180*deg/(180*deg - (90*deg + 14.63*deg))*sin(90*deg)/sin(14.63*deg))^(1/3)*(1 - 0.2)) = 78.9158
z_рк := π*D_тη/t_л explicit, ALL → π*0.51/0.01 = 169.674
z_с := 37
z_рк := 71
# Пересчитаем шаг решетки СА и РК:
t_ск := π*2*r_к/z_с explicit, ALL → π*2*0.1954/37 = 0.0331744  # м
t_ркк := π*2*r_к/z_рк explicit, ALL → π*2*0.1954/71 = 0.0172881  # м
t_с := π*2*r_ср/z_с explicit, ALL → π*2*0.2534/37 = 0.0430237  # м
t_рк := π*2*r_ср/z_рк explicit, ALL → π*2*0.2534/71 = 0.0224208  # м
t_сп := π*2*r_п/z_с explicit, ALL → π*2*0.3114/37 = 0.052873  # м
t_ркп := π*2*r_п/z_рк explicit, ALL → π*2*0.3114/71 = 0.0275535  # м
# Средний диаметр
# СА | РК
# Осевая протяжённость
# лопаток:, м:
b_аc = 0.0202392
b_ал = 0.0114689
# Шаг, м:
t_с = 0.0430237
t_рк = 0.0224208
# Хорда, м:
b_с = 0.0264982
b_л = 0.0125093
# Газовые углы:
α_0 := 90 deg
β_1(r_ср) = 34.8397 deg
α_1 = 14.63 deg
β_2(r_ср) = 17.6368 deg
# Горло, м
a_c.ср := t_с*sin(α_1) = 0.0108668
a_рк.ср := t_рк*sin(β_2(r_ср)) = 0.00679311
# Радиус входной
# кромки, м
r_1CA := 0.039*b_аc = 0.000789329
r_1RK := 0.036*b_ал = 0.00041288
# Толщина выходной
# кромки, м
s_2с := 0.0023
s_2л := 0.0025
# Максимальная
# толщина профиля, м
C_c := b_с*0.2 = 0.00529963
C_л := b_л*0.2 = 0.00250185
# Втулочный диаметр.
# СА | РК
# Осевая протяжённость
# лопаток:, м:
b_аc = 0.0202392
b_ал = 0.0114689
# Шаг, м:
t_с.к := π*r_к*2/z_с = 0.0331744
t_рк.к := π*r_к*2/z_рк = 0.0172881
# Хорда, м:
b_с.к := t_с.к/0.65 = 0.0510375
b_к := t_рк.к/0.63 = 0.0274414
# Газовые углы:
α_0к := 90 deg
β_1(r_к) = 22.7598 deg
α_1к := α_1 = 14.63 deg
β_2(r_к) = 12.2208 deg
# Горло, м
a_c.к := t_с.к*sin(α_1) = 0.00837905
a_рк.к := t_рк.к*sin(β_2(r_к)) = 0.00365952
# Периферийный диаметр.
# СА | РК
# Осевая протяжённость
# лопаток:, м:
b_аc = 0.0202392
b_ал = 0.0114689
# Шаг, м:
t_с.п := π*r_п*2/z_с = 0.052873
t_рк.п := π*r_п*2/z_рк = 0.0275535
# Хорда, м:
b_с.п := t_с.п/0.749 = 0.0705915
b_рк.п := t_рк.п/0.733 = 0.0375901
# Газовые углы:
α_0п := 90 deg
β_1(r_п) = 75.3036 deg
α_1п := α_1 = 14.63 deg
β_2(r_п) = 16.0964 deg
# Горло, м
a_c.п := t_с.п*sin(α_1) = 0.0133545
a_рк.п := t_рк.п*sin(β_2(r_п)) = 0.00763933
# Проекции скоростей, м/с
c_1a(r_к) = 288.803
c_1u(r_к) = 1106.36
c_1(r_к) = 1143.43
c_1a(r_ср) = 226.412
c_1u(r_ср) = 867.347
c_1(r_ср) = 896.412
w_1u(r) := c_1u(r) - u(r)
c_1a(r_п) = 186.674
c_1u(r_п) = 715.119
c_1(r_п) = 739.082
u(r_к) = 417.971
w_1u(r_к) = 688.386
w_1(r_к) = 746.514
u(r_ср) = 542.065
w_1u(r_ср) = 325.283
w_1(r_ср) = 396.322
u(r_п) = 666.158
w_1u(r_п) = 48.9604
w_1(r_п) = 192.988
c_2a(r_к) = 99.476
c_2u(r_к) = 41.3177
c_2(r_к) = 107.715
c_2a(r_ср) = 177.93
c_2u(r_ср) = 17.5927
c_2(r_ср) = 178.797
c_2a(r_п) = 193.666
c_2u(r_п) = 4.97273
c_2(r_п) = 193.73
w_2a(r_к) = 99.476
w_2u(r_к) = 459.289
w_2(r_к) = 469.938
w_2a(r_ср) = 177.93
w_2u(r_ср) = 559.657
w_2(r_ср) = 587.261
w_2a(r_п) = 193.666
w_2u(r_п) = 671.131
w_2(r_п) = 698.515
# Расчёт на прочность пера рабочей лопатки
n_т := n_тmax = 20431.2  # об/мин
F_пер := 212.99*10^-6  # м^2
F_ср := 330.10*10^-6  # м^2
F_вт := 452.492314*10^-6  # м^2
R_пер := r_п = 0.311355  # м
R_ср := r_ср = 0.253355  # м
R_вт := r_к = 0.195355  # м
# Зададим распределение площадей плавной кривой:
Given
# начальное приближение
a := 1
b := 1
c := 1
a + b*R_вт^c == F_вт
a + b*R_ср^c == F_ср
a + b*R_пер^c == F_пер
[a; b; c] := Find([a; b; c]) = [0.000975269; -0.00195951; 0.809153]
F(z) := a + b*z^c
z := 0, 0.002 .. (R_пер + 0.01)
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м^2
м
# Плотность материала лопатки ЖС50:
ρ := 8850  # кг/м^3
# Частота вращения ротора:
ω := 2*π*n_т/60 = 2139.55  # c^-1
N(z) := ρ*ω^2*integral(z_1*F(z_1), z_1 = z .. R_пер + 0.01)
σ_р(z) := N(z)/F(z)
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м
Па
σ_р(R_вт) = 904369054  # Па
R_вт = 0.195355  # м
# Изгибающие моменты от аэродинамических сил:
# Давление перед рабочим колесом:
P_1(r) := P_ст(r)
# Распределение давления по радиусу
# Давление за рабочим колесом:
P_2 = 795481  # Па
# Температура перед РК:
ORIGIN := 0
T_1 = 1452.12  # К
# Температура за РК:
T_2 = 1377.87  # К
# Плотность газа перед рабочей лопаткой
ρ_1(r) := P_1(r)/(R*T_1)
# Плотность газа за рабочей лопаткой:
ρ_2 := P_2/(R*T_2) = 2.00669  # кг/м^3
# Количество лопаток:
m := 71
C_1a := [203.4646; 228.433; 260.9918]
C_2a := [278.5198; 275.0175; 265.5072]
C_1u := [559.0145; 627.6145; 717.0691]
C_2u := [5.4339; 15.893; 31.2514]  # м/с
z := [472.1*10^-3; 414.1*10^-3; 356.1*10^-3]  # м
u := [495.2415; 434.3978; 373.5542]  # м/с
Н/м
q_x :=
    for i ∈ 0 .. 2
        q_x[i] ← (-P_2 + P_1(z[i]))*2*π*z[i]/m + 2*π*z[i]/m*(C_1a[i]^2*ρ_1(z[i]) - C_2a[i]^2*ρ_2)
    q_x
    = [48145.5; 38580.2; 28681.2]
q_y :=
    for i ∈ 0 .. 2
        q_y[i] ← 2*π*z[i]/m*(C_1a[i]*ρ_1(z[i])*(C_1u[i] - u[i]) - C_2a[i]*ρ_2*(C_2u[i] - u[i]))
    q_y
    = [13920.6; 15347.4; 16487.4]  # Н/м
vz := stack(356.1*10^-3, 414.1*10^-3, 472.1*10^-3)
vq_x := stack(1.3275*10^3, 4.5113*10^3, 7.7006*10^3)
vs1 := lspline(vz, vq_x)
q_x(z) := interp(vs1, vz, vq_x, z)
vq_y := stack(6.5868*10^3, 7.1203*10^3, 7.3552*10^3)
vs := lspline(vz, vq_y)
q_y(z) := interp(vs, vz, vq_y, z)
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м
м
# Н/м | Н/м
M_ξq(z) := -(z*integral(q_y(z_1), z_1 = z .. R_пер + 0.01) - integral(z_1*q_y(z_1), z_1 = z .. R_пер + 0.01))
M_ξq(R_вт) = 47.9329  # Н*м
M_ηq(z) := (integral(z_1*q_x(z_1), z_1 = z .. R_пер + 0.01) - z*integral(q_x(z_1), z_1 = z .. R_пер + 0.01))
M_ηq(R_вт) = -22.9263  # Н*м
φ_В := 31.767128
M_u := M_ξq(R_вт)*cos(φ_В*deg) + M_ηq(R_вт)*sin(φ_В*deg) = 28.6823  # Н*м
M_v := -M_ξq(R_вт)*sin(φ_В*deg) + M_ηq(R_вт)*cos(φ_В*deg) = -44.7269  # Н*м
I_u.В := 8375.971197*10^-12 = 8.37597e-9  # м^4
I_v.В := 75589.099219*10^-12 = 7.55891e-8  # м^4
# Определим положение нейтральной линии:
β := atan(M_v*I_u.В/(M_u*I_v.В)) = -9.80361 deg  # Практически совпадает с осью U
# Точка А
v_A := 11.890*10^-3  # м
u_A := (-14.2858)*10^-3  # м
σ_A := M_u*v_A/I_u.В - M_v*u_A/I_v.В = 32262533  # Па
# Точка B
v_B := 7.2017*10^-3 = 0.0072017  # м
u_B := 30.8513*10^-3  # м
σ_B := M_u*v_B/I_u.В - M_v*u_B/I_v.В = 42916260  # Па
# Точка С
v_C := -8.5692*10^-3  # м
u_C := -5.3063*10^-3  # м
σ_C := M_u*v_C/I_u.В - M_v*u_C/I_v.В = -32483798  # Па
# Наиболее опасная точка А
σ_Σ := σ_р(R_вт) + σ_A = 936631587  # Па
σ_р(R_вт) = 904369054
σ_р(R_вт) = 904369054  # Па
# Примем материал ЖС50
# В качестве критерия работоспособности выберем длительную прочность при температуре 1273 К на 100 часов
# Предел текучести:
σ_дл := 315*10^6  # Па
σ_дл/σ_Σ explicit, ALL → 315*10^6/(9.37*10^8) = 0.336312
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