# Техническое задание
# Формулировка задания:
# Спроектировать турбину высокого давления стационарной ГТУ
# Исходные данные:
# Параметры ГТУ:
# 1) Число валов  -  2
# 2) Тип компрессора  -  осевой
# 3) Тип турбины  -  осевая
# 4) Температура газа перед турбиной:
T_г.торм := 1500  # К
# Зададимся значениями КПД узлов и коэффициентов характеризующих потери по тракту установки:
# 1. Коэффициент полного давления при входе:
#
# 2. КПД компрессора:
#
# 3. Коэффициент полноты горения:
#
# 4. Коэффициент  полного давления в камере сгорания:
#
# 5. КПД турбины по параметрам торможения:
# компрессора
#
# 6. Лопаточный КПД турбин
#
# 7. Механический КПД (учитывает затраты мощности турбины на трение и привод вспомогательных агрегатов) - отношение потерь к полезной мощности турбины(Ne):
#
# 8. Коэффициент давления на выходе:
#
# Топливо -  природный газ:
#
# 9. Низшее значение теплоты сгорания топлива:
#
# 10. Стехиометрический коэффициент
σ_вх := 0.99
ηкпол := 0.9
η_г := 0.995
σ_г := 0.97
η_т.торм := 0.91
η_л := 0.92
η_м := 0.99
σ_вых := 0.99
Q_н := 47.8*10^6  # Дж/нм^3
L_0 := 15.96
# 11. Мощность установки
N_e := 25*10^6  # Вт
# 12. Газовая постоянная
R_в := 287.4  # Дж/(кг*К)
# 14) Атмосферные условия
T_а := 288  # К
P_а := 101300  # Па
k := 1.4
# Теплоемкость природного газа поступаемого в КС:
С_pт := 2155.8
# Теплоемкость чистых продуктов сгорания природного газа
С_чпсг := 1275.2
i := 0 .. 10
# Расчетная часть
# Расчет термодинамического цикла ГТД
# Зададимся рядом значений, диапазон которых для простой открытой схемы ГТУ
# возрастает с увеличением отношения температур =Tг/Тв по зависимости
# π_к=θ...θ^2.4
θ := T_г.торм/T_а
θ = 5.20833
θ^2.4 = 52.4901  # т.е. π_к =10...50
π_к.торм := stack(10, 15, 20, 22.5, 25, 27.5, 30, 35, 40, 45, 50)
transpose(π_к.торм) = [10, 15, 20, 22.5, 25, 27.5, 30, 35, 40, 45, 50]
# Расчёт компрессора
# КПД компрессора по параметрам торможения :
η_к.торм[i] := (π_к.торм[i]^((k - 1)/k) - 1)/(π_к.торм[i]^((k - 1)/(k*ηкпол)) - 1)
transpose(η_к.торм) = [0.864066, 0.857159, 0.852164, 0.850098, 0.848239, 0.846549, 0.845, 0.842239, 0.839832, 0.837697, 0.835779]
# Температура за компрессором в первом приближении, К
T_к.торм[i] := T_а*(1 + (π_к.торм[i]^((k - 1)/k) - 1)/η_к.торм[i])
transpose(T_к.торм) = [598.209, 680.385, 745.449, 773.85, 800.171, 824.752, 847.852, 890.375, 928.93, 964.322, 997.121]
# Значения истинных удельных теплоёмкостей:
# при α=10000 формула принимает следующий вид:
C_p(T) :=
    (0.2407 + 0.0193*(2.5*10^-3*T - 0.875) + 2.0*10^-3*(2.5*10^-5*T^2 - 0.0275*T + 6.5625))*4187 if T < 750
    (0.26 + 0.032*(1.176*10^-3*T - 0.88235) + (-1)*0.374*10^-2*(5.5556*10^-6*T^2 + (-1)*1.3056*10^-2*T + 6.67))*4187 if T ≥ 750
# Истинная удельная теплоёмкость воздуха в компрессоре по средней температуре:
C_pв[i] := C_p((T_к.торм[i] + T_а)/2)
transpose(C_pв) = [1020.64, 1027.45, 1033.35, 1036.06, 1038.65, 1041.14, 1043.53, 1048.08, 1052.37, 1056.44, 1060.33]
k[i] := C_pв[i]/(C_pв[i] - R_в)
transpose(k) = [1.39196, 1.38835, 1.38528, 1.38388, 1.38256, 1.3813, 1.38009, 1.37782, 1.3757, 1.37371, 1.37183]
# Для второго приближения
# Температура за компрессором во втором приближении, К
T_к.торм[i] := T_а*(1 + (π_к.торм[i]^((k[i] - 1)/k[i]) - 1)/η_к.торм[i])
transpose(T_к.торм) = [592.124, 668.658, 727.567, 752.767, 775.825, 797.092, 816.836, 852.548, 884.192, 912.598, 938.361]
# Давление за компрессором, Па:
P_к.вых.торм[i] := σ_вх*P_а*π_к.торм[i]
transpose(P_к.вых.торм) = [1002870, 1504305, 2005740, 2256458, 2507175, 2757892, 3008610, 3510045, 4011480, 4512915, 5014350]
# Истинная удельная теплоемкость по средней температуре воздуха в компрессоре, Дж/кг*К:
C_pв[i] := C_p((T_к.торм[i] + T_а)/2)
transpose(C_pв) = [1020.16, 1026.44, 1031.69, 1034.04, 1036.26, 1038.35, 1040.33, 1044.02, 1047.41, 1050.53, 1053.44]
# Удельная работа компрессора, Дж/кг
L_к[i] := C_pв[i]*(T_к.торм[i] - T_а)
transpose(L_к) = [310256, 390722, 453495, 480588, 505512, 528615, 550165, 589402, 624455, 656161, 685117]
# Расчет турбины:
# Давление газа перед турбиной высокого давления, Па
P_г.торм := σ_г*P_к.вых.торм
transpose(P_г.торм) = [972784, 1459176, 1945568, 2188764, 2431960, 2675156, 2918352, 3404744, 3891136, 4377528, 4863920]
# В первом приближении примем
k_г := 1.33
R_г := 289.3
300.8
# Теплоемкость, Дж/кг*К:
C_pг := k_г*R_г/(k_г - 1)
# Давление за турбиной низкого давления, Па
P_т := P_а/σ_вых
# Степень понижения давления в турбинах (суммарная):
π_т[i] := P_г.торм[i]/P_т
transpose(π_т) = [9.50697, 14.2605, 19.0139, 21.3907, 23.7674, 26.1442, 28.5209, 33.2744, 38.0279, 42.7814, 47.5348]
# Степень понижения давления в ТНД определим из условия баланса мощностей турбины и компрессора:
G_в*L_к == G_т*L_т*η_м
g_т == G_т/G_в
# =>
L_т == L_к/(g_т*η_м)
g_т[i] := C_pв[i]*(T_г.торм - T_к.торм[i])/(Q_н*η_г - (1 + L_0)*С_чпсг*(T_г.торм - T_а) + L_0*C_pв[i]*(T_г.торм - T_а) + С_pт*((70 + 273.15) - T_а))
transpose(g_т) = [0.0224795, 0.0206503, 0.0192379, 0.0186323, 0.0180773, 0.0175647, 0.0170882, 0.0162245, 0.0154573, 0.0147669, 0.0141393]
L_т == C_pг*T_г.торм*(1 - π_т.твд^((1 - k_г)/k_г))*η_т.торм
g_ут := 0.007
g_охл := 0.06
g_воз := 0.05
π_т.твд[i] := (1 - L_к[i]/((g_т[i] + 1)*(1 - g_ут - g_охл)*C_pг*η_м*T_г.торм*η_т.торм))^(k_г/(1 - k_г))
transpose(π_т.твд) = [2.53897, 3.37289, 4.27541, 4.75833, 5.26472, 5.79616, 6.35411, 7.55524, 8.87933, 10.3377, 11.9419]
# Температура газа после турбины высокого давления:
T_т.твд[i] := T_г.торм*(1 - (1 - π_т.твд[i]^((1 - k_г)/k_г))*η_л)
transpose(T_т.твд) = [1215.15, 1140.64, 1082.32, 1057.11, 1033.88, 1012.34, 992.218, 955.541, 922.725, 893.001, 865.823]
# Работа турбины высокого давления:
L_т.твд[i] := C_pг*T_г.торм*(1 - π_т.твд[i]^((1 - k_г)/k_г))*η_т.торм
transpose(L_т.твд) = [328510, 414452, 481704, 510786, 537568, 562419, 585622, 627921, 665767, 700047, 731392]
# Давление газа после турбины высокого давления:
P_т.твд.торм[i] := P_к.вых.торм[i]/π_т.твд[i]
transpose(P_т.твд.торм) = [394991, 445999, 469134, 474213, 476222, 475814, 473490, 464584, 451777, 436551, 419897]
T_ср.твд[i] := (T_г.торм + T_т.твд[i])/2
# Избыток воздуха:
α := stack(2.7, 2.9, 3.1, 3.25, 3.4, 3.5, 3.6, 3.75, 3.9, 4.0, 4.4)  # Переделать
transpose(α) = [2.7, 2.9, 3.1, 3.25, 3.4, 3.5, 3.6, 3.75, 3.9, 4, 4.4]
# Истинная удельная теплоемкость:
C_p(T, α) :=
    ((0.0174/α + 0.2407) + (0.0093/α + 0.0193)*(2.5*10^-3*T - 0.875) + (2.0*10^-3 - 1.056*10^-3/(α - 0.2))*(2.5*10^-5*T^2 + (-1)*0.0275*T + 6.5625))*4187 if T < 750
    ((0.0267/α + 0.26) + (0.0133/α + 0.032)*(1.176*10^-3*T + (-1)*0.88235) + (-1)*(0.94*10^-2/(α^2 + 10) + 0.374*10^-2)*(5.5556*10^-6*T^2 + (-1)*1.3056*10^-2*T + 6.67))*4187 if T ≥ 750
# Истинная удельная теплоемкость продуктов сгорания по средней температуре в ТВД:
C_pг1[i] := C_p(T_ср.твд[i], α[i])
transpose(C_pг1) = [1255.07, 1245.58, 1237.68, 1233.43, 1229.53, 1226.53, 1223.71, 1219.04, 1214.78, 1211.32, 1205.64]
R_г = 289.3
k_г1[i] := C_pг1[i]/(C_pг1[i] - R_г)
transpose(k_г1) = [1.29955, 1.30253, 1.30505, 1.30642, 1.30769, 1.30867, 1.30961, 1.31116, 1.31259, 1.31377, 1.31571]
# Удельная работа турбины ТВД, Дж/кг:
L_т.твд[i] := C_pг1[i]*T_г.торм*(1 - π_т.твд[i]^((1 - k_г1[i])/k_г1[i]))*η_т.торм
transpose(L_т.твд) = [331116, 418271, 486466, 515880, 542939, 568074, 591519, 634252, 672410, 706960, 738084]
# Степень понижения давления в ТНД:
π_т.тнд[i] := π_т[i]/π_т.твд[i]
transpose(π_т.тнд) = [3.74442, 4.22796, 4.44728, 4.49542, 4.51447, 4.5106, 4.48857, 4.40415, 4.28274, 4.1384, 3.98052]
transpose(π_т.твд) = [2.53897, 3.37289, 4.27541, 4.75833, 5.26472, 5.79616, 6.35411, 7.55524, 8.87933, 10.3377, 11.9419]
# Температура газа после турбины низкого давления:
T_т.тнд[i] := T_т.твд[i]*(1 - (1 - π_т.тнд[i]^((1 - k_г)/k_г))*η_л)
transpose(T_т.тнд) = [902.871, 825.053, 774.191, 754.362, 737.104, 721.877, 708.295, 684.973, 665.539, 648.992, 634.671]
# Работа турбины низкого давления:
L_т.тнд[i] := C_pг*T_т.твд[i]*(1 - π_т.тнд[i]^((1 - k_г)/k_г))*η_л
transpose(L_т.тнд) = [364113, 367959, 359271, 352990, 346036, 338665, 331045, 315473, 299870, 284506, 269516]
# Давление газа после турбины низкого давления:
P_т.тнд.торм[i] := P_т.твд.торм[i]/π_т.тнд[i]
transpose(P_т.тнд.торм) = [105488, 105488, 105488, 105488, 105488, 105488, 105488, 105488, 105488, 105488, 105488]
T_ср.тнд[i] := (T_т.твд[i] + T_т.твд[i])/2
# Истинная удельная теплоемкость продуктов сгорания по средней температуре в ТНД:
C_pг2[i] := C_p(T_ср.тнд[i], α[i])
transpose(C_pг2) = [1232.33, 1215.18, 1200.85, 1193.77, 1187.21, 1181.63, 1176.35, 1167.03, 1158.49, 1150.98, 1141.93]
k_г2[i] := C_pг2[i]/(C_pг2[i] - R_г)
transpose(k_г2) = [1.30678, 1.31246, 1.31737, 1.31986, 1.32219, 1.32421, 1.32614, 1.3296, 1.33284, 1.33574, 1.3393]
# Удельная работа турбины ТВД, Дж/кг:
L_т.тнд[i] := C_pг2[i]*T_т.твд[i]*(1 - π_т.тнд[i]^((1 - k_г2[i])/k_г2[i]))*η_л
transpose(L_т.тнд) = [367167, 370478, 361091, 354432, 347124, 339453, 331556, 315523, 299542, 283893, 268601]
# Удельная  мощность:
N_е.уд[i] := (L_т.твд[i] + L_т.тнд[i])*((1 + g_т[i])*(1 - g_ут - g_охл) + g_воз)*η_м - L_к[i]
transpose(N_е.уд) = [383791, 391909, 386382, 381351, 375534, 369288, 362714, 349124, 335296, 321622, 307706]
# Расход через турбину, кг/сек
G_в[i] := N_e/N_е.уд[i]
transpose(G_в) = [65.1396, 63.7904, 64.7029, 65.5564, 66.5719, 67.6979, 68.9249, 71.6077, 74.5609, 77.7309, 81.2463]
G_г[i] := (1 + g_т[i])*(1 - g_ут - g_охл)*G_в[i]
transpose(G_г) = [62.1415, 60.7455, 61.5291, 62.3038, 63.2344, 64.2715, 65.4058, 67.894, 70.6406, 73.5939, 76.8746]
# Удельный расход топлива, кг/(кВт*ч)
C_e[i] := g_т[i]*(1 - g_ут - g_охл)*3600*1000/N_е.уд[i]
η_e[i] := 3600*1000/(C_e[i]*Q_н)
η_e = [0.382823; 0.425548; 0.45035; 0.458933; 0.465807; 0.471427; 0.475948; 0.482502; 0.486392; 0.48837; 0.487978]
π_к.торм = [10; 15; 20; 22.5; 25; 27.5; 30; 35; 40; 45; 50]
C_e = [0.196733; 0.176981; 0.167234; 0.164106; 0.161685; 0.159757; 0.15824; 0.15609; 0.154842; 0.154215; 0.154338]
G_в = [65.1396; 63.7904; 64.7029; 65.5564; 66.5719; 67.6979; 68.9249; 71.6077; 74.5609; 77.7309; 81.2463]
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# 2. Расчет турбины компрессора на выбранные параметры
# Выбор частоты вращения вала турбины ТВД.
# Расчет турбины высокого давления:
# Исходные данные
π_к.торм := π_к.торм[2] = 20
G_г := G_г[2] = 61.5291
g_охл.са := 0.02
π_т := π_т[2] = 19.0139
G_в := G_в[2] = 64.7029
g_охл.рк := 0.03
k_г := k_г1[2] = 1.30505
C_pг := C_pг1[2] = 1237.68
L_к := L_к[2] = 453495
P_г.торм := P_г.торм[2] = 1945568
# Расход рабочего тела  в горле СА | Дж/кг
G_г0 := G_г + G_в*g_охл.са/2 = 62.1762
# Удельная работа турбины, Дж/кг
L_т.твд := C_pг*T_г.торм*(1 - π_т.твд[2]^((1 - k_г)/k_г))*η_т.торм = 486466
# Скорость выхода потока из турбины ТВД
c_тa := 170  # м/с
# Располагаемый теплоперепад в ТВД, Дж/кг:
H_0т.твд := (L_т.твд + c_тa^2/2)/η_л = 544474
# Степень понижения  полного давления в турбине компрессора:
π_твд := (1 - H_0т.твд/(C_pг*T_г.торм))^(k_г/(1 - k_г)) = 4.41508
# Температура за ТВД, K:
T_т.твд := T_г.торм - H_0т.твд*η_л/C_pг = 1095.28
# Статическое давление за турбиной компрессора, Па
P_т.твд := P_г.торм*(1 - H_0т.твд/(C_pг*T_г.торм))^(k_г/(k_г - 1)) = 440664
# Расчет ТВД на максимальную частоту вращения
σ_dop := 150
ρ_м := 8400
μ := 3.5
k_n1 := 2*π*ρ_м/(3600*(1 + ln(μ))) = 6.5079
k_n := 6.508*10^-6
# Удельный объём газа за турбиной:
ν_т := R_г*T_т.твд/P_т.твд = 0.719061  # м^3/кг
# Площадь сечения турбины при выходе из рабочего колеса последней ступени турбины
F_т.твд := G_г0*ν_т/c_тa = 0.262991  # м^2
# Максимальная частота вращения ТВД:
n_т.max.твд := sqrt(σ_dop/(k_n*F_т.твд)) = 9361.63  # об/мин
n_т.max.твд := 9500  # об/мин
# Расчет числа ступеней турбины ТВД
# Относительная длина лопатки:
l_отн == l_т/D_т
l_отн.твд := 1/7.1
# Диаметр турбины, м:
D_т.твд := sqrt(F_т.твд/(π*l_отн.твд)) = 0.770947
# Длина рабочей лопатки, м:
l_т.твд := D_т.твд*l_отн.твд = 0.108584
# Окружная скорость на среднем диаметре, м/c:
u_т := π*D_т.твд*n_т.max.твд/60 = 383.484
# Расчёт параметров соответствующих максимальному КПД
# Адиабатическая скорость:
c_0 := sqrt(2*H_0т.твд) = 1043.53
# Число ступеней:
# оптимальное отношение:
y_0 := 0.52
# коэффициент использования скорости:
μ := 1
# скорость за первой ступенью, м/с: | скорость за второй ступенью, м/с:
c_21 := 120
c_22 := 150
# средняя скорость за ступенями:
c_2cp := sqrt(0.5*(c_21^2 + c_22^2)) = 135.831
z_твд := ((c_0/(μ*c_2cp))^2 - 1)/((u_т/(μ*c_2cp*y_0))^2 - 1) = 2.03745
# Теплоперепады по ступеням, Дж/кг:
# 1-я ступень: | 2-я ступень:
H_1.твд := H_0т.твд*0.5 = 272237
H_2.твд := H_0т.твд*0.5 = 272237
# 2.3 Поступенчатый расчет турбины ТВД
# Расчет первой ступени
# Располагаемые теплоперепад первой ступени, Дж/кг:
H_1.твд = 272237
H_1.твд := H_1.твд*1.02
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# Степень реактивности:
ρ_1.твд := 0.23
# Коэффициент скорости:
φ_1.твд := 0.97
# Располагаемый теплоперепад в СА, Дж/кг:
H_с1.твд := H_1.твд*(1 - ρ_1.твд) = 213815
# Угол потока за СА:
α_11.твд := 14 deg
# Скорость за СА, м/с:
c_11.твд := φ_1.твд*sqrt(2*H_с1.твд) = 634.316
# Температура за СА, К:
T_с1.твд := T_г.торм - H_с1.твд*φ_1.твд^2/C_pг = 1337.46
# Температура в конце адиабатного расширения в СА, К:
T'_с1.твд := T_г.торм - H_с1.твд/C_pг = 1327.25
# Давление за СА, Па:
P_с1.твд := P_г.торм*(1 - H_с1.твд/(C_pг*T_г.торм))^(k_г/(k_г - 1)) = 1152666
# Удельный объём за СА,  : | м^3/кг
ν_с1.твд := R_г*T_с1.твд/P_с1.твд = 0.335679
# Плотность за СА  : | кг/м^3
ρ_с1.твд := P_с1.твд/(R_г*T_с1.твд) = 2.97904
# Длина сопловой лопатки, м:
l_с1.твд := G_г*ν_с1.твд/(π*D_т.твд*sin(α_11.твд)*c_11.твд) = 0.0555712
# Длина рабочей лопатки:
l_л1.твд := 0.061
# Ширина рабочих лопаток (l/b=1.5...2), м:
b_aл1.твд := l_л1.твд/1.5 = 0.0406667
# Ширина сопловой лопатки (l/b=1...1.5), м:
b_aс1.твд := l_с1.твд/1.1 = 0.0505193
# Осевой зазор за сопловой лопаткой, м:
δ_ас1.твд := 0.31*b_aс1.твд = 0.015661
# Осевой зазор за рабочими лопатками, м:
δ_ал1.твд := 0.23*b_aл1.твд = 0.00935333
# Радиальный зазор за сопловой лопаткой, м:
δ_rс1.твд := 0.0085*l_с1.твд = 0.000472356
# Радиальный зазор за рабочими лопатками, м:
δ_rл1.твд := 0.0085*l_л1.твд = 0.0005185
# Кольцевая площадь сечения перед рабочими лопатками(РЛ),  :
м^2
F_1a.твд := π*D_т.твд*l_с1.твд = 0.134594
# Средняя скорость перед РЛ, м/с:
c_11a.твд := G_г*ν_с1.твд/F_1a.твд = 153.455
# Угол потока за СА(проверяется):
α_11.твд := asin(c_11a.твд/c_11.твд) = 14 deg  # => (верно)
# Окружная составляющая абсолютной скорости за СА, м/с:
c_11u.твд := c_11.твд*cos(α_11.твд) = 615.474
# Относительная скорость при входе в РЛ, м/с:
w_11.твд := sqrt(c_11.твд^2 + u_т^2 - 2*c_11.твд*u_т*cos(α_11.твд)) = 278.151
# Средний угол входа потока на лопатки РЛ:
β_11.твд := atan(c_11a.твд/(c_11.твд*cos(α_11.твд) - u_т)) = 33.4835 deg
β_11.твд :=
    atan(c_11a.твд/(c_11.твд*cos(α_11.твд) - u_т)) if c_11.твд*cos(α_11.твд) - u_т > 0
    90 deg + atan(c_11a.твд/(c_11.твд*cos(α_11.твд) - u_т)) if c_11.твд*cos(α_11.твд) - u_т < 0
β_11.твд = 33.4835 deg
# Располагаемый теплоперепад в РК, Дж/кг:
H_л1.твд := ρ_1.твд*H_1.твд*T_с1.твд/T'_с1.твд = 64358
# Коэффициент скорости ψ1:
ψ_1.твд := 0.964
# Относительная скорость за РЛ, м/c:
w_21.твд := ψ_1.твд*sqrt(w_11.твд^2 + 2*H_л1.твд + (u_т^2 - u_т^2)) = 437.622
# Температура за РЛ, К:
T_21.твд := T_с1.твд + w_11.твд^2/(2*C_pг) + (u_т^2 - u_т^2)/(2*C_pг) - w_21.твд^2/(2*C_pг) = 1291.34
# Температура в конце адиабатного расширения в РЛ, К:
T'_21.твд := T_с1.твд - H_л1.твд/C_pг = 1285.46
# Давление за РЛ, Па:
P_21.твд := P_с1.твд*(T'_21.твд/T_с1.твд)^(k_г/(k_г - 1)) = 972803
# Удельный объём за РЛ,  : | м^3/кг
υ_21.твд := R_г*T_21.твд/P_21.твд = 0.38403
# Плотность за РЛ,  : | кг/м^3
ρ_21.твд := P_21.твд/(R_г*T_21.твд) = 2.60396
# Площадь кольцевого сечения за РЛ,  : | м^2
F_лa1.твд := π*D_т.твд*l_л1.твд = 0.147742
# Осевая скорость за РЛ, м/c:
c_21a.твд := G_г*υ_21.твд/F_лa1.твд = 159.934
# Угол выхода потока из рабочих лопаток:
β_21.твд := asin(c_21a.твд/w_21.твд) = 21.436 deg
# Скорость закрутки потока за РЛ, м/c:
c_21u.твд := w_21.твд*cos(β_21.твд) - u_т = 23.8665
# Абсолютная скорость за РЛ, м/c:
c_21.твд := sqrt(c_21a.твд^2 + c_21u.твд^2) = 161.705
# Угол выхода потока из РЛ:
α_21.твд := atan(c_21a.твд/c_21u.твд) = 81.5126 deg
α_21.твд :=
    atan(c_21a.твд/c_21u.твд) if c_21u.твд > 0
    180 deg + atan(c_21a.твд/c_21u.твд) if c_21u.твд < 0
α_21.твд = 81.5126 deg
# Работа на окружности РК, Дж:
L_u1.твд := c_11u.твд*u_т + c_21u.твд*u_т = 245177
# КПД на окружности РК:
η_u1.твд := L_u1.твд/H_1.твд = 0.882942
# Удельные потери в СА, Дж/кг:
h_с1.твд := (φ_1.твд^-2 - 1)*c_11.твд^2/2 = 12636.5
# С учётом их использования в рабочих лопатках, Дж/кг:
h'_с1.твд := h_с1.твд*T'_21.твд/T_с1.твд = 12145.2
# Относительные потери в СА:
ξ_с1.твд := h_с1.твд/H_1.твд = 0.045507
# С учётом их использования в рабочих лопатках:
ξ'_с1.твд := ξ_с1.твд*T'_21.твд/T_с1.твд = 0.0437377
# Удельные потери в рабочих лопатках, Дж/кг:
h_л1.твд := (1/ψ_1.твд^2 - 1)*w_21.твд^2/2 = 7285.48
# Относительные потери в рабочих лопатках:
ξ_л1.твд := h_л1.твд/H_1.твд = 0.0262368
# Удельные потери с выходной скоростью, Дж/кг:
h_в1.твд := c_21.твд^2/2 = 13074.3
# Относительные потери с выходной скоростью:
ξ_в1.твд := h_в1.твд/H_1.твд = 0.0470839
# КПД на окружности колеса:
η_u1.твд := 1 - ξ'_с1.твд - ξ_л1.твд - ξ_в1.твд = 0.882942
# Удельные потери в радиальном зазоре, Дж/кг:
h_з1.твд := 1.37*(1 + 1.6*ρ_1.твд)*(1 + l_л1.твд/D_т.твд)*L_u1.твд*δ_rл1.твд/l_л1.твд = 4214.79
# Относительные потери в радиальном зазоре:
ξ_з1.твд := h_з1.твд/H_1.твд = 0.0151785
# Плотность  : | кг/м^3
ρ_ср1.твд := (ρ_с1.твд + ρ_21.твд)/2 = 2.7915
# Затраты мощности на трение, Вт:
N_т.в1.твд := (1.07*D_т.твд^2)*(u_т/100)^3*ρ_ср1.твд*10^3 = 100118
# Удельные потери на трение, Дж/кг:
h_т.в1.твд := N_т.в1.твд/G_г = 1627.16
# Относительные потери на трение:
ξ_т.в1.твд := h_т.в1.твд/H_1.твд = 0.0058598
# Мощностной КПД:
η_т1.твд := η_u1.твд - ξ_з1.твд - ξ_т.в1.твд = 0.861903
# Лопаточный КПД:
η_л1.твд := η_u1.твд - ξ_з1.твд + ξ_в1.твд - ξ_т.в1.твд = 0.908987
# Удельная работа ступени, Дж/кг:
L_т1.твд := H_1.твд*η_т1.твд = 239335
# Температура за ступенью:
T_ст1.твд := T_21.твд + h_з1.твд/C_pг + h_т.в1.твд/C_pг = 1296.06
# Температура торможения за ступенью, К:
T_ст1.торм.твд := T_ст1.твд + h_в1.твд/C_pг = 1306.63
# Давление торможения за ступенью, Па:
P_ст1.торм.твд := P_21.твд*(T_ст1.торм.твд/T_ст1.твд)^(k_г/(k_г - 1)) = 1007180
# Располагаемый теплоперепад по параметрам торможения, Дж/кг:
H_1.торм.твд := C_pг*T_г.торм*(1 - (P_ст1.торм.твд/P_г.торм)^((k_г - 1)/k_г)) = 264813
# КПД ступени по параметрам торможения:
η_т1.торм.твд := L_т1.твд/H_1.торм.твд = 0.903787
# Проверка соотношения КПД для первой ступени:
# КПД ступени по параметрам торможения: | Лопаточный КПД:
# Мощностной КПД: | КПД на окружности колеса:
η_т1.твд = 0.861903  # <
η_u1.твд = 0.882942  # <
η_т1.торм.твд = 0.903787  # <
η_л1.твд = 0.908987
# Расчет второй ступени ТВД.
# Температура торможения перед ступенью, К:
T_02.торм.твд := T_ст1.торм.твд = 1306.63
# Давление торможения перед ступенью, Па:
P_02.торм.твд := P_ст1.торм.твд = 1007180
μ_12.твд := 1
P_12.торм.твд := P_21.твд*(1 + (μ_12.твд*c_21.твд)^2/(2*C_pг*T_ст1.твд))^(k_г/(k_г - 1)) = 1007180
# Располагаемые теплоперепад ступени, Дж/кг:
H_2.твд := C_pг*T_02.торм.твд*(1 - (P_т.твд/P_02.торм.твд)^((k_г - 1)/k_г)) = 284137
# Степень реактивности:
ρ_2.твд := 0.20
# Коэффициент скорости:
φ_2.твд := 0.96
# Располагаемый теплоперепад в СА, Дж/кг:
H_с2.твд := H_2.твд*(1 - ρ_2.твд) = 227310
# Скорость за СА, м/с:
c_12.твд := φ_2.твд*sqrt(2*H_с2.твд) = 647.284
# Температура за СА, К:
T_с12.твд := T_02.торм.твд - H_с2.твд*φ_2.твд^2/C_pг = 1137.37
# Температура в конце адиабатного расширения в СА, К:
T'_с12.твд := T_02.торм.твд - H_с2.твд/C_pг = 1122.97
# Давление за СА, Па:
P_с12.твд := P_12.торм.твд*(1 - H_с2.твд/(C_pг*T_02.торм.твд))^(k_г/(k_г - 1)) = 526831
# Удельный объём за СА,  : | м^3/кг
ν_с2.твд := R_г*T_с12.твд/P_с12.твд = 0.624565
# Плотность за СА  : | кг/м^3
ρ_с12.твд := P_с12.твд/(R_г*T_с12.твд) = 1.60111
# Длина сопловой лопатки, м:
l_с2.твд := 0.095
# Угол потока за СА:
α_12.твд := asin(G_г*ν_с2.твд/(π*D_т.твд*c_12.твд*l_с2.твд)) = 14.953 deg
# Длина рабочей лопатки:
l_л2.твд := l_т.твд = 0.108584
# Ширина рабочих лопаток (l/b=1.5...2), м:
b_aл2.твд := l_л2.твд/1.8 = 0.0603245
# Ширина сопловой лопатки (l/b=1...1.5), м:
b_aс2.твд := 1.2*b_aл2.твд = 0.0723894
# Осевой зазор за сопловой лопаткой, м:
δ_ас2.твд := 0.23*b_aс2.твд = 0.0166496
# Осевой зазор за рабочими лопатками, м:
δ_ал2.твд := 0.23*b_aл2.твд = 0.0138746
# Радиальный зазор за сопловой лопаткой, м:
δ_rс2.твд := 0.0085*l_с2.твд = 0.0008075
# Радиальный зазор за рабочими лопатками, м:
δ_rл2.твд := 0.0085*l_л2.твд = 0.000922965
# Кольцевая площадь сечения перед рабочими лопатками(РЛ), м^2  :
F_2a.твд := π*D_т.твд*l_с2.твд = 0.23009
# Средняя скорость перед РЛ, м/с:
c_12a.твд := G_г*ν_с2.твд/F_2a.твд = 167.017
# Угол потока за СА(проверяется):
α_12.твд := asin(c_12a.твд/c_12.твд) = 14.953 deg
# Окружная составляющая абсолютной скорости за СА, м/с:
c_12u.твд := c_12.твд*cos(α_12.твд) = 625.366
# Относительная скорость при входе в РЛ, м/с:
w_12.твд := sqrt(c_12.твд^2 + u_т^2 - 2*c_12.твд*u_т*cos(α_12.твд)) = 293.942
# Средний угол входа потока на лопатки РЛ:
β_12.твд := atan(c_12a.твд/(c_12.твд*cos(α_12.твд) - u_т)) = 34.6247 deg
β_12.твд :=
    atan(c_12a.твд/(c_12.твд*cos(α_12.твд) - u_т)) if c_12.твд*cos(α_12.твд) - u_т > 0
    90 deg + atan(c_12a.твд/(c_12.твд*cos(α_12.твд) - u_т)) if c_12.твд*cos(α_12.твд) - u_т < 0
β_12.твд = 34.6247 deg
# Располагаемый теплоперепад в РК, Дж/кг:
H_л2.твд := C_pг*T_с12.твд*(1 - (P_т.твд/P_с12.твд)^((k_г - 1)/k_г)) = 57556
# Коэффициент скорости ψ2:
ψ_2.твд := 0.97
# Относительная скорость за РЛ, м/c:
w_22.твд := ψ_1.твд*sqrt(w_12.твд^2 + 2*H_л2.твд + (u_т^2 - u_т^2)) = 432.742
# Температура за РЛ, К:
T_22.твд := T_с12.твд + w_12.твд^2/(2*C_pг) + (u_т^2 - u_т^2)/(2*C_pг) - w_22.твд^2/(2*C_pг) = 1096.62
# Температура в конце адиабатного расширения в РЛ, К:
T'_22.твд := T_с12.твд - H_л2.твд/C_pг = 1090.87
# Давление за РЛ, Па:
P_22.твд := P_с12.твд*(T'_22.твд/T_с12.твд)^(k_г/(k_г - 1)) = 440664
# Удельный объём за РЛ,  : | м^3/кг
υ_22.твд := R_г*T_22.твд/P_22.твд = 0.719941
# Плотность за РЛ,  : | кг/м^3
ρ_22.твд := P_22.твд/(R_г*T_22.твд) = 1.389
# Площадь кольцевого сечения за РЛ,  : | м^2
F_лa2.твд := π*D_т.твд*l_л2.твд = 0.262991
# Осевая скорость за РЛ, м/c:
c_22a.твд := G_г*υ_22.твд/F_лa2.твд = 168.437
# Угол выхода потока из рабочих лопаток:
β_22.твд := asin(c_22a.твд/w_22.твд) = 22.9067 deg
# Скорость закрутки потока за РЛ, м/c:
c_22u.твд := w_22.твд*cos(β_22.твд) - u_т = 15.1326
# Абсолютная скорость за РЛ, м/c:
c_22.твд := sqrt(c_22a.твд^2 + c_22u.твд^2) = 169.115
# Угол выхода потока из РЛ:
α_22.твд := atan(c_22a.твд/c_22u.твд) = 84.8662 deg
α_22.твд :=
    atan(c_22a.твд/c_22u.твд) if c_22u.твд > 0
    180 deg + atan(c_22a.твд/c_22u.твд) if c_22u.твд < 0
α_22.твд = 84.8662 deg
# Работа на окружности РК, Дж:
L_u2.твд := c_12u.твд*u_т + c_22u.твд*u_т = 245621
# КПД на окружности РК:
η_u2.твд := L_u2.твд/H_2.твд = 0.864444
# Удельные потери в СА, Дж/кг:
h_с2.твд := (φ_2.твд^-2 - 1)*c_12.твд^2/2 = 17821.1
# С учётом их использования в рабочих лопатках, Дж/кг:
h'_с2.твд := h_с2.твд*T'_22.твд/T_с12.твд = 17092.4
# Относительные потери в СА:
ξ_с2.твд := h_с2.твд/H_2.твд = 0.06272
# С учётом их использования в рабочих лопатках:
ξ'_с2.твд := ξ_с2.твд*T'_22.твд/T_с12.твд = 0.0601556
# Удельные потери в рабочих лопатках, Дж/кг:
h_л2.твд := (1/ψ_2.твд^2 - 1)*w_22.твд^2/2 = 5881.29
# Относительные потери в рабочих лопатках:
ξ_л2.твд := h_л2.твд/H_2.твд = 0.0206988
# Удельные потери с выходной скоростью, Дж/кг:
h_в2.твд := c_22.твд^2/2 = 14300
# Относительные потери с выходной скоростью:
ξ_в2.твд := h_в2.твд/H_2.твд = 0.0503279
# КПД на окружности колеса:
η_u2.твд := 1 - ξ'_с2.твд - ξ_л2.твд - ξ_в2.твд = 0.868818
# Удельные потери в радиальном зазоре, Дж/кг:
h_з2.твд := 1.37*(1 + 1.6*ρ_2.твд)*(1 + l_л2.твд/D_т.твд)*L_u2.твд*δ_rл2.твд/l_л2.твд = 4307.3
# Относительные потери в радиальном зазоре:
ξ_з2.твд := h_з2.твд/H_2.твд = 0.0151592
# Мощностной КПД ступени(КПД без учёта потерь на трение):
η'_т2.твд := η_u2.твд - ξ_з2.твд = 0.853659
# Лопаточный КПД ступени:
η'_л2.твд := η'_т2.твд + ξ_в2.твд = 0.903986
# Плотность  : | кг/м^3
ρ_ср2.твд := (ρ_с12.твд + ρ_22.твд)/2 = 1.49506
# Затраты мощности на трение, Вт:
N_т.в2.твд := (1.07*D_т.твд^2)*(u_т/100)^3*ρ_ср2.твд*10^3 = 53620.5
# Удельные потери на трение, Дж/кг:
h_т.в2.твд := N_т.в2.твд/G_г = 871.465
# Относительные потери на трение:
ξ_т.в2.твд := h_т.в2.твд/H_2.твд = 0.00306706
# Мощностной КПД:
η_т2.твд := η'_т2.твд - ξ_т.в2.твд = 0.850591
# Лопаточный КПД:
η_л2.твд := η'_л2.твд - ξ_т.в2.твд = 0.900919
# Удельная работа ступени, Дж/кг:
L_т2.твд := H_2.твд*η_т2.твд = 241684
# Температура за ступенью:
T_ст2.твд := T_22.твд + h_з2.твд/C_pг + h_т.в2.твд/C_pг = 1100.81
# Температура торможения за ступенью, К:
T_ст2.торм.твд := T_ст2.твд + h_в2.твд/C_pг = 1112.36
# Давление торможения за ступенью, Па:
P_ст2.торм.твд := P_22.твд*(T_ст2.торм.твд/T_ст2.твд)^(k_г/(k_г - 1)) = 460795
# Располагаемый теплоперепад по параметрам торможения, Дж/кг:
H_2.торм.твд := C_pг*T_02.торм.твд*(1 - (P_ст2.торм.твд/P_02.торм.твд)^((k_г - 1)/k_г)) = 270145
# КПД ступени по параметрам торможения:
η_т2.торм.твд := L_т2.твд/H_2.торм.твд = 0.894646
η_л2.твд := (L_т2.твд + h_в2.твд)/H_2.твд
# Удельные потери в СА, Дж/кг:
h_с2.твд := (φ_2.твд^-2 - 1)*c_12.твд^2/2 = 17821.1
# С учётом их использования в рабочих лопатках, Дж/кг:
h'_с2.твд := h_с2.твд*T'_22.твд/T_с12.твд = 17092.4
# Относительные потери в СА:
ξ_с2.твд := h_с2.твд/H_2.твд = 0.06272
# С учётом их использования в рабочих лопатках:
ξ'_с2.твд := ξ_с2.твд*T'_22.твд/T_с12.твд = 0.0601556
# Удельные потери в рабочих лопатках, Дж/кг:
h_л2.твд := (1/ψ_2.твд^2 - 1)*w_22.твд^2/2 = 5881.29
# Относительные потери в рабочих лопатках:
ξ_л2.твд := h_л2.твд/H_2.твд = 0.0206988
# Удельные потери с выходной скоростью, Дж/кг:
h_в2.твд := c_22.твд^2/2 = 14300
# Относительные потери с выходной скоростью:
ξ_в2.твд := h_в2.твд/H_2.твд = 0.0503279
# КПД на окружности колеса:
η_u2.твд := 1 - ξ'_с2.твд - ξ_л2.твд - ξ_в2.твд = 0.868818
# Удельные потери в радиальном зазоре, Дж/кг:
h_з2.твд := 1.37*(1 + 1.6*ρ_2.твд)*(1 + l_л2.твд/D_т.твд)*L_u2.твд*δ_rл2.твд/l_л2.твд = 4307.3
# Относительные потери в радиальном зазоре:
ξ_з2.твд := h_з2.твд/H_2.твд = 0.0151592
# Мощностной КПД ступени(КПД без учёта потерь на трение):
η'_т2.твд := η_u2.твд - ξ_з2.твд = 0.853659
# Лопаточный КПД ступени:
η'_л2.твд := η'_т2.твд + ξ_в2.твд = 0.903986
# Плотность  : | кг/м^3
ρ_ср2.твд := (ρ_с12.твд + ρ_22.твд)/2 = 1.49506
# Затраты мощности на трение, Вт:
N_т.в2.твд := (1.07*D_т.твд^2)*(u_т/100)^3*ρ_ср2.твд*10^3 = 53620.5
# Удельные потери на трение, Дж/кг:
h_т.в2.твд := N_т.в2.твд/G_г = 871.465
# Относительные потери на трение:
ξ_т.в2.твд := h_т.в2.твд/H_2.твд = 0.00306706
# Мощностной КПД:
η_т2.твд := η'_т2.твд - ξ_т.в2.твд = 0.850591
# Лопаточный КПД:
η_л2.твд := η'_л2.твд - ξ_т.в2.твд = 0.900919
# Удельная работа ступени, Дж/кг:
L_т2.твд := H_2.твд*η_т2.твд = 241684
# Температура за ступенью:
T_ст2.твд := T_22.твд + h_з2.твд/C_pг + h_т.в2.твд/C_pг = 1100.81
# Температура торможения за ступенью, К:
T_ст2.торм.твд := T_ст2.твд + h_в2.твд/C_pг = 1112.36
# Давление торможения за ступенью, Па:
P_ст2.торм.твд := P_22.твд*(T_ст2.торм.твд/T_ст2.твд)^(k_г/(k_г - 1)) = 460795
# Располагаемый теплоперепад по параметрам торможения, Дж/кг:
H_2.торм.твд := C_pг*T_02.торм.твд*(1 - (P_ст2.торм.твд/P_02.торм.твд)^((k_г - 1)/k_г)) = 270145
# КПД ступени по параметрам торможения:
η_т2.торм.твд := L_т2.твд/H_2.торм.твд = 0.894646
# Проверка соотношения КПД для второй ступени:
# КПД ступени по параметрам торможения: | Лопаточный КПД:
# Мощностной КПД: | КПД на окружности колеса:
η_т2.твд = 0.850591  # <
η_u2.твд = 0.868818  # <
η_т2.торм.твд = 0.894646  # <
η_л2.твд = 0.900919
# 2.4 Проверка коэффициентов скорости
# Сопловой аппарат первой ступени
# Уточнение коэффициента φ
η_л2.твд := (L_т2.твд + h_в2.твд)/H_2.твд
# Вход в ступень осевой,поэтому:
α_01.твд := 90 deg
(α_01.твд + α_11.твд) = 104 deg
# Коэффициент,учитывающий форму канала:
k_с1.твд := sin(β_11.твд)/sin(β_21.твд) = 1.50958
# Коэффициент потерь от трения на профиле(из графика):
ζ_с.тр1.твд := 0.018
# Угол установки профиля:
γ_с1.твд := (70 - 0.127*(α_01.твд/deg - α_11.твд/deg) + (-1)*0.0041*(α_01.твд/deg - α_11.твд/deg)^2)*deg = 36.6664 deg
# Хорда профиля, м:
b_c1.твд := b_aс1.твд/sin(γ_с1.твд) = 0.0846
# Относительная толщина профиля:
c__с.max1.твд := 0.13
# Шаг, м:
t_с1.твд := 0.45*b_c1.твд*(180 deg/(180 deg - (α_01.твд + α_11.твд))*sin(α_01.твд)/sin(α_11.твд))^(1/3)*(1 - c__с.max1.твд) = 0.0708538
# Относительная толщина выходной кромки(из таблицы):
s__с1.твд := 0.11
# Кромочные потери:
ζ_с.кр1.твд := 0.2*s__с1.твд = 0.022
# Профильные потери
ζ_с.пр1.твд := ζ_с.тр1.твд + ζ_с.кр1.твд = 0.04
# Концевые потери
ζ_с.к1.твд := 2*ζ_с.пр1.твд*t_с1.твд*sin(α_11.твд)/l_с1.твд = 0.0246762
# Суммарные потери:
ζ_с1.твд := ζ_с.пр1.твд + ζ_с.к1.твд = 0.0646762
φ_1.твд := sqrt(1 - ζ_с1.твд) = 0.967121
# Сопловой аппарат второй ступени
# Вход в ступень осевой,поэтому:
α_02.твд := 90 deg
(α_02.твд + α_12.твд) = 104.953 deg
# Коэффициент,учитывающий форму канала:
k_с2.твд := sin(β_12.твд)/sin(β_22.твд) = 1.45979
# Коэффициент потерь от трения на профиле(из графика):
ζ_с.тр2.твд := 0.018
# Угол установки профиля:
γ_с2.твд := (70 - 0.127*(α_01.твд/deg - α_11.твд/deg) + (-1)*0.0041*(α_01.твд/deg - α_11.твд/deg)^2)*deg = 36.6664 deg
# Хорда профиля, м:
b_c2.твд := b_aс2.твд/sin(γ_с2.твд) = 0.121224
# Относительная толщина профиля:
c__с.max2.твд := 0.13
# Шаг, м:
t_с2.твд := 0.45*b_c2.твд*(180 deg/(180 deg - (α_02.твд + α_12.твд))*sin(α_02.твд)/sin(α_12.твд))^(1/3)*(1 - c__с.max2.твд) = 0.0997878
# Относительная толщина выходной кромки(из таблицы):
s__с2.твд := 0.17
# Кромочные потери:
ζ_с.кр2.твд := 0.2*s__с2.твд = 0.034
# Профильные потери
ζ_с.пр2.твд := ζ_с.тр2.твд + ζ_с.кр2.твд = 0.052
# Концевые потери
ζ_с.к2.твд := 2*ζ_с.пр2.твд*t_с2.твд*sin(α_12.твд)/l_с2.твд = 0.0281873
# Суммарные потери:
ζ_с2.твд := ζ_с.пр2.твд + ζ_с.к2.твд = 0.0801873
φ_2.твд := sqrt(1 - ζ_с2.твд) = 0.959069
# Уточнение коэффициента ψ
# Рабочая лопатка первой ступени:
(β_11.твд + β_21.твд) = 54.9195 deg
k_л1.твд := sin(β_11.твд)/sin(β_21.твд) = 1.50958
# Коэффициент потерь от трения на профиле(из графика)
ζ_л.тр1.твд := 0.017
# Угол установки профиля:
γ_л1.твд := (70 - 0.127*(β_11.твд/deg - β_21.твд/deg) + (-1)*0.0041*(β_11.твд/deg - β_21.твд/deg)^2)*deg = 67.8749 deg
# Хорда профиля, м:
b_л1.твд := b_aл1.твд/sin(γ_л1.твд) = 0.0438992
# Относительная толщина профиля:
c__л.max1.твд := 0.2
# Шаг, м:
t_л1.твд := b_л1.твд*0.6*(180 deg/(180 deg - (β_11.твд + β_21.твд))*sin(β_11.твд)/sin(β_21.твд))^(1/3)*(1 - c__л.max1.твд) = 0.0272905
# Относительная толщина выходной кромки:
s__л1.твд := 0.17
# Кромочные потери:
ζ_л.кр1.твд := 0.2*s__л1.твд = 0.034
# Профильные потери:
ζ_л.пр1.твд := ζ_л.тр1.твд + ζ_л.кр1.твд = 0.051
# Концевые потери:
ζ_л.к1.твд := 2*ζ_л.пр1.твд*t_л1.твд*sin(β_21.твд)/l_л1.твд = 0.0166773
# Суммарные потери:
ζ_л1.твд := ζ_л.пр1.твд + ζ_л.к1.твд = 0.0676773
ψ_1.твд := sqrt(1 - ζ_л1.твд) = 0.965569
# Рабочая лопатка второй ступени:
(β_12.твд + β_22.твд) = 57.5314 deg
k_л2.твд := sin(β_12.твд)/sin(β_22.твд) = 1.45979
# Коэффициент потерь от трения на профиле(из графика)
ζ_л.тр2.твд := 0.017
# Угол установки профиля:
γ_л2.твд := (70 - 0.127*(β_12.твд/deg - β_22.твд/deg) + 0.0041*(β_12.твд/deg - β_22.твд/deg)^2)*deg = 69.0748 deg
# Хорда профиля, м:
b_л2.твд := b_aл2.твд/sin(γ_л2.твд) = 0.064584
# Относительная толщина профиля:
c__л.max2.твд := 0.11
# Шаг, м:
t_л2.твд := b_л2.твд*0.6*(180 deg/(180 deg - (β_12.твд + β_22.твд))*sin(β_12.твд)/sin(β_22.твд))^(1/3)*(1 - c__л.max2.твд) = 0.0444815
# Относительная толщина выходной кромки:
s__л2.твд := 0.1
# Кромочные потери:
ζ_л.кр2.твд := 0.2*s__л2.твд = 0.02
# Профильные потери:
ζ_л.пр2.твд := ζ_л.тр2.твд + ζ_л.кр2.твд = 0.037
# Концевые потери:
ζ_л.к2.твд := 2*ζ_л.пр2.твд*t_л2.твд*sin(β_22.твд)/l_л2.твд = 0.0117992
# Суммарные потери:
ζ_л2.твд := ζ_л.пр2.твд + ζ_л.к2.твд = 0.0487992
ψ_2.твд := sqrt(1 - ζ_л2.твд) = 0.975295
# Распределение степени реактивности по радиусу для ступени
# Основные размеры ступени:
r_ср := 0.5*D_т.твд = 0.385473  # м
# Втулочный и периерийный радиусы СА: | Втулочный и периферийный радиусы РК:
r_с1вт := r_ср - 0.5*l_с1.твд = 0.357688  # м
r_р1вт := r_ср - 0.5*l_л1.твд = 0.354973  # м
r_с1п := r_ср + 0.5*l_с1.твд = 0.413259  # м
r_р1п := r_ср + 0.5*l_л1.твд = 0.415973  # м
# Распределение давления по радиусу
P_ст(r) := P_с1.твд*(1 + (k_г - 1)/2*c_11u.твд^2/(k_г*R_г*T'_с1.твд)*(1 - ((r_ср/r)^(cos(α_11.твд)^2))^2))^(k_г/(k_г - 1))
P_ст(r_ср) = 1152666  # Па
# Степень реактивности
ρ_1(r) := 1 - (1 - ρ_1.твд)*(r_ср/r)^(2*cos(α_11.твд)^2)
ρ_1(r_с1п) = 0.324581
ρ_1(r_ср) = 0.23
ρ_1(r_р1вт) = 0.100714
# 2.5.Профилирование ступени
# Закон профилирования
α_1 == const
# Окружная скорость за СА: | Осевая скорость за СА:
c_1u(r) := c_11u.твд*(r_ср/r)^(cos(α_11.твд)^2)
c_1a(r) := c_11a.твд*(r_ср/r)^(cos(α_11.твд)^2)
c_1a(r_с1вт) = 164.653  # м/с
c_1u(r_с1вт) = 660.387  # м/с
c_1a(r_ср) = 153.455  # м/с
c_1u(r_ср) = 615.474  # м/с
c_1a(r_с1п) = 143.722  # м/с
c_1u(r_с1п) = 576.436  # м/с
# Полная скорость за СА:
c_1(r) := c_11.твд*(r_ср/r)^(cos(α_11.твд)^2)
c_1(r_с1вт) = 680.604  # м/с
c_1(r_ср) = 634.316  # м/с
c_1(r_с1п) = 594.083  # м/с
# Угол в абсолютном движении за СА | Угол в абсолютном движении перед СА:
α_11.твд = 14 deg
α_0(r) := 90 deg
# Угол установки профиля СА
γ_с1(r) :=
    ((70 - 0.127*(α_0(r)/deg - α_11.твд/deg) + (-1)*0.0041*(α_0(r)/deg - α_11.твд/deg)^2)*deg) if α_0(r) ≥ 0
    ((70 - 0.127*((π + α_0(r))/deg - α_11.твд/deg) + (-1)*0.0041*((π + α_0(r))/deg - α_11.твд/deg)^2)*deg) if α_0(r) < 0
γ_с1(r_с1вт) = 36.6664 deg
γ_с1(r_ср) = 36.6664 deg
γ_с1(r_с1п) = 36.6664 deg
# Окружная скорость:
u(r) := u_т*r/r_ср
u(r_с1вт) = 355.841  # м/с
u(r_ср) = 383.484  # м/с
u(r_с1п) = 411.126  # м/с
# Угол выхода потока из СА в относительном движении
β_1(r) := atan(c_1a(r)/(c_1(r)*cos(α_11.твд) - u(r)))
β_1(r) :=
    atan(c_1a(r)/(c_1(r)*cos(α_11.твд) - u(r))) if c_1(r)*cos(α_11.твд) - u(r) > 0
    180 deg + atan(c_1a(r)/(c_1(r)*cos(α_11.твд) - u(r))) if c_1(r)*cos(α_11.твд) - u(r) < 0
β_1(r_с1вт) = 28.3979 deg
β_1(r_ср) = 33.4835 deg
β_1(r_с1п) = 41.0039 deg
# Окружная скорость на выходе из РК
L_u1.твд = 245177  # Дж/кг
c_2u(r) := L_u1.твд/u(r) - c_1u(r)
c_2u(r_р1вт) = 29.1337  # м/с
c_2u(r_ср) = 23.8665  # м/с
c_2u(r_р1п) = 19.569  # м/с
# Относительная скорость за СА:
w_1(r) := sqrt(c_1(r)^2 + u(r)^2 - 2*c_1(r)*u(r)*cos(α_11.твд))
w_1(r_с1вт) = 346.206  # м/с
w_1(r_ср) = 278.151  # м/с
w_1(r_с1п) = 219.051  # м/с
# Относительная скорость за РК:
H_рк(r) := ρ_1(r)*H_1.твд*T_с1.твд/T'_с1.твд
w_2(r) := ψ_1.твд*sqrt(w_1(r)^2 + 2*H_рк(r))
w_2(r_р1вт) = 411.03  # м/с
w_2(r_ср) = 438.334  # м/с
w_2(r_р1п) = 465.063  # м/с
# Окружная составляющая относительной скорости за РК:
w_2u(r) := c_2u(r) + u(r)
w_2u(r_р1вт) = 382.275  # м/с
w_2u(r_ср) = 407.35  # м/с
w_2u(r_р1п) = 433.395  # м/с
# Осевая составляющая относительной скорости за РК:
w_2a(r) := sqrt(w_2(r)^2 - w_2u(r)^2)
w_2a(r_р1вт) = 151.034  # м/с
w_2a(r_ср) = 161.873  # м/с
w_2a(r_р1п) = 168.677  # м/с
# Осевая составляющая абсолютной скорости за РК:
c_2a(r) := w_2a(r)
# Полная абсолютная скорость за РК:
c_2(r) := sqrt(c_2a(r)^2 + c_2u(r)^2)
c_2(r_р1вт) = 153.819  # м/с
c_2(r_ср) = 163.623  # м/с
c_2(r_р1п) = 169.809  # м/с
# Угол выхода потока из РК в относительном движении:
β_2(r) := atan(w_2a(r)/w_2u(r))
β_2(r_р1вт) = 21.5587 deg
β_2(r_ср) = 21.6719 deg
β_2(r_р1п) = 21.266 deg
# Угол установки профиля лопатки РК:
γ_рк1(r) :=
    ((70 - 0.127*(β_1(r)/deg - β_2(r)/deg) + (-1)*0.0041*(β_1(r)/deg - β_2(r)/deg)^2)*deg) if β_1(r) ≥ 0
    ((70 - 0.127*((π + β_1(r))/deg - β_2(r)/deg) + (-1)*0.0041*((π + β_1(r))/deg - β_2(r)/deg)^2)*deg) if β_1(r) < 0
γ_рк1(r_р1вт) = 69.0132 deg
γ_рк1(r_ср) = 67.9279 deg
γ_рк1(r_р1п) = 65.627 deg
# Угол выхода потока из РК в абсолютном движении:
α_21(r) := atan(c_2a(r)/c_2u(r))
α_21(r) :=
    atan(c_2a(r)/c_2u(r)) if c_2u(r) > 0
    90 deg + atan(c_2a(r)/c_2u(r)) if c_2u(r) < 0
α_21(r_р1вт) = 79.082 deg
α_21(r_ср) = 81.6127 deg
α_21(r_р1п) = 83.3824 deg
# Угол в абсолютном движении перед СА
α_0(r) := α_21(r)
# Окружная скорость:
u(r) := u_т*r/r_ср
u(r_р1вт) = 353.141  # м/с
u(r_ср) = 383.484  # м/с
u(r_р1п) = 413.826  # м/с
t_с1.твд = 0.0708538
# Число лопаток в СА:
t_л1.твд = 0.0272905
z_с := π*D_т.твд/t_с1.твд = 34.1831
z_с := 35
# Число лопаток в РК:
z_рк := π*D_т.твд/t_л1.твд = 88.7488
z_рк := 68
# Пересчитаю шаг решетки СА и РК:
t_свт := π*2*r_с1вт/z_с = 0.064212  # м
t_ср := π*2*r_ср/z_с = 0.0692  # м
t_сп := π*2*r_с1п/z_с = 0.0741881  # м
t_рвт := π*2*r_р1вт/z_рк = 0.0327995  # м
t_рк := π*2*r_ср/z_рк = 0.0356177  # м
t_рп := π*2*r_р1п/z_рк = 0.0384359  # м
# СА втулочное сечение | СА среднее сечение | СА периферийное сечение
# Ширина лопаток:, м:
b_aс1.твд.вт := 0.051  # м
b_aс1.твд = 0.0505193  # м
b_aс1.твд.п := 0.051  # м
# Хорда, м:
b_c1.твд = 0.0846
# Угол входа:
α_0 := 90 deg
α_0 = 90 deg
α_0 = 90 deg
# Угол выхода:
α_11.твд = 14 deg
α_11.твд = 14 deg
α_11.твд = 14 deg
# Шаг, м:
t_свт = 0.064212  # м
t_ср = 0.0692  # м
t_сп = 0.0741881  # м
# Радиус скругления входной кромки, м:
r_1CA.вт := 0.045*b_aс1.твд = 0.00227337
r_1CA := 0.04*b_aс1.твд = 0.00202077
d_1CA.вт := 2*r_1CA = 0.00404154
d_1CA := 2*r_1CA = 0.00404154
# Горло
a_c.вт := t_свт*sin(α_11.твд) = 0.0155343
a_c.п := t_сп*sin(α_11.твд) = 0.0179477
a_c.ср := t_ср*sin(α_11.твд) = 0.016741
C_maxc1 := c__л.max1.твд*46.9 = 9.38
# РК втулочное сечение | РК среднее сечение | РК периферийное сечение
# Хорда, м:
b_л1.твд = 0.0438992  # м
# Ширина лопаток:, м:
b_aл1.твд = 0.0406667  # м
b_aл1.твд.вт := b_л1.твд*sin(γ_рк1(r_р1вт)) = 0.0409871  # м
b_aл1.твд.п := b_л1.твд*sin(γ_рк1(r_р1п)) = 0.0399869  # м
# Угол входа в относительном движении:
β_1(r_с1вт) = 28.3979 deg
β_1(r_ср) = 33.4835 deg
β_1(r_с1п) = 41.0039 deg
# Угол выхода в относительном движении:
β_2(r_р1вт) = 21.5587 deg
β_2(r_ср) = 21.6719 deg
β_2(r_р1п) = 21.266 deg
# Шаг, м:
t_рвт = 0.0327995  # м
t_рк = 0.0356177  # м
t_рп = 0.0384359  # м
# Радиус скругления входной кромки, м:
r_1RK.вт := 0.06*b_aл1.твд = 0.00244
r_1RK := 0.03*b_aл1.твд = 0.00122
d_1RK.вт := 2*r_1RK.вт = 0.00488
d_1RK := 2*r_1RK = 0.00244
# Горло
a_рк.к := t_рвт*sin(β_2(r_р1вт)) = 0.0120523
a_рк.п := t_рп*sin(β_2(r_р1п)) = 0.0139406
a_рк.ср := t_рк*sin(β_2(r_ср)) = 0.0131533
# Результаты профилирования:
c_1a(r_с1вт) = 164.653  # м/c
c_1u(r_с1вт) = 660.387  # м/c
c_1(r_с1вт) = 680.604  # м/c
c_1a(r_ср) = 153.455  # м/c
c_1u(r_ср) = 615.474  # м/c
c_1(r_ср) = 634.316  # м/c
c_1a(r_р1п) = 142.838  # м/c
c_1u(r_р1п) = 572.894  # м/c
c_1(r_р1п) = 590.432  # м/c
w_2a(r_с1вт) = 152.213  # м/с
c_2u(r_с1вт) = 28.6183  # м/c
c_2(r_с1вт) = 154.879  # м/с
w_2a(r_ср) = 161.873  # м/с
c_2u(r_ср) = 23.8665  # м/c
c_2(r_ср) = 163.623  # м/с
w_2a(r_р1п) = 168.677  # м/с
c_2u(r_р1п) = 19.569  # м/c
c_2(r_р1п) = 169.809  # м/с
β_1(r_с1вт) = 28.3979 deg
w_1(r_с1вт) = 346.206  # м/с
β_1(r_ср) = 33.4835 deg
α_11.твд = 14 deg
w_1(r_ср) = 278.151  # м/с
β_1(r_р1п) = 41.923 deg
w_1(r_р1п) = 213.788  # м/с
β_2(r_с1вт) = 21.5993 deg
α_21(r_с1вт) = 79.3518 deg
w_2u(r_с1вт) = 384.46  # м/с
β_2(r_ср) = 21.6719 deg
α_21(r_ср) = 81.6127 deg
w_2u(r_ср) = 407.35  # м/с
β_2(r_р1п) = 21.266 deg
α_21(r_р1п) = 83.3824 deg
w_2u(r_р1п) = 433.395  # м/с
w_2(r_с1вт) = 413.495  # м/с
u(r_с1вт) = 355.841
м/с
w_2(r_ср) = 438.334  # м/с
u(r_ср) = 383.484
м/с
u(r_р1п) = 413.826
w_2(r_р1п) = 465.063  # м/с
м/с
# Расчёт на прочность пера лопатки
# Материал лопатки ЖС32-ВНК | (высокоградиентная направленная кристаллизация)
# Плотность материала лопатки:
ρ := 8800  # кг/м^3
# Частота вращения ротора:
n_т.max.твд = 9500
ω := 2*π*n_т.max.твд/60 explicit, ALL → 2*π*9500/60 = 994.838  # c^-1  # - круговая частота вращения ротора
# На лопатку действует три вида нагружений:
#
# 1. Растяжение от инерционных сил
#
# 2. Изгиб от сил инерции (в нашем случае равен нулю, так как лопатка спроектирована без выносов)
#
# 3. Изгиб от аэродинамических сил
# Найдем напряжения растяжения в лопатке от сил инерции.
#
# Лопатку разделили на 3 части - втулочное, среднее и корневое сечение.Найдены значения площадей этих сечений. Значения площадей сечений не подчиняются определенному закону. Проводим численное интегрирование в формулах для вычислений нормальной растягивающей силы в поперечных сечениях.
# Найдем площади расчетных сечений лопатки с помощью программы AutoCAD:
F_пер := 278.499917*10^-6 explicit, ALL → 278.5*10^-6 = 0.0002785  # м^2
F_ср := 410.279672*10^-6 explicit, ALL → 410.28*10^-6 = 0.00041028  # м^2
F_вт := 558.157958*10^-6 explicit, ALL → 558.158*10^-6 = 0.000558158  # м^2
R_пер := r_р1п = 0.415973  # м
R_ср := r_ср = 0.385473  # м
R_вт := r_р1вт = 0.354973  # м
# Зададим распределение площадей плавной кривой:
Given
a := 1
b := 1
c := 2
a + b*R_вт^c == F_вт
a + b*R_ср^c == F_ср
a + b*R_пер^c == F_пер
[a; b; c] := Find([a; b; c]) = [0.62243; -0.623702; 0.00283587]
F(z) := a + b*z^c
z := 0, 0.001 .. R_пер
# Растягивающее усилие:
N(z) := ρ*ω^2*integral(z_1*F(z_1), z_1 = z .. R_пер)
σ_р(z) := N(z)/F(z)
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м
Па
σ_р(R_вт) = 150692153  # Па
# Изгибающие моменты от аэродинамических сил:
# Давление перед рабочим колесом: | Давление за рабочим колесом:
P_1(r) := P_ст(r)
P_2 := P_ст1.торм.твд = 1007180  # Па
# Температура перед РК: | Температура за РК:
T_1 := T_с1.твд = 1337.46  # К
T_2 := T_21.твд = 1291.34  # К
# Плотность газа перед рабочей лопаткой | Плотность газа за рабочей лопаткой:
ρ_2 := P_2/(R_г*T_2) = 2.69598  # кг/м^3
ρ_1(r) := P_1(r)/(R_г*T_1)
# Количество лопаток:
m := 68
C_1a := [143.722; 153.455; 164.653]
C_2a := [168.677; 161.873; 151.034]
C_1u := [576.436; 615.474; 660.387]
C_2u := [19.569; 23.867; 29.134]
z := 10^-3*[416; 3855; 355]  # м
u := [411.126; 383.484; 355.841]
q_x :=
    for i ∈ 0 .. 2
        q_x[i] ← (-P_2 + P_1(z[i]))*2*π*z[i]/m + 2*π*z[i]/m*(C_1a[i]^2*ρ_1(z[i]) - C_2a[i]^2*ρ_2)
    q_x
    = [8165.44; 306782; 2161.09]  # Н/м
ORIGIN := 0
q_y :=
    for i ∈ 0 .. 2
        q_y[i] ← 2*π*z[i]/m*(C_1a[i]*ρ_1(z[i])*(C_1u[i] - u[i]) + (-1)*C_2a[i]*ρ_2*(C_2u[i] - u[i]))
    q_y
    = [9748.92; 115806; 8870.89]  # Н/м
vz := stack(0.355, 0.3855, 0.416)
vq_x := stack(2.527*10^3, 5.108*10^3, 8.165*10^3)
vs1 := lspline(vz, vq_x)
q_x(z) := interp(vs1, vz, vq_x, z)
vz := stack(0.355, 0.3855, 0.416)
vq_y := stack(8.988*10^3, 9.351*10^3, 9.749*10^3)
vs := lspline(vz, vq_y)
q_y(z) := interp(vs, vz, vq_y, z)
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# м | м
# Н/м | Н/м
M_ξq(z) := -(z*integral(q_y(z_1), z_1 = z .. R_пер) - integral(z_1*q_y(z_1), z_1 = z .. R_пер))
M_ξq(R_вт) = 17.6451  # Н*м
φ_В := 25.06
M_ηq(z) := (integral(z_1*q_x(z_1), z_1 = z .. R_пер) - z*integral(q_x(z_1), z_1 = z .. R_пер))
M_ηq(R_вт) = 11.4129  # Н*м
M_u := M_ξq(R_вт)*cos(φ_В*deg) + M_ηq(R_вт)*sin(φ_В*deg) = 20.8182  # Н*м
M_v := -M_ξq(R_вт)*sin(φ_В*deg) + M_ηq(R_вт)*cos(φ_В*deg) = 2.86469  # Н*м
I_u.В := 24554.933848*10^-12 = 2.45549e-8  # м^4
I_v.В := 67718.651156*10^-12 = 6.77187e-8  # м^4
# Определим положение нейтральной оси:
β := atan(M_v*I_u.В/(M_u*I_v.В))*1/deg = 2.85646
# Точка А | Точка B
v_A := 17.8255*10^-3  # м
v_B := 12.1328*10^-3  # м
u_A := -11.9784*10^-3  # м
u_B := 26.9949*10^-3  # м
σ_A := M_u*v_A/I_u.В - M_v*u_A/I_v.В = 15619564  # Па
σ_B := M_u*v_B/I_u.В - M_v*u_B/I_v.В = 9144488  # Па
# Точка С
v_C := -12.88*10^-3  # м
u_C := -1.3852*10^-3  # м
σ_C := M_u*v_C/I_u.В - M_v*u_C/I_v.В = -10861344  # Па
# Наиболее опасная точка A
σ_Σ := σ_р(R_вт) + σ_A = 166311717  # Па
σ_р(R_вт) = 150692153  # Па
# В качестве критерия работоспособности выберем длительную прочность при температуре 1173 К  (900 С) на 100 000 часов
σ_T := 163*10^6  # Па
σ_T/σ_Σ explicit, ALL → 163*10^6/(1.663*10^8) = 0.980087
# ПРИЛОЖЕНИЕ 1
# ЖС32-ВНК (высокоградиентная направленная кристаллизация)
τ := 500  # ч
C_0 := 20
PLM(t) := (t + 273.15)*(log(τ) + C_0)
t := stack(700, 800, 900, 1000, 1100, 1150)
P := PLM(t)
σ := stack(830, 615, 393, 190, 88, 52)
P = [22089.5; 24359.4; 26629.3; 28899.2; 31169.1; 32304]
vs := cspline(P, σ)
σ1(P1) := interp(vs, P, σ, P1)
σ1(P1) :=
    σ[0] if P1 < P[0]
    σ1(P1) otherwise
P1 := 22000, 23000 .. 33000
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t_mat := stack(700, 750, 800, 850, 880, 900)
τ := 100000  # ч
C_0 := 20
PLM(t) := (t + 273.15)*(log(τ) + C_0)
PLM(t_mat) = [24328.8; 25578.8; 26828.8; 28078.8; 28828.8; 29328.8]
vectorize(σ1(PLM(t_mat))) = [617.95; 496.61; 373.179; 254.365; 194.869; 163.258]
Table_output := stack(transpose(t_mat), transpose(PLM(t_mat)), transpose(vectorize(σ1(PLM(t_mat)))))
Table_output = [
    700, 750, 800, 850, 880, 900;
    24328.8, 25578.8, 26828.8, 28078.8, 28828.8, 29328.8;
    617.95, 496.61, 373.179, 254.365, 194.869, 163.258
]
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# σ, МПа
# P
