# Исходные данные:
# Температура газа перед турбиной
T*_г := 1423  # К
# Мощность энергоустановки
N_е := 35*10^6  # Вт
# Температура воздуха
T*_а := 288  # К
T_0 := 288  # К
# Степень регенерации
σ := 0.85
# Давление окружающей среды
P_а := 1.013*10^5  # Па
# Рабочее тело
# Воздух
R_в := 287.4
# Коэффициент полного давления при входе:
σ_вх := 0.99
# КПД компрессора:
ηк1пол := 0.91
ηк2пол := 0.9
# Коэффициент полноты горения:
η_г := 0.99
# Коэффициент сохранения полного давления в камере сгорания:
σ_г := 0.97
# КПД турбины по параметрам торможения:
η*_т := 0.9
# Лопаточный КПД турбины:
η_л := 0.92
# Механический КПД:
η_м := 0.99
# Коэффициент давления на выходе:
σ_вых := 0.99
# Гидравлические потери в регенераторе по воздушной стороне  и в газоохладителе:
σ_рк := 0.98
σ_х := 0.97
# Гидравлические потери в регенераторе по газовой стороне:
σ_рт := 0.97
# Низшая теплота сгорания топлива ( природный газ Ленинградский):
Qp_н := 47.790*10^6  # Дж/кг
L_0 := 15.96
# 2.2 Параметры газа по тракту ГТУ
# 2.2.1 Параметры при входе
# Давление воздуха окружающей среды:
P*_а := 1.013*10^5  # Па
# Температура окружающей среды:
T_a := 288  # К
# Температура на входе в компрессор:
T*_в := T*_а
T*_в = 288  # К
# Давление на входе в компрессор:
P*_в := P*_а*σ_вх
P*_в = 100287  # Па
T_х := 305  # К
# 2.2.2 Параметры компрессора
ν < π_кΣ.торм < ν^2.4
# ,где
ν := T*_г/T*_а  # ,тогда
ν = 4.94097
ν^2.4 = 46.2541
i := 0 .. 15
π_кΣ.торм := transpose([2.5, 4, 5.5, 7, 8.5, 10, 11.5, 13, 14.5, 16, 17.5, 19, 20.5, 22, 23.5, 25])
transpose(π_кΣ.торм) = [2.5, 4, 5.5, 7, 8.5, 10, 11.5, 13, 14.5, 16, 17.5, 19, 20.5, 22, 23.5, 25]
# Для выбранных значений π*_k находим параметры за компрессором:
# Давление за  компрессором:
P*_к := P*_в*π_кΣ.торм
# Показатель адиабаты воздуха в первом приблежении:
k := 1.4
# Расчёт компрессора
# Связь адиабатного и политропного кпд
η_к1.торм[i] := (sqrt(π_кΣ.торм[i])^((k - 1)/k) - 1)/(sqrt(π_кΣ.торм[i])^((k - 1)/(k*ηк1пол)) - 1)
η_к1.торм = [0.903995; 0.900826; 0.898646; 0.896977; 0.895623; 0.894482; 0.893495; 0.892625; 0.891847; 0.891143; 0.8905; 0.889908; 0.88936; 0.888849; 0.888371; 0.887922]
η_к2.торм[i] := (sqrt(π_кΣ.торм[i])^((k - 1)/k) - 1)/(sqrt(π_кΣ.торм[i])^((k - 1)/(k*ηк2пол)) - 1)
η_к2.торм = [0.893329; 0.889811; 0.887391; 0.885539; 0.884036; 0.88277; 0.881675; 0.880711; 0.879848; 0.879067; 0.878354; 0.877698; 0.87709; 0.876524; 0.875994; 0.875495]
# Температура за первым компрессором в первом приближении, К
T_к1.торм[i] := T*_а*(1 + (sqrt(π_кΣ.торм[i])^((k - 1)/k) - 1)/η_к1.торм[i])
T_к1.торм = [332.555; 358.02; 376.373; 390.896; 402.994; 413.408; 422.578; 430.79; 438.239; 445.064; 451.369; 457.234; 462.721; 467.879; 472.749; 477.364]
# Температура за вторым компрессором в первом приближении, К
T_к2.торм[i] := T_х*(1 + (sqrt(π_кΣ.торм[i])^((k - 1)/k) - 1)/η_к2.торм[i])
T_к2.торм = [352.748; 380.071; 399.777; 415.377; 428.378; 439.572; 449.433; 458.265; 466.277; 473.62; 480.405; 486.717; 492.623; 498.176; 503.419; 508.388]
# Значения теплоёмкостей будем вычислять по формуле, аппроксимирующей графики
# зависимости теплоёмкости от температуры:
# при α=10000 формула принимает следующий вид:
C_p(T) :=
    (0.2407 + 0.0193*(2.5*10^-3*T - 0.875) + 2.0*10^-3*(2.5*10^-5*T^2 - 0.0275*T + 6.5625))*4187 if T < 750
    (0.26 + 0.032*(1.176*10^-3*T - 0.88235) - 0.374*10^-2*(5.5556*10^-6*T^2 - 1.3056*10^-2*T + 6.67))*4187 if T ≥ 750
C_pв1[i] := C_p((T_к1.торм[i] + T_a)/2)
transpose(C_pв1) = [1003.44, 1004.77, 1005.77, 1006.59, 1007.28, 1007.89, 1008.44, 1008.94, 1009.4, 1009.82, 1010.22, 1010.59, 1010.95, 1011.28, 1011.6, 1011.9]
k1[i] := C_pв1[i]/(C_pв1[i] - R_в)
transpose(k1) = [1.40137, 1.40063, 1.40007, 1.39962, 1.39923, 1.39889, 1.39859, 1.39831, 1.39806, 1.39783, 1.39761, 1.3974, 1.39721, 1.39703, 1.39685, 1.39669]
C_pв2[i] := C_p((T_к2.торм[i] + T_х)/2)
transpose(C_pв2) = [1005.41, 1006.94, 1008.09, 1009.04, 1009.84, 1010.55, 1011.19, 1011.76, 1012.29, 1012.78, 1013.24, 1013.68, 1014.08, 1014.47, 1014.84, 1015.19]
k2[i] := C_pв2[i]/(C_pв2[i] - R_в)
transpose(k2) = [1.40028, 1.39942, 1.39878, 1.39826, 1.39782, 1.39743, 1.39708, 1.39676, 1.39647, 1.3962, 1.39595, 1.39572, 1.3955, 1.39529, 1.39509, 1.39489]
π_к1L.торм[i] := sqrt(π_кΣ.торм[i]^((k1[i] - 1)/k1[i])*C_pв1[i]*η_к2.торм[i]*T_a/(C_pв2[i]*η_к1.торм[i]*T_х)/σ_х^((k1[i] - 1)/k1[i]))^(k1[i]/(k1[i] - 1))
π_к1L.торм = [1.41783; 1.79114; 2.09837; 2.36557; 2.60516; 2.82422; 3.02726; 3.21732; 3.3966; 3.56675; 3.72902; 3.88441; 4.03372; 4.17761; 4.31662; 4.45122]
π_к2L.торм[i] := sqrt(π_кΣ.торм[i]^((k2[i] - 1)/k2[i])/(σ_х^((k2[i] - 1)/k2[i])*C_pв1[i]*η_к2.торм[i]*T_a/(C_pв2[i]*η_к1.торм[i]*T_х)))^(k2[i]/(k2[i] - 1))
π_к2L.торм = [1.81824; 2.30291; 2.70294; 3.05159; 3.36476; 3.65154; 3.91768; 4.1671; 4.40263; 4.62638; 4.83995; 5.04463; 5.24146; 5.43129; 5.6148; 5.79261]
# Для второго приближения
# Связь адиабатного и политропного кпд
η_к1.торм[i] := (π_к1L.торм[i]^((k1[i] - 1)/k1[i]) - 1)/(π_к1L.торм[i]^((k1[i] - 1)/(k1[i]*ηк1пол)) - 1)
η_к1.торм = [0.905433; 0.902312; 0.90017; 0.898535; 0.89721; 0.896096; 0.895134; 0.894288; 0.893532; 0.892849; 0.892226; 0.891653; 0.891123; 0.890629; 0.890167; 0.889734]
η_к2.торм[i] := (π_к2L.торм[i]^((k2[i] - 1)/k2[i]) - 1)/(π_к2L.торм[i]^((k2[i] - 1)/(k2[i]*ηк2пол)) - 1)
η_к2.торм = [0.891241; 0.887682; 0.885243; 0.88338; 0.881872; 0.880605; 0.87951; 0.878548; 0.877688; 0.876911; 0.876203; 0.875552; 0.874949; 0.874389; 0.873864; 0.873372]
# Температура за первым компрессором в первом приближении, К
T_к1.торм[i] := T_a*(1 + (π_к1L.торм[i]^((k1[i] - 1)/k1[i]) - 1)/η_к1.торм[i])
T_к1.торм = [321.451; 345.905; 363.469; 377.327; 388.842; 398.733; 407.425; 415.194; 422.229; 428.664; 434.6; 440.113; 445.264; 450.1; 454.66; 458.975]
# Температура за вторым компрессором в первом приближении, К
T_к2.торм[i] := T_х*(1 + (π_к2L.торм[i]^((k2[i] - 1)/k2[i]) - 1)/η_к2.торм[i])
T_к2.торм = [368.782; 397.365; 417.919; 434.149; 447.645; 459.242; 469.439; 478.556; 486.814; 494.37; 501.342; 507.819; 513.871; 519.555; 524.915; 529.988]
# Давление за вторым компрессором, Па:
P_к.вых.торм[i] := σ_вх*σ_х*P_а*π_кΣ.торм[i]
P_к.вых.торм = [243196; 389114; 535031; 680949; 826866; 972784; 1118701; 1264619; 1410537; 1556454; 1702372; 1848289; 1994207; 2140125; 2286042; 2431960]
# Истинная теплоемкость, Дж/кг*К:
C_pв1[i] := C_p((T_к1.торм[i] + T_a)/2)
C_pв2[i] := C_p((T_к2.торм[i] + T_х)/2)
C_pв2 = [1006.3; 1007.95; 1009.19; 1010.21; 1011.07; 1011.83; 1012.5; 1013.12; 1013.68; 1014.2; 1014.69; 1015.15; 1015.58; 1015.99; 1016.38; 1016.75]
C_pв1 = [1002.88; 1004.13; 1005.06; 1005.82; 1006.47; 1007.04; 1007.54; 1008; 1008.42; 1008.81; 1009.17; 1009.51; 1009.84; 1010.14; 1010.43; 1010.7]
# Удельная работа компрессоров, Дж/кг
L_к1[i] := C_pв1[i]*(T_к1.торм[i] - T_a)
L_к2[i] := C_pв2[i]*(T_к2.торм[i] - T_х)
L_к2 = [64183.1; 93099.6; 113957; 130468; 144224; 156066; 166495; 175833; 184301; 192060; 199226; 205892; 212126; 217985; 223516; 228756]
L_к1 = [33547.3; 58144.3; 75851.1; 89846.8; 101495; 111512; 120326; 128212; 135359; 141903; 147945; 153561; 158811; 163744; 168398; 172806]
# Суммарная удельная работа компрессоров, Дж/кг
L_кΣ[i] := L_к1[i] + L_к2[i]
L_кΣ = [97730.4; 151244; 189808; 220314; 245719; 267578; 286820; 304044; 319660; 333963; 347171; 359452; 370937; 381729; 391914; 401562]
# Расчет турбины:
# Давление газа перед турбиной, Па
P_г.торм[i] := σ_г*σ_рк*P_к.вых.торм[i]
P_г.торм = [231182; 369891; 508601; 647310; 786019; 924728; 1063438; 1202147; 1340856; 1479565; 1618275; 1756984; 1895693; 2034402; 2173112; 2311821]
# Давление за силовой турбиной , Па
# В первом приближении примем
P_т.торм := P_а/(σ_вых*σ_рт) = 105488
k_г := 1.33
R_г := 289.3  # Дж/(кг*К)
# Теплоемкость, Дж/кг*К:
C_pг := k_г*R_г/(k_г - 1) = 1165.97
# Степень понижения давления в турбине:
π_т[i] := P_г.торм[i]/P_т.торм
transpose(π_т) = [2.19155, 3.50648, 4.82141, 6.13634, 7.45128, 8.76621, 10.0811, 11.3961, 12.711, 14.0259, 15.3409, 16.6558, 17.9707, 19.2857, 20.6006, 21.9155]
# Температура за турбиной , К
T_т[i] := T*_г*(1 - (1 - π_т[i]^((1 - k_г)/k_г))*η_л)
transpose(T_т) = [1191.41, 1072.8, 999.941, 948.475, 909.22, 877.785, 851.747, 829.638, 810.504, 793.694, 778.745, 765.315, 753.147, 742.043, 731.846, 722.43]
α := [2.2; 2.4; 2.5; 2.5; 2.6; 2.7; 2.75; 2.8; 2.85; 2.9; 3; 3; 3.1; 3.2; 3.25; 3.3]
T_ср := (T*_г + T_т)/2
transpose(α) = [2.2, 2.4, 2.5, 2.5, 2.6, 2.7, 2.75, 2.8, 2.85, 2.9, 3, 3, 3.1, 3.2, 3.25, 3.3]
# Теплоёмкость для продуктов сгорания в зависимости от величины a и температуры,
# Дж/кг*К:
# :
C_p(T, α) :=
    ((0.0174/α + 0.2407) + (0.0093/α + 0.0193)*(2.5*10^-3*T - 0.875) + (2.0*10^-3 - 1.056*10^-3/(α - 0.2))*(2.5*10^-5*T^2 - 0.0275*T + 6.5625))*4187 if T < 750
    ((0.0267/α + 0.26) + (0.0133/α + 0.032)*(1.176*10^-3*T - 0.88235) - (0.94*10^-2/(α^2 + 10) + 0.374*10^-2)*(5.5556*10^-6*T^2 - 1.3056*10^-2*T + 6.67))*4187 if T ≥ 750
C_pг1[i] := C_p(T_ср[i], α[i])
# Во втором приближении:
R_г := 289.3  # Дж/(кг*К)
k_г[i] := C_pг1[i]/(C_pг1[i] - R_г)
C_pг1 = [1260.31; 1244.81; 1236.04; 1231.43; 1225.62; 1220.66; 1217.25; 1214.23; 1211.51; 1209.04; 1205.98; 1204.67; 1201.97; 1199.48; 1197.81; 1196.23]
transpose(k_г) = [1.29794, 1.30277, 1.30557, 1.30707, 1.30898, 1.31062, 1.31176, 1.31278, 1.3137, 1.31455, 1.3156, 1.31605, 1.31698, 1.31785, 1.31843, 1.31899]
# Температура за турбиной , К
T_т[i] := T*_г*(1 - (1 - π_т[i]^((1 - k_г[i])/k_г[i]))*η_л)
transpose(T_т) = [1207.23, 1091.89, 1019.77, 968.69, 928.747, 896.445, 869.788, 847.023, 827.223, 809.751, 793.858, 780.086, 767.023, 755.064, 744.301, 734.339]
# Средняя температура в процессе расширения, К
T_ср[i] := (T_т[i] + T*_г)/2
transpose(T_ср) = [1315.11, 1257.45, 1221.38, 1195.84, 1175.87, 1159.72, 1146.39, 1135.01, 1125.11, 1116.38, 1108.43, 1101.54, 1095.01, 1089.03, 1083.65, 1078.67]
C_pг1[i] := C_p(T_ср[i], α[i])
k_г[i] := C_pг1[i]/(C_pг1[i] - R_г)
C_pг1 = [1261.57; 1246.43; 1237.78; 1233.26; 1227.41; 1222.39; 1218.95; 1215.88; 1213.11; 1210.58; 1207.44; 1206.11; 1203.33; 1200.75; 1199.03; 1197.4]
transpose(k_г) = [1.29755, 1.30226, 1.30501, 1.30647, 1.30839, 1.31005, 1.31119, 1.31222, 1.31316, 1.31402, 1.3151, 1.31555, 1.31651, 1.31741, 1.31801, 1.31858]
# Удельная работа турбины, Дж/кг:
L_т[i] := C_pг1[i]*T*_г*(1 - π_т[i]^((1 - k_г[i])/k_г[i]))*η*_т
L_т = [266051; 403279; 487696; 547452; 592786; 628979; 658987; 684408; 706354; 725586; 742497; 757932; 771594; 784020; 795538; 806146]
# Относительный расход топлива
C_p(T, α) :=
    ((2.25 + 1.2*α)/(α*10^5)*(T - 70) + 0.236)*4187 if T < 750
    ((1.25 + 2.2*α)/(α*10^5)*(T + 450) + 0.218)*4187 if T ≥ 750
C_pг2[i] := C_p(T*_г, α[i])
transpose(C_pг2) = [1129.85, 1126.14, 1124.51, 1124.51, 1123, 1121.6, 1120.94, 1120.31, 1119.69, 1119.1, 1117.97, 1117.97, 1116.92, 1115.93, 1115.46, 1115]
T_р.торм[i] := T_к2.торм[i]*(1 - σ) + T_т[i]*σ
C_pв[i] := C_p(T_р.торм[i], 10000)
transpose(C_pв) = [1053.84, 1045.21, 1039.84, 1036.07, 1033.13, 1030.76, 1028.81, 1027.16, 1025.72, 1024.46, 1022.3, 1021.76, 1021.25, 1020.78, 1020.36, 1019.98]
# Расчет расхода воздуха и удельного КПД.
g_m[i] := (C_pг2[i]*T*_г - C_pв[i]*T_р.торм[i])/(Qp_н*η_г - (C_pг2[i]*T*_г - C_pг2[i]*T_a))
transpose(g_m) = [0.0101693, 0.0123851, 0.0137643, 0.0147628, 0.0154889, 0.016065, 0.0165517, 0.016962, 0.0173148, 0.0176228, 0.0178998, 0.0181468, 0.0183482, 0.018531, 0.0187077, 0.0188701]
# Пересчет коээфицента избытка воздуха
α[i] := 1/(g_m[i]*L_0)
α = [6.16132; 5.05905; 4.55212; 4.24422; 4.04527; 3.90019; 3.78552; 3.69393; 3.61867; 3.55543; 3.5004; 3.45276; 3.41487; 3.38117; 3.34924; 3.32042]
# Теплоёмкость для продуктов сгорания в зависимости от величины a и температуры,
# Дж/кг*К:
# :
C_p(T, α) :=
    ((0.0174/α + 0.2407) + (0.0093/α + 0.0193)*(2.5*10^-3*T - 0.875) + (2.0*10^-3 - 1.056*10^-3/(α - 0.2))*(2.5*10^-5*T^2 - 0.0275*T + 6.5625))*4187 if T < 750
    ((0.0267/α + 0.26) + (0.0133/α + 0.032)*(1.176*10^-3*T - 0.88235) - (0.94*10^-2/(α^2 + 10) + 0.374*10^-2)*(5.5556*10^-6*T^2 - 1.3056*10^-2*T + 6.67))*4187 if T ≥ 750
C_pг1[i] := C_p(T_ср[i], α[i])
# Во втором приближении:
R_г := 289.3  # Дж/(кг*К)
k_г[i] := C_pг1[i]/(C_pг1[i] - R_г)
C_pг1 = [1216.46; 1213.33; 1210.93; 1209.07; 1207.36; 1205.88; 1204.62; 1203.5; 1202.49; 1201.56; 1200.7; 1199.95; 1199.15; 1198.4; 1197.75; 1197.14]
transpose(k_г) = [1.31203, 1.31308, 1.3139, 1.31453, 1.31512, 1.31563, 1.31606, 1.31645, 1.3168, 1.31712, 1.31743, 1.31769, 1.31797, 1.31823, 1.31845, 1.31867]
# Температура за турбиной , К
T_т[i] := T*_г*(1 - (1 - π_т[i]^((1 - k_г[i])/k_г[i]))*η_л)
transpose(T_т) = [1200.15, 1084.52, 1012.88, 961.977, 922.926, 891.526, 865.449, 843.244, 823.98, 807.02, 791.902, 778.318, 765.953, 754.653, 744.281, 734.692]
# Средняя температура в процессе расширения, К
T_ср[i] := (T_т[i] + T*_г)/2
transpose(T_ср) = [1311.58, 1253.76, 1217.94, 1192.49, 1172.96, 1157.26, 1144.22, 1133.12, 1123.49, 1115.01, 1107.45, 1100.66, 1094.48, 1088.83, 1083.64, 1078.85]
C_pг1[i] := C_p(T_ср[i], α[i])
k_г[i] := C_pг1[i]/(C_pг1[i] - R_г)
C_pг1 = [1215.95; 1212.76; 1210.37; 1208.5; 1206.86; 1205.44; 1204.23; 1203.16; 1202.19; 1201.31; 1200.51; 1199.78; 1199.04; 1198.36; 1197.75; 1197.18]
transpose(k_г) = [1.3122, 1.31328, 1.31409, 1.31473, 1.31529, 1.31578, 1.3162, 1.31657, 1.31691, 1.31721, 1.31749, 1.31775, 1.318, 1.31824, 1.31845, 1.31866]
# Удельная работа турбины, Дж/кг:
L_т[i] := C_pг1[i]*T*_г*(1 - π_т[i]^((1 - k_г[i])/k_г[i]))*η*_т
L_т = [265182; 401732; 485795; 545240; 590590; 626906; 656985; 682518; 704606; 724004; 741249; 756735; 770748; 783529; 795266; 806097]
# Относительный расход топлива
C_p(T, α) :=
    ((2.25 + 1.2*α)/(α*10^5)*(T - 70) + 0.236)*4187 if T < 750
    ((1.25 + 2.2*α)/(α*10^5)*(T + 450) + 0.218)*4187 if T ≥ 750
C_pг2[i] := C_p(T*_г, α[i])
transpose(C_pг2) = [1101.21, 1104.67, 1106.83, 1108.39, 1109.53, 1110.43, 1111.19, 1111.83, 1112.39, 1112.87, 1113.3, 1113.69, 1114, 1114.29, 1114.56, 1114.82]
T_р.торм[i] := T_к2.торм[i]*(1 - σ) + T_т[i]*σ
C_pв[i] := C_p(T_р.торм[i], 10000)
transpose(C_pв) = [1053.29, 1044.63, 1039.3, 1035.54, 1032.67, 1030.37, 1028.47, 1026.86, 1025.47, 1024.24, 1022.22, 1021.69, 1021.21, 1020.77, 1020.36, 1019.99]
# Расчет расхода воздуха и удельного КПД.
g_m[i] := (C_pг2[i]*T*_г - C_pв[i]*T_р.торм[i])/(Qp_н*η_г - (C_pг2[i]*T*_г - C_pг2[i]*T_a))
transpose(g_m) = [0.00942768, 0.0118697, 0.0133552, 0.0143975, 0.0151869, 0.0158159, 0.0163347, 0.0167734, 0.0171516, 0.0174827, 0.0177917, 0.0180471, 0.0182776, 0.0184876, 0.0186801, 0.0188575]
# Относительный расход воздуха через лабиринтные уплотнения:
g_ут := 0.008
# Относительный расход воздуха на охлаждение деталей турбины:
g_охл := 0.05
g_воз := 0.04
# Удельная  мощность:
N_е.уд[i] := (L_т[i]*((1 + g_m[i])*(1 - g_ут - g_охл) + g_воз)*η_м - L_кΣ[i])
transpose(N_е.уд) = [162406, 243759, 288522, 317078, 336806, 351134, 361895, 370162, 376615, 381704, 385756, 388966, 391506, 393511, 395081, 396286]
# Расход через турбину, кг/сек
G_в[i] := N_е/N_е.уд[i]
transpose(G_в) = [215.51, 143.584, 121.308, 110.383, 103.917, 99.6771, 96.7131, 94.5531, 92.9332, 91.6941, 90.731, 89.9821, 89.3983, 88.9429, 88.5894, 88.3202]
# Расход газа при входе в турбину
G_г[i] := (1 + g_m[i])*(1 - g_ут - g_охл)*G_в[i]
transpose(G_г) = [204.924, 136.862, 115.798, 105.478, 99.3768, 95.3809, 92.5919, 90.5631, 89.0446, 87.886, 86.9893, 86.2929, 85.7524, 85.3331, 85.0101, 84.7665]
# Удельный расход топлива, кг/(кВт*ч)
C_e[i] := g_m[i]*(1 - g_ут - g_охл)*3600*1000/N_е.уд[i]
transpose(C_e) = [0.19686, 0.165132, 0.156973, 0.153983, 0.152913, 0.152747, 0.153067, 0.153668, 0.154441, 0.155323, 0.156408, 0.157343, 0.15832, 0.159322, 0.160342, 0.161372]
η_e[i] := 3600*1000/(C_e[i]*Qp_н)
transpose(η_e) = [0.382656, 0.456177, 0.47989, 0.489207, 0.492631, 0.493164, 0.492134, 0.490211, 0.487758, 0.484987, 0.481623, 0.478759, 0.475807, 0.472813, 0.469807, 0.466806]
transpose(π_кΣ.торм) = [2.5, 4, 5.5, 7, 8.5, 10, 11.5, 13, 14.5, 16, 17.5, 19, 20.5, 22, 23.5, 25]
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кг/с
# Расход воздуха через турбину компрессора
G_в[5] = 99.6771
G_г[5] = 95.3809  # кг/с
# 2. Расчёт частоты вращения и диаметра турбины компрессора
# Расчет турбины компрессора:
# Исходные данные
π_к.торм := π_кΣ.торм[5] = 10
# Относительный расход воздуха на охлаждение
g_охлСА := 0.02
π_т := π_т[5] = 8.76621
g_охлРК := 0.03
k_г := (k_г[5] + k2[5])/2 = 1.3566
C_pг := C_pг1[5] = 1205.44  # Дж/(кг*К)
L_кΣ := L_кΣ[5] = 267578  # Дж/кг
P_г.торм := P_г.торм[5] = 924728  # Па
# Удельная работа турбины, Дж/кг
# Относительный расход газа:
g_т := (1 + g_m[5])*(1 - g_ут - g_охлСА - g_охлРК) = 0.956899
L_твд := L_кΣ/(η_м*g_т) = 282455  # Дж/кг
# Полное давление за турбиной компрессора, Па
P_т.торм.твд := P_г.торм*(1 - L_твд/(C_pг*T*_г*η*_т))^(k_г/(k_г - 1)) = 428714
# Степень понижения  полного давления в турбине компрессора:
π_твд.торм := P_г.торм/P_т.торм.твд = 2.15698
# Полная температура за турбиной компрессора, К
T_т.торм.твд := T*_г - L_твд/C_pг = 1188.68
# Расчет силовой турбины:
T_г.торм.тнд := T_т.торм.твд
# Степень понижения давления в силовой турбине
π_тнд.торм := π_т/π_твд.торм = 4.06411
# Полное давление за силовой турбиной, Па:
P_т.торм.тнд := P_т.торм.твд/π_тнд.торм = 105488
# Удельная работа силовой турбины:
L_т.тнд := C_pг*T_г.торм.тнд*(1 - π_тнд.торм^((1 - k_г)/k_г))*η*_т = 397570
# Температура за силовой трубиной, К:
T_т.торм.тнд := T_г.торм.тнд*(1 - (1 - π_тнд.торм^((1 - k_г)/k_г))*η_л) = 851.541
ρ_м := 8400
μ := 3.5
σ_dop := 200
k_n1 := 2*π*ρ_м/(3600*(1 + ln(μ))) = 6.5079
k_n := 6.508*10^-6
G_г := G_г[5] = 95.3809
# Располагаемый теплоперепад в ТВД, Дж/кг:
H_т.твд := C_pг*T*_г*(1 - π_твд.торм^((1 - k_г)/k_г)) = 313839
# Температура за ТВД, К:
T_т.твд := T*_г - H_т.твд*η_л/C_pг = 1183.48
# Давление за ТВД, Па:
P_т.твд := P_г.торм*(1 - H_т.твд/(C_pг*T*_г))^(k_г/(k_г - 1)) = 428714
# Степень понижения давления:
π_т.твд := P_г.торм/P_т.твд = 2.15698
# Условная адиабатическая скорость
с_0 := sqrt(2*H_т.твд) = 792.262  # м/с
c_2a := 185  # м/с
# Удельный объем газа за турбиной
v_т := R_г*T_т.твд/P_т.твд = 0.79862  # м^3/кг
# Площадь кольцевого сечения турбины  при выходе из РК последней ступени
F_тк := G_г*(1 + g_охлСА + g_охлРК)*v_т/c_2a = 0.432334  # м^2
# Максимальное напряжение растяжения, возникающее при заданной частоте вращения
n_т.max.твд := sqrt(σ_dop/(k_n*F_тк)) = 8431.05  # об/мин
n_т.max.твд := 7700  # об/мин
# Относительная длина лопаток последней ступени турбины:
l/D_т := 1/8
# Тогда средний диаметр турбины:
D_т := sqrt(F_тк/(π*l/D_т)) = 1.04925  # м
# Длина лопаток последней ступени:
l_т := D_т*l/D_т = 0.131156  # м
# Окружная скорость на среднем радиусе турбины:
u_т := π*D_т*n_т.max.твд/60 = 423.028  # м/с
# Расчёт параметров соответствующих максимальному КПД:
# Условная адиабатическая скорость:
c_0 := sqrt(2*H_т.твд) = 792.262  # м/с
# Число ступеней:
# оптимальное отношение:
y_0 := 0.5435
u_тη := y_0*c_0 = 430.594  # м/с
D_т.твдη := u_тη*60/(π*n_т.max.твд) = 1.06802  # м
# Количество ступеней турбины:
z_ступен := 2*H_т.твд*y_0^2/u_т^2 = 1.03609
принимаем
z_ступен := 1
# Задаем степень реактивности ступеней на среднем радиусе
ρ := 0.23333
# Сопловой аппарат
# Располагаемый теплоперепад в СА
H_c := (H_т.твд*(1 - ρ)) = 240611  # Дж/кг
# Угол потока на выходе из  СА первой ступени
α_c1 := 17*deg
# Коэффициент скорости
φ := 0.97
c_1ад := sqrt(2*H_c) = 693.702  # м/с
# Скорость истечения из СА первой ступени
C_p(T) :=
    (0.2407 + 0.0193*(2.5*10^-3*T - 0.875) + 2.0*10^-3*(2.5*10^-5*T^2 - 0.0275*T + 6.5625))*4187 if T < 750
    (0.26 + 0.032*(1.176*10^-3*T - 0.88235) - 0.374*10^-2*(5.5556*10^-6*T^2 - 1.3056*10^-2*T + 6.67))*4187 if T ≥ 750
c_1 := φ*sqrt(H_c*2) = 672.891  # м/с
# Скорость истечения из СА с учетом подмешиваемого охлаждающего воздуха в первой ступени
# Расход рабочего тела  в горле СА
g_охлСА = 0.02
G_г0 := G_г*(1 + g_охлСА/2) = 96.3347
# Температура смеси в горловом сечении СА первой ступени
C_pв3[i] := C_p((T_к2.торм[i] + T*_г)/2)
T*_г0 := (G_г0*C_pг*T*_г + g_охлСА/2*G_в[5]*T_к2.торм[5]*C_pв2[5])/(G_г0*C_pг + g_охлСА/2*G_в[5]*C_pв3[5]) = 1413.29
c_в1.отн := 0.14
c_1см := c_1*(1 + g_охлСА*c_в1.отн)/(1 + g_охлСА) = 661.544  # м/с
# Температура за СА с учетом подмешенного воздуха:
C_pв3 = [1120.45; 1123.38; 1125.46; 1127.09; 1128.44; 1129.6; 1130.6; 1131.5; 1132.31; 1133.05; 1133.73; 1134.36; 1134.95; 1135.5; 1136.01; 1136.5]
К
T*_см := (G_г0*C_pг*T*_г0 + g_охлСА/2*G_в[5]*T_к2.торм[5]*C_pв2[5])/(G_г0*C_pг + g_охлСА/2*G_в[5]*C_pв3[5]) = 1403.66
# Температура конца адиабатного расширения в СА
T'_1 := T*_г - H_c/C_pг = 1223.4  # К
# Статическая температура за СА
T_1см := T*_см - c_1см^2/(φ^2*2*C_pг) = 1210.73  # К
# Статическое давление за СА
P_1 := P_г.торм*(T'_1/T*_г)^(k_г/(k_г - 1)) = 520370  # Па
# Удельный объем и плотность за СА
ν_1 := R_г*T_1см/P_1 = 0.673108  # м^3/кг
ρ_1 := 1/ν_1 = 1.48564  # кг/м^3
# Полный расход за СА
G_1 := G_г0*(1 + g_охлСА/2) = 97.2981  # кг/c
# Осевая скорость потока на выходе из СА
c_1a := c_1см*sin(α_c1) = 193.417  # м/с
# Окружная составляющая скорости
c_1u := c_1см*cos(α_c1) = 632.638  # м/с
# Кольцевая площадь за СА первой ступени:
F_1 := G_1/(ρ_1*c_1a) = 0.338606  # м^2
# Средний диаметр
D_са := D_т = 1.04925  # м
# Отношение длины лопатки к среднему диметру
L1/D1 := F_1/(π*D_са^2) = 0.0979007
# Проверяем степень реактивности у корня:
ρ_к.проверка := 1 - (c_1ад/c_0)^2*(1/(1 - L1/D1)) = 0.150127
# Длина лопаток СА
l_са1 := D_са*L1/D1 = 0.102722  # м
# Проверка
l_c := G_1*ν_1/(π*D_са*sin(α_c1)*c_1см) = 0.102722  # м
M_с := c_1см/sqrt(k_г*R_г*T_1см) = 0.959695
# Рабочее колесо
# Температура газа перед РК
T_1см = 1210.73  # К
# Давление газа перед РК
P_1 = 520370  # Па
# Окружная скорость потока перед РК
c_1u := c_1см*cos(α_c1) = 632.638  # м/с
# Относительная скорость перед РК
w_1 := sqrt(c_1см^2 + u_т^2 - 2*c_1см*u_т*cos(α_c1)) = 285.213  # м/c
# Угол установки профиля на входе в РК
β_1 := atan(c_1a/(c_1u - u_т)) = 42.6992 deg
# Располагаемый теплоперепад в РК:
H_л := ρ*H_т.твд*T_1см/T'_1 = 72470.3  # Дж/кг
# Температура на входе в РК в относительном движении
T*_1w := T_1см + w_1^2/(2*C_pг) = 1244.48  # К
a_крw1 := sqrt(2*k_г/(k_г + 1)*R_г*T*_1w) = 643.822  # м/c
a_1 := sqrt(k_г*R_г*T_1см) = 689.327  # м/c
M_w1 := w_1/a_1 = 0.413755
# Давление потока в относительном движении при входе в РК
P*_1w := P_1*(T*_1w/T_1см)^(k_г/(k_г - 1)) = 577731  # Па
# Коэфициент скорости в РК:
ψ := 0.96
# Относительная скорость за РК:
w_2ад := sqrt(w_1^2 + 2*H_л) = 475.696  # м/c
# Действительная скорость на выходе из РК у учетом подмешиваемого воздуха
c_в2охл := 0.17
w_2 := ψ*w_2ад*(1 + g_охлРК*c_в2охл) = 458.997  # м/c
# Температура за РК в относительном движении с учетом охлаждающего воздуха
T*_2wад := T*_1w
T*_2смw := (G_1*C_pг*T*_2wад + g_охлРК*G_в[5]*T_к2.торм[5]*C_pв2[5])/(G_1*C_pг + g_охлРК*G_в[5]*C_pв3[5]) = 1221.15  # К
# Температура в конце адиабатного расширения в РК:
T'_2 := (T_1см + w_1^2/(2*C_pг)) - w_2ад^2/(2*C_pг) = 1150.62  # K
# Действительная Температура за РК
T_2см := T*_2смw - w_2^2/(2*C_pг) = 1133.77  # K
# Статическое давление за РК:
P_2 := P_1*(T'_2/T_1см)^(k_г/(k_г - 1)) = 428714  # Па
# Удельный объём и плотность газа за РК:
ν_2 := R_г*T_2см/P_2 = 0.765077  # м^3/кг
ρ_2 := P_2/(R_г*T_2см) = 1.30706  # кг/м^3
a_2 := sqrt(k_г*R_г*T_2см) = 667.057  # м/c
M_w2 := w_2/a_2 = 0.688093
# Расход за РК:
G_2 := G_г0*(1 + g_охлРК + g_охлСА/2) = 100.188  # кг/с
F_2а := π*D_т*l_т = 0.432334  # м^2
# Угол выхода потока из РК:
β_2 := asin(G_2/(ρ_2*w_2*F_2а)) = 22.7226 deg
# Удлинение рабочей лопатки:
L2/b_a.л := 16.4/(D_са/l_т - 0.25) = 2.11613
# Ширина лопатки:
b_a.л := l_т/L2/b_a.л = 0.0619794  # м
# Угол установки профиля в решетке
γ_рк := (70 - 0.127*(β_1/deg - β_2/deg) - 0.0041*(β_1/deg - β_2/deg)^2)*deg
# Хорда профиля рабочей лопатки
b_л := b_a.л/sin(γ_рк) = 0.0679367  # м
# Удлинение сопловой лопатки
τ_ca := 1.5
# Ширина сопловой лопатки
b_a.с := l_c/τ_ca = 0.0684817
# Величина осевого зазора между СА и РК
δ_a.с := 0.25*b_a.с = 0.0171204
# Величина осевого зазора между РК 1 ступени и СА 2 ступени:
δ_a.л := 0.25*b_a.л = 0.0154949
γ_пр.ч := 11.86 deg
# Длина рабочей лопатки 1 ступени
l_л := 0.11  # м
# Уточнение коэффициентов скорости:
# Суммарные потери
ζ_с == ζ_с.пр + ζ_с.к
# Профильные потери:
ζ_с.пр == ζ_с.тр + ζ_с.кр
# Концевые потери
ζ_с.к == ζ_с.тк + ζ_с.вт
# Коэффициент скорости в СА:
# а) потери на трение
# Угол установки профиля в решётке СА:
α_0 := 90*deg
x := (α_0 + α_c1)/deg = 107  # град
y := sin(α_0)/sin(α_c1) = 3.4203
x_с :=
    x
    110 if x > 110
    = 107
y_с :=
    y
    1.7 if y > 1.7
    = 1.7
# Потери на трение в СА:
ζ_с.тр. := 0.02185*(0.01065*x_с^2 - 2.295*x_с + 160.5)*(0.1055*y_с^2 - 0.3427*y_с + 0.295) = 0.0139399
# б) кромочные потери
# Угол установки профиля в СА
γ_с := (70 - 0.127*(α_0/deg - α_c1/deg) - 0.0041*(α_0/deg - α_c1/deg)^2)*deg = 38.8801 deg
# Хорда лопатки:
b_a.с = 0.0684817
b_с := b_a.с/sin(γ_с) = 0.109101  # м
# Относительная максимальная толщина:
c'_max1 := 0.2
# Коэффициент
K := 0.45
c_max1 := c'_max1*b_с = 0.0218201  # м
# Оптимальный относительный шаг (0,7...0,85)
# Относительный шаг решётки:
t_b := K*(180*deg/(180*deg - (α_0 + α_c1))*sin(α_0)/sin(α_c1))^(1/3)*(1 - c'_max1) = 0.732781  # м
h_щ := 5*10^-3
h_п := 1.5*10^-3
t/b_с.опт := 0.73
# Отсюда шаг решетки:
t_с := t/b_с.опт*b_с = 0.0796434  # м
T_охл := T_к2.торм[5] + 350
α_п := 2
# Диаметр выходной кромки соплового аппарата
s_с := 2.5*10^-3  # м
ρ_в := 1/(R_в*T_охл/P_к.вых.торм[5]) = 4.18265
Δ := 0.5*10^-3
ζ_с.кр := 0.2*s_с/(t_с*sin(α_c1))*(1 + h_щ/(h_щ + h_п)*α_п*sqrt(Δ/s_с*ρ_в/ρ_1)*c_в1.отн^(1/3)) = 0.0343441  # - относительные кромочные потери
# Диаметр выходной кромки рабочей лопатки
T := T_1см
y_в := 0.229*(T*10^-3)^3 - 1.333*(T*10^-3)^2 + 4.849*(T*10^-3) + 0.505 - 0.275/α_п = 4.69076
μ_вяз := y_в/10^5 = 4.69076e-5
Re := ρ_2*w_2*b_с/μ_вяз = 1395368
ζ_с.прRe := 21000/Re - 0.0021 = 0.0129498
# Профильные потери в СА:
ζ_с.пр := ζ_с.тр. + ζ_с.кр + ζ_с.прRe = 0.0612338
# в) Концевые потери
ζ_с.к := 2*ζ_с.тр.*t_с*sin(α_c1)/l_c = 0.00631988
# Суммарные потери в СА:
ζ_с := (ζ_с.пр + ζ_с.к) = 0.0675537
# Коэффициент скорости
# (уточненный)
φ := sqrt(1 - ζ_с) = 0.965633
# Коэффициент скорости в РК:
# а) потери на трение
β_1/deg = 42.6992
β_2/deg = 22.7226
x := (β_2 + β_1)/deg = 65.4218  # град
y := sin(β_1)/sin(β_2) = 1.75563
x :=
    x
    110 if x > 110
    = 65.4218
y :=
    y
    1.7 if y > 1.7
    = 1.7
ζ_тр.рк := 0.02185*(0.01065*x^2 - 2.295*x + 160.5)*(0.1055*y^2 - 0.3427*y + 0.295) = 0.0211514
# б) кромочные потери
# Угол установки профиля в РК:
γ_рк := (70 - 0.127*(β_1/deg - β_2/deg) - 0.0041*(β_1/deg - β_2/deg)^2)*deg = 65.8268 deg
# Хорда лопатки:
b_л := b_a.л/sin(γ_рк) = 0.0679367  # м
b_a.л = 0.0619794  # м
# Относительная максимальная толщина:
c'_max2 := 0.15
c_max2 := c'_max2*b_л = 0.0101905
# Коэффициент
K := 0.6
t/b_рк.опт := K*(180*deg/(180*deg - (β_1 + β_2))*sin(β_1)/sin(β_2))^(1/3)*(1 - c'_max2) = 0.715218
T_охлл := T_к2.торм[5] + 350
t/b_рк.опт = 0.715218
# Отсюда шаг решетки:
α_п := 2
ρ_в := 1/(R_в*T_охлл/P_к.вых.торм[5]) = 4.18265
h_щл := 3*10^-3
h_пл := 0.5*10^-3
Δ := 0.5*10^-3
t_рк := t/b_рк.опт*b_л = 0.0485895  # м
# Диаметр выходной кромки рабочей лопатки
s_рк := 2*10^-3  # м
ζ_кр.рк := 0.2*s_рк/(t_рк*sin(β_2))*(1 + h_щл/(h_щл + h_пл)*α_п*sqrt(Δ/s_с*ρ_в/ρ_1)*c_в1.отн^(1/3)) = 0.0355474
T := T_2см
y_в := 0.229*(T*10^-3)^3 - 1.333*(T*10^-3)^2 + 4.849*(T*10^-3) + 0.505 - 0.275/α_п = 4.4854
μ_вяз := y_в/10^5 = 4.4854e-5
Re := ρ_2*w_2*b_л/μ_вяз = 908674
ζ_с.прRe := 21000/Re - 0.0021 = 0.0210106
# Профильные потери в РК:
ζ_пр.рк := ζ_тр.рк + ζ_кр.рк + ζ_с.прRe = 0.0777094
# в) концевые потери в рабочей лопатке:
ζ_к.рк := 2*ζ_тр.рк*t_рк*sin(β_2)/l_л = 0.00721788
# г) суммарные потери в РК:
ζ_2 := ζ_пр.рк + ζ_к.рк = 0.0849273
# Коэффициент скорости:
# (уточненный)
ψ := sqrt(1 - ζ_2) = 0.956594
# Окружная составляющая абсолютной скорости за РК:
c_2u := w_2*cos(β_2) - u_т = 0.344409  # м/c
# Осевая скорость за РК:
c_2a := w_2*sin(β_2) = 177.297  # м/c
c_1a = 193.417  # м/c
# Угол выхода потока из рабочих лопаток:
α_2 := atan(c_2a/c_2u) = 89.8887 deg
с_2 := sqrt(c_2a^2 + c_2u^2) = 177.298  # м/c
# Температура торможения за РК
T*_2 := T_2см + с_2^2/(2*C_pг) = 1146.81  # К
# Давление за РК
P*_2 := P_2*(T*_2/T_2см)^(k_г/(k_г - 1)) = 447774  # Па
T_2ад := T*_2*(P_2/P_г.торм)^((k_г - 1)/k_г) = 936.987  # К
# Работа на окружности РК
L_u := c_1u*u_т + c_2u*u_т = 267769  # Дж/кг
# КПД на окружности РК
η_u := L_u/H_т.твд = 0.853205
# Удельные потери в СА
h_с := c_1ад^2/2 - c_1^2/2 = 14220.1  # Дж/кг
h'_с := h_с*T'_2/T_2см = 14431.4  # Дж/кг
# Относительные потери в СА
ξ'_с := h'_с/H_т.твд = 0.0459835
# Удельные потери в РК:
h_л := (1/ψ^2 - 1)*w_2^2/2 = 9776.46  # Дж/кг
# Относительные потери в РК:
ξ_л := h_л/H_т.твд = 0.0311512
# Удельные потери с выходной скоростью:
h_в := с_2^2/2 = 15717.2  # Дж/кг
# Относительные потери с выходной скоростью:
ξ_в := h_в/H_т.твд = 0.0500804
# КПД на окружности РК:
η_u := 1 - ξ'_с - ξ_л - ξ_в = 0.872785
# Средняя плотность газа в ступени
кг/м^3
ρ_ср := (ρ_1 + ρ_2)/2 = 1.39635
# Затраты мощности на трение и вентиляцию:
N_т.в := (1.07*D_т^2)*(u_т/100)^3*ρ_ср*1000 = 124522  # Вт
h_т.в := N_т.в/G_г = 1305.52  # Дж/кг
ξ_т.в := h_т.в/H_т.твд = 0.00415984
# Удельные потери в радиальном зазоре:
δ_r := 0.01*l_л = 0.0011
h_з := 1.37*(1 + 1.6*ρ)*(1 + l_л/D_т)*(L_u*δ_r/l_л) = 5566.13  # Дж/кг
# Относительные потери в радиальном зазоре
ξ_з := h_з/H_т.твд = 0.0177356
# Мощность на окружности колеса:
H_в2 := k2[5]/(k2[5] - 1)*R_в*T_к2.торм[5]*(1 - (P_2/P_к.вых.торм[5])^((k2[5] - 1)/k2[5])) = 96469.6
N_u := G_1*c_1u*u_т + G_2*c_2u*u_т = 26053838  # Вт
N_т := N_u - N_т.в = 25929316
H_в1 := k2[5]/(k2[5] - 1)*R_в*T_к2.торм[5]*(1 - (P_2/P_к.вых.торм[5])^((k2[5] - 1)/k2[5])) = 96469.6
# Эффективные КПД:
η_тэф := N_т/(G_г0*H_т.твд + g_охлСА/2*G_в[5]*H_в1 + g_охлРК*G_в[5]*H_в2) = 0.846858
η_тэф* := N_т/(G_г0*H_т.твд + g_охлСА/2*G_в[5]*H_в1 + g_охлРК*G_в[5]*H_в2 - G_2*с_2^2/2*T_2ад/T_2см) = 0.88445
η_лэф := (N_т + G_2*с_2^2/2)/(G_г0*H_т.твд + g_охлСА/2*G_в[5]*H_в1 + g_охлРК*G_в[5]*H_в2) = 0.898288
# Температура на выходе из ступени:
T_ст := T_2см + h_з/C_pг + h_т.в/C_pг = 1139.47  # К
T*_ст := T_ст + h_в/C_pг = 1152.51  # К
# Давление за 1 ступенью:
P*_ст := (T*_ст/T_ст)^(k_г/(k_г - 1))*P_2 = 447677  # Па
# Располагаемый теплоперепад по параметрам торможения:
H* := C_pг*T*_г*(1 - (P*_ст/P_г.торм)^((k_г - 1)/k_г)) = 297802
# Профилирование лопаток по радиусу
# Закон профилирования:
α_1 == const
# Угол выхода из СА 1 ступени:
α_c1/deg = 17
# Средний радиус СА и РК:
r_ср := D_т/2 = 0.524626  # м
# Корневой радиус | Периферийный радиус СА:
r_к := D_т/2 - l_c/2 = 0.473265  # м
r_п := D_т/2 + l_c/2 = 0.575987  # м
# Окружная скорость на выходе из СА на среднем радиусе:
c_1u = 632.638  # м/c
# Абсолютная скорость на выходе из СА на среднем радиусе:
c_1см = 661.544  # м/c
# Окружная скорость на периферии:
c_1uп := c_1u*(r_ср/r_п)^(cos(α_c1)^2) = 580.844  # м/c
# Осевая скорость на периферии:
c_1aп := c_1a*(r_ср/r_п)^(cos(α_c1)^2) = 177.582  # м/c
# Абсолютная скорость на периферии:
c_1п := c_1см*(r_ср/r_п)^(cos(α_c1)^2) = 607.384  # м/c
# Окружная скорость у корня:
c_1uк := c_1u*(r_ср/r_к)^(cos(α_c1)^2) = 695.146  # м/c
# Осевая скорость у корня:
c_1aк := c_1a*(r_ср/r_к)^(cos(α_c1)^2) = 212.527  # м/c
# Абсолютная скорость у корня:
c_1к := c_1см*(r_ср/r_к)^(cos(α_c1)^2) = 726.908  # м/c
# Теплоперепад в СА:
H_cп := c_1п^2/(2*φ) = 191022  # Дж/кг
H_c = 240611  # Дж/кг
H_cк := c_1к^2/(2*φ) = 273601  # Дж/кг
# Статическая температура за СА
T_1к := T*_г - H_cк*φ^2/C_pг = 1211.36  # К
T_1см = 1210.73  # К
T_1п := T*_г - H_cп*φ^2/C_pг = 1275.24
# Температура конца адиабатного расширения в СА
T'_1к := T*_г - H_cк/C_pг = 1196.03  # К
T'_1 = 1223.4  # К
T'_1п := T*_г - H_cп/C_pг = 1264.53  # К
# Давление газа за СА:
P_1к := P_г.торм*(T'_1к/T*_г)^(k_г/(k_г - 1)) = 477457  # Па
P_1 = 520370  # Па
P_1п := P_г.торм*(T'_1п/T*_г)^(k_г/(k_г - 1)) = 590138  # Па
# Степень реактивности
ρ_к := 1 - H_cк/H_т.твд = 0.128214
ρ = 0.23333
ρ_п := 1 - H_cп/H_т.твд = 0.391337
# Окружная скорость на входе в перед и за РК:
u_1к := u_т*r_к/r_ср = 381.613  # м/с
u_т = 423.028  # м/с
u_1п := u_т*r_п/r_ср = 464.443  # м/с
u_2к := u_т*r_к/r_ср = 381.613
u_т = 423.028  # м/с
u_2п := u_т*r_п/r_ср = 464.443  # м/с
# Относительная скорость на входе в РК:
w_1п := sqrt(c_1п^2 + u_1п^2 - 2*c_1п*u_1п*cos(α_c1)) = 212.331  # м/с
w_1 = 285.213  # м/с
w_1к := sqrt(c_1к^2 + u_1к^2 - 2*c_1к*u_1к*cos(α_c1)) = 378.775  # м/с
# Относительная скорость на выходе из РК:
w_2п := ψ*sqrt(w_1п^2 + 2*ρ_п*H_т.твд*T_1п/T'_1п + u_2п^2 - u_1п^2) = 517.621  # м/с
w_2 = 458.997  # м/с
w_2к := ψ*sqrt(w_1к^2 + 2*ρ_к*H_т.твд*T_1к/T'_1к + (u_2к^2 - u_1к^2)) = 453.732  # м/с
# Угол входа потока в РК в относительном движении:
β_1к := atan(c_1aк/(c_1к*cos(α_c1) - u_1к)) = 34.1313 deg
β_1/deg = 42.6992
β_1п := atan(c_1aп/(c_1п*cos(α_c1) - u_1п)) = 56.756 deg
# Температура за РК
T_2к := T_1к - (w_2к^2 - w_1к^2 - u_2к^2 + u_1к^2)/(2*C_pг) = 1185.48  # К
T_2см = 1133.77  # К
T_2п := T_1п - (w_2п^2 - w_1п^2 - u_2п^2 + u_1п^2)/(2*C_pг) = 1182.8  # К
# Температура в конце адиабатного расширения в РК:
T'_2к := T_1к - ρ_к*H_т.твд*T_1к/(T'_1к*C_pг) = 1177.55  # К
T'_2 = 1150.62  # К
T'_2п := T_1п - ρ_п*H_т.твд*T_1п/(T'_1п*C_pг) = 1172.49  # К
# Давление за РК:
P_2к := P_1к*(T'_2к/T_1к)^(k_г/(k_г - 1)) explicit, ALL → 4.775*10^5*(1177.553/1211.361)^(1.357/(1.357 - 1)) = 428714  # Па
P_2 = 428714  # Па
P_2п := P_1п*(T'_2п/T_1п)^(k_г/(k_г - 1)) explicit, ALL → 5.901*10^5*(1172.49/1275.238)^(1.357/(1.357 - 1)) = 428714  # Па
# Удельный объем за РК:
ν_2к := R_г*T_2к/P_2к = 0.799971  # м^3/кг
ν_2 := R_г*T_2см/P_2 = 0.765077  # м^3/кг
ν_2п := R_г*T_2п/P_2п = 0.798167  # м^3/кг
# Осевая составляющая абсолютной скорости на выходе из РК:
c_2aп := G_г*(1 + g_охл)*ν_2п/(π*2*r_п*l_л) = 200.798  # м/с
c_2a = 177.297  # м/с
c_2aк := G_г*(1 + g_охл)*ν_2к/(π*2*r_к*l_л) = 244.934  # м/с
# Угол выхода потока из РК в относительном движении:
β_2к := asin(c_2aк/w_2к) = 32.6714 deg
β_2 := asin(c_2a/w_2) = 22.7226 deg
β_2п := asin(c_2aп/w_2п) = 22.8254 deg
# Окружная составляющая абсолютной скорости за РК:
c_2uк := w_2к*cos(β_2к) - u_2к = 0.329105  # м/с  # РАСПРЕДЕЛЕНИЕ
c_2u := w_2*cos(β_2) - u_т = 0.344409  # м/с  # СКОРОСТЕЙ
c_2uп := w_2п*cos(β_2п) - u_2п = 12.6436  # м/с
# Абсолютная скорость на выходе из РК:
c_2п := sqrt(c_2aп^2 + c_2uп^2) = 201.196  # м/с
с_2 := sqrt(c_2a^2 + c_2u^2) = 177.298  # м/с
c_2к := sqrt(c_2aк^2 + c_2uк^2) = 244.934  # м/с
# Угол выхода потока из РК в абсолютном движении:
α_2п := asin(c_2aп/c_2п) = 86.397 deg
α_2/deg = 89.8887
α_2к := atan(c_2aк/c_2uк) = 89.923 deg
# Число лопаток в СА:
z_с := π*D_т/t_с = 41.3885
z_с := 42
# Число лопаток в РК:
z_рк := π*D_т/t_рк = 67.8402
z_рк := 68
# Пересчитаю шаг решетки СА и РК:
t_ск := π*2*r_к/z_с = 0.0708002  # м
t_с := π*2*r_ср/z_с = 0.0784839  # м
t_сп := π*2*r_п/z_с = 0.0861675  # м
t_ркк := π*2*r_к/z_рк = 0.0437296  # м
t_рк := π*2*r_ср/z_рк = 0.0484753  # м
t_ркп := π*2*r_п/z_рк = 0.0532211  # м
# ЗАГОТОВКА ДЛЯ ПРАВИЛЬНОГО ПРОФИЛИРОВАНИЯ
# Средний диаметр
# Ширина лопаток:, м: | Горло
b_a.с = 0.0684817
a_рк.ср := t_рк*sin(β_2) = 0.0187246
b_a.л = 0.0619794
# Хорда, м:
a_c.ср := t_с*sin(α_c1) = 0.0229465
b_с = 0.109101
b_л = 0.0679367
# Газовые углы: | CA
α_0 := 90 deg
r_1CA := 0.05*b_a.с = 0.00342408
α_c1 = 17 deg
d_1CA := 2*r_1CA = 0.00684817
β_1 = 42.6992 deg  # RK
β_2 = 22.7226 deg
r_1RK := 0.03*b_a.л = 0.00185938
# Угол установки профиля:
d_1CA := 2*r_1RK = 0.00371877
γ_с = 38.8801 deg
γ_рк = 65.8268 deg
# Шаг, м:
t_с = 0.0784839
t_рк = 0.0484753
# Число лопаток СА:
z_с = 42
# Число лопаток РК:
z_рк = 68
# Втулочный диаметр.
# Хорда, м:
b_с = 0.109101
# Газовые углы: | CA
r_1CA := 0.045*b_a.с = 0.00308167
α_0к := 90 deg
α_1к := α_c1 = 17 deg
d_1CA := 2*r_1CA = 0.00616335
β_1к = 34.1313 deg
RK
β_2к = 32.6714 deg
# Угол установки профиля:
r_1RK := 0.06*b_a.л = 0.00371877
γ_с.к := 32.715 deg
d_1CA := 2*r_1RK = 0.00743753
γ_рк.к := 61.32 deg
# Ширина лопаток, м:
b_a.с.к := b_с*sin(γ_с.к) = 0.0589646
# Шаг профилей, м:
t_с.к := π*r_к*2/z_с = 0.0708002
t_рк.к := π*r_к*2/z_рк = 0.0437296
a_рк.к := t_рк.к*sin(β_2к) = 0.0236061
a_c.к := t_с.к*sin(α_c1) = 0.0207
b_лвт := t_рк.к/0.53 = 0.0825086
b_a.л.к := b_лвт*sin(γ_рк.к) = 0.0723859
# Периферийный диаметр.
# Хорда, м:
b_с = 0.109101
# Газовые углы:
α_0п := 90 deg  # Шаг профилей, м:
α_1п := α_c1 = 17 deg
t_с.п := π*r_п*2/z_с = 0.0861675
β_1п = 56.756 deg
β_2п = 22.8254 deg
t_рк.п := π*r_п*2/z_рк = 0.0532211
# Угол установки профиля:
γ_с.п := 31.061 deg
γ_рк.п := 33.737 deg
# Ширина лопаток, м:
a_рк.п := t_рк.п*sin(β_2п) = 0.0206458
b_a.с.п := b_с*sin(γ_с.п) = 0.0562905
b_лп := t_рк.п/0.78 = 0.0682322
a_c.п := t_с.п*sin(α_c1) = 0.0251929
i := 0, 1 .. 105
b_a.л.п := b_лп*sin(γ_рк.п) = 0.0378949
# [component: outputs PS_1]
# [component: outputs SS_1]
PS_1[i, 1] =  # error: Эта переменная не определена.
PS_1[i, 0] =  # error
SS_1[i, 1] =  # error
SS_1[i, 0] =  # error
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vx1[i] := PS_1[i, 1]
vy1[i] := PS_1[i, 0]
vs1 := lspline(vx1, vy1)
y1(x) := interp(vs1, vx1, vy1, x)
vx2[i] := SS_1[i, 1]
vy2[i] := SS_1[i, 0]
vs2 := lspline(vx2, vy2)
y2(x) := interp(vs2, vx2, vy2, x)
A := integral(y1(x) - y2(x), x = SS_1[0, 1] .. SS_1[105, 1])
S_x := 0.5*integral(y1(x)^2 - y2(x)^2, x = SS_1[0, 1] .. SS_1[105, 1])
S_y := integral(x*(y1(x) - y2(x)), x = SS_1[0, 1] .. SS_1[105, 1])
x_cвт := S_y/A
y_cвт := S_x/A
I_x := 1/3*integral(y1(x)^3 - y2(x)^3, x = SS_1[0, 1] .. SS_1[105, 1])
I_y := integral(x^2*(y1(x) - y2(x)), x = SS_1[0, 1] .. SS_1[105, 1])
I_xy := 0.5*integral(x*(y1(x)^2 - y2(x)^2), x = SS_1[0, 1] .. SS_1[105, 1])
I_ξη := I_xy - x_cвт*y_cвт*A
I_ξ := I_x - y_cвт^2*A
I_η := I_y - x_cвт^2*A
φ := 0.5*atan(2*I_ξη/(I_η - I_ξ))*1/deg
I_u := I_ξ*cos(φ)^2 + I_η*sin(φ)^2 - 2*I_ξη*sin(φ)*cos(φ)
I_v := I_ξ*sin(φ)^2 + I_η*cos(φ)^2 + I_ξη*sin(2*φ)
# Среднее сечение
# [component: outputs PS_2]
# [component: outputs SS_2]
PS_2[i, 1] =  # error
PS_2[i, 0] =  # error
SS_2[i, 1] =  # error
SS_2[i, 0] =  # error
vx1[i] := PS_2[i, 1]
vy1[i] := PS_2[i, 0]
vs1 := lspline(vx1, vy1)
y1(x) := interp(vs1, vx1, vy1, x)
vx2[i] := SS_2[i, 1]
vy2[i] := SS_2[i, 0]
vs2 := lspline(vx2, vy2)
y2(x) := interp(vs2, vx2, vy2, x)
A := integral(y1(x) - y2(x), x = PS_2[0, 1] .. PS_2[105, 1])
# Периферийное сечение
# [component: outputs PS_3]
# [component: outputs SS_3]
PS_3[i, 1] =  # error
PS_3[i, 0] =  # error
SS_3[i, 1] =  # error
SS_3[i, 0] =  # error
vx1[i] := PS_3[i, 1]
vy1[i] := PS_3[i, 0]
vs1 := lspline(vx1, vy1)
y1(x) := interp(vs1, vx1, vy1, x)
vx2[i] := SS_3[i, 1]
vy2[i] := SS_3[i, 0]
vs2 := lspline(vx2, vy2)
y2(x) := interp(vs2, vx2, vy2, x)
A := integral(y1(x) - y2(x), x = PS_3[0, 1] .. PS_3[105, 1])
# Расчет на прочность ступени ТВД
# Рассчитывается рабочая лопатка второй ступени ТВД
# Материал лопатки- жаропрочный сплав на никелевой основе ХН60МКБЮТ
ρ := 8400  # кг/м^3  # плотность материала лопатки
ω := π*9050/30 = 947.714  # рад/с  # круговая частота вращения ротора компрессора
ϕ := 31.8  # градусов
I_u := 5.37*10^4*10^-12  # м^4
I_v := 3.9*10^5*10^-12  # м^4
# На лопатку действует три вида нагружений:
#
# 1. Растягивающие силы от инерционных сил
#
# 2. Изгибающие моменты от сил инерции (в нашем случае равен нулю, так как лопатка спроектирована без выносов)
#
# 3. Изгибающие моменты от аэродинамических сил
# Найдем напряжения растяжения в лопатке от сил инерции.
#
# Значения площадей сечений не подчиняются определенному закону. Проводим численное интегрирование в формулах для вычислений нормальной растягивающей силы в поперечных сечениях.
м^2
# площади поперечных сечений лопатки
# координаты- расстояние от оси вращения, на котором находятся сечения
F := [561.2*10^-6; 719.7*10^-6; 953.3*10^-6]
R_. := [531*10^-3; 463*10^-3; 393*10^-3]  # м
# Вычислим нормальные растягивающие силы:
N :=
    for i ∈ 1 .. 2
        x[i] ← ρ*ω^2*1/4*sum((F[j - 1] + F[j])*(R_.[j - 1]^2 - R_.[j]^2), j = 1 .. i)
    = 352377
# Напряжения растяжения в каждом сечении:
σ_растяж_ω :=
    for i ∈ 1 .. 2
        σ[i] ← N[i]/F[i]  # error: Значение должно быть вектором.  # Па
# Вычислим моменты от аэродинамических сил:
m := 58  # количество лопаток
P_begin := 5.49*10^5  # Па
T_begin := 1222.5  # К
k := 1.357
R := 289.7  # Дж/(кг*К)
# ГДФ давления:
π(x) := (1 - (k - 1)/(k + 1)*x^2)^(k/(k - 1))
# ГДФ плотности:
ε(x) := (1 - (k - 1)/(k + 1)*x^2)^(1/(k - 1))
P_2 := 4.287*10^5  # Па  # давление после рабочей лопатки
ρ_1 := P_begin/(R*T_begin) = 1.55015  # кг/м^3  # плотность газа перед рабочей лопаткой
z := [531; 463; 393]*10^-3  # м
C_1a := [134.4; 152.9; 178.5]  # м/с
C_2a := [163.6; 166; 221.2]  # м/с
C_1u := [539.2; 613.4; 715.8]  # м/с
C_2u := [35.4; 3.1; 32.7]  # м/с
# Составляющие аэродинамической нагрузки:
q_x :=
    for i ∈ 0 .. 2
        x[i] ← (P_begin - P_2)*2*π*z[i]/m - 2*π*z[i]/m*C_1a[1]*(C_2a[i] - C_1a[i])
    = 4843.69  # Н/м
q_y :=
    for i ∈ 0 .. 2
        x[i] ← 2*π*z[i]/m*ρ_1*C_1a[i]*(C_2u[i] - C_1u[i])
    = -8047.15  # Н/м
# Моменты от аэродинамических сил относительно главных осей:
M_ξq :=
    for i ∈ 0 .. 1
        x ← -sum(((q_y[j] + q_y[j + 1])/2)*((z[j] + z[j + 1])/2 - z[2])*(z[j] - z[j + 1]), j = 0 .. i)  # error: Значение должно быть вектором.  # Н*м
M_ηq :=
    for i ∈ 0 .. 1
        x ← sum(((q_x[j] + q_x[j + 1])/2)*((z[j] + z[j + 1])/2 - z[2])*(z[j] - z[j + 1]), j = 0 .. i)  # error: Значение должно быть вектором.  # Н*м
# Моменты от аэродинамических сил(суммарные моменты) относительно главных центральных  осей
М_u := M_ξq*cos(ϕ*π/180) + M_ηq*sin(ϕ*π/180)  # Н*м
М_v := -M_ξq*sin(ϕ*π/180) + M_ηq*cos(ϕ*π/180)  # Н*м
# Найдем положение нейтральной оси:
β_predv := 1
Given
tan(β_predv) == М_v/М_u*I_u/I_v
β := Find(β_predv)
# точка 1
v_1 := 17.0*10^-3  # м
u_1 := 24.5*10^-3  # м
σ_изгиб_1 := |М_v|*u_1/I_v + |М_u|*v_1/I_u  # Па
# точка 2
v_2 := -12.9*10^-3  # м
u_2 := -5.8*10^-3  # м
σ_изгиб_2 := -|М_v|*|u_2|/I_v - |М_u|*|v_2|/I_u  # Па
# точка 3
v_3 := 11.8*10^-3  # м
u_3 := 54.3*10^-3  # м
σ_изгиб_3 := |М_u|*|v_3|/I_u + |М_v|*|u_3|/I_v  # Па
# точка 3- самая опасная- по ней определяем коэффициент запаса:
σ_Σ_точка1 := σ_изгиб_1 + σ_растяж_ω[2]  # Па
σ_Σ_точка2 := σ_изгиб_2 + σ_растяж_ω[2]  # Па
σ_Σ_точка3 := σ_изгиб_3 + σ_растяж_ω[2]  # Па
# При температуре 950К для ХН70МТФКЮ
σ_дл. := 595*10^6  # Па
# Коэффициент запаса:
n_т := σ_дл./σ_Σ_точка1
