# Основные размеры многостепенчатой турбины:
# Максимальная частота вращения турбины:
σ_л := 400*MPa
k_n := 6.8*10^-6
F_т := 4.368 m^2
n_тmax := sqrt(σ_л*1/MPa/(k_n*F_т*1/m^2)) = 3669.73
# 1) Относительная длина РЛ последней ступени
l_D := 1/4
# 2) Средний диаметр последней ступени:
g_т := 0.937
G_в := 361.949 kg*s^-1
G_г := G_в*g_т explicit, ALL → 361.949*kg*s^-1*0.937 = 339.146 kg/s
R_г := 289*J/(kg*K)
T_т := 904.778 K
p_т := 1.023*10^5*m^-1*kg*s^-2
c_та := 191.893*m/s
F_т := G_г*R_г*T_т/(p_т*c_та) explicit, ALL → 339.146213*kg*s^-1*289*J/(kg*K)*904.778*K/(1.023*10^5*m^-1*kg*s^-2*191.893*m/s) = 4.51744 m^2
D_т := sqrt(F_т/(π*l_D)) explicit, ALL → sqrt(4.51743674908*m^2/(π*1/4)) = 2.39829 m
# Длина лопатки последней ступени:
l_т := l_D*D_т explicit, ALL → 1/4*2.398286703*m = 0.599572 m
# Периферийный и втулочный диаметр
D_т.пер := D_т + l_т = 2.99786 m
D_т.вт := D_т.пер - 2*l_т explicit, ALL → 2.99785837875*m - 2*0.599571675749*m = 1.79872 m
# 3) Окружная скорость на среднем диаметре D_т:
n_т := 3000  # об/мин
u_т := π*D_т*n_т/(60*s) explicit, ALL → π*2.398286703*m*3000/(60*s) = 376.722 m/s
# 4) Средний диаметр при выходе из СА первой ступени:
D_1 := D_т
# 5) Окружная скорость на диаметре D_1
u_1 := π*D_1*n_т/(60*s) explicit, ALL → π*2.398286703*m*3000/(60*s) = 376.722 m/s
# 6) Средняя окружная скорость по турбине:
u_ср := sqrt(0.5*(u_1^2 + u_т^2)) = 376.722 m/s
# 7) Оптимальное отношение y_0
y_0 := 0.55
# 8) Средняя скорость за ступенями с_2ср
с_2ср := 180*m/s
# 9) Коэффициент использования скорости μ
μ := 0.9
# 10) Число ступеней:
k_г := 1.3
T*_г := 1673*K
π_т := 18.822
H_т := R_г*k_г/(k_г - 1)*T*_г*(1 - π_т^((1 - k_г)/k_г)) = 1030858 m^2/s^2
# Условная адиабатная скорость полного расширения в турбине
c_0 := sqrt(2*H_т) = 1435.87 m/s
z := (c_0^2/(μ*с_2ср)^2 - 1)/(u_ср^2/((μ*с_2ср)^2*y_0^2) - 1) = 4.59567
# Примем z := 5
# 11) Распределение теплоперепада по ступеням:
# Коэффициент возврата теплоты:
η_л := 0.92
α := (z - 1)/(2*z)*(π_т^((k_г - 1)/k_г) - 1)*(1 - η_л) explicit, ALL → (5 - 1)/(2*5)*(18.822^((1.3 - 1)/1.3) - 1)*(1 - 0.92) = 0.0309946
c_21 := sqrt(2*с_2ср^2 - c_та^2) explicit, ALL → sqrt(2*(180*m/s)^2 - (191.893*m/s)^2) = 167.263 m/s
# Теплоперепад в ступенях:
D_2 := D_1 + (D_т - D_1)/(z - 1)*1 = 2.39829 m
D_3 := D_1 + (D_т - D_1)/(z - 1)*2 = 2.39829 m
D_4 := D_1 + (D_т - D_1)/(z - 1)*3 = 2.39829 m
u_2 := D_2/D_т*u_т = 376.722 m/s
u_3 := D_3/D_т*u_т = 376.722 m/s
u_4 := D_4/D_т*u_т = 376.722 m/s
H_1т := H_т*(1 + α)*(1.07*u_1)^2/(u_1^2 + u_2^2 + u_3^2 + u_4^2 + u_т^2) + 0.5*μ*c_21^2 = 255952 m^2/s^2
H_2т := H_т*(1 + α)*(1.03*u_2)^2/(u_1^2 + u_2^2 + u_3^2 + u_4^2 + u_т^2) = 225507 m^2/s^2
H_3т := H_т*(1 + α)*u_3^2/(u_1^2 + u_2^2 + u_3^2 + u_4^2 + u_т^2) = 212562 m^2/s^2
H_4т := H_т*(1 + α)*(0.95*u_4)^2/(u_1^2 + u_2^2 + u_3^2 + u_4^2 + u_т^2) = 191837 m^2/s^2
H_5т := H_т*(1 + α)*(0.95*u_т)^2/(u_1^2 + u_2^2 + u_3^2 + u_4^2 + u_т^2) = 191837 m^2/s^2
# 12) Степень реактивности по ступеням:
ρ_1 := 0.2
ρ_2 := 0.25
ρ_3 := 0.3
ρ_4 := 0.35
ρ_5 := 0.4
# 13) Располагаемый теплоперепад в СА первой ступени:
H_с1 := H_1т*(1 - ρ_1) = 204761 m^2/s^2
# 14) Угол потока за СА первой ступени:
α_11 := 17*deg
# 15) Скорость за СА первой ступени:
φ := 0.97
c_11 := φ*sqrt(2*H_с1) = 620.741 m/s
# 16) Температура за СА первой ступени:
c_pг := 1305*J/(kg*K)
T_с1 := T*_г - H_с1*φ^2/c_pг = 1525.37 K
# 17) Давление за СА первой ступени:
P*_г := 1.926*10^6*m^-1*kg*s^-2
P_с1 := P*_г*(1 - H_с1/(c_pг*T*_г))^(k_г/(k_г - 1)) = 1256960 kg/(m*s^2)
# 18) Удельный объем за СА первой ступени:
υ_с1 := R_г*T_с1/P_с1 = 0.350712 m^3/kg
# 19) Длина СЛ первой ступени:
l_с1 := G_г*υ_с1/(π*D_1*sin(α_11)*c_11) = 0.0869843 m
D_1.пер := D_1 + l_с1 = 2.48527 m
D_1.вт := D_1.пер - 2*l_с1 = 2.3113 m
l_с2 := 0.137*m
l_с3 := 0.206*m
l_с4 := 0.307*m
l_с5 := 0.465*m
l_р1 := 0.114*m
l_р2 := 0.172*m
l_р3 := 0.256*m
l_р4 := 0.383*m
l_р5 := 0.590*m
# Расчет первой ступени турбины
# 1. Располагаемый теплоперепад первой ступени:
H_1т = 255952 m^2/s^2
# 2. Степень реактивности:
ρ_1 = 0.2
# 3. Располагаемый теплоперепад в СА:
H_с1 := H_1т*(1 - ρ_1) = 204761 m^2/s^2
# 4. Коэффициент скорости:
φ_1 := φ = 0.97
# 5. Скорость за СА:
c_1 := φ_1*sqrt(2*H_с1) explicit, ALL → 0.97*sqrt(2*204761.389122*m^2*s^-2) = 620.741 m/s
# 6. Средняя условная температура первой ступени:
c_pг := 1290*J/(kg*K)
T_у := T*_г - H_1т*φ_1^2/(2*c_pг) explicit, ALL → 1673*K - 255951.736403*m^2*s^-2*0.97^2/(2*1290*J/(kg*K)) = 1579.66 K
# 8. Температура за СА:
T_1 := T*_г - H_с1*φ_1^2/c_pг explicit, ALL → 1673*K - 204761.389122*m^2*s^-2*0.97^2/(1290*J/(kg*K)) = 1523.65 K
# 9. Температура в конце адиабатного расширения в СА:
T'_1 := T*_г - H_с1/c_pг explicit, ALL → 1673*K - 204761.389122*m^2*s^-2/(1290*J/(kg*K)) = 1514.27 K
# 10. Давление перед РЛ:
P_1 := P*_г*(T'_1/T*_г)^(k_г/(k_г - 1)) explicit, ALL → 1.926*10^6*m^-1*kg*s^-2*(1514.27024099*K/(1673*K))^(1.3/(1.3 - 1)) = 1250418 kg/(m*s^2)
# 11. Кольцевая площадь сечения перед РЛ:
A_1а := π*D_1*l_с1 explicit, ALL → π*2.398286703*m*0.0869843238067*m = 0.655378 m^2
# 12. Удельный объем:
υ_1 := R_г*T_1/P_1 explicit, ALL → 289*J/(kg*K)*1523.65116975*K/(1250418.00299*Pa) = 0.35215 m^3/kg
# 13. Средняя скорость перед РЛ:
c_1а := G_г*υ_1/A_1а explicit, ALL → 339.146213*kg*s^-1*0.352150390512*m^3*kg^-1/(0.655378158862*m^2) = 182.231 m/s
# 14. Угол потока за СА:
α_11 := asin(c_1а/c_11)/deg explicit, ALL → asin(182.231387686*m*s^-1/(620.74147763*m*s^-1))/deg = 17.0718
# 15. Относительная скорость при входе в РЛ:
w_1 := sqrt(c_1^2 + u_1^2 - 2*c_11*u_1*cos(α_11*deg)) = 283.114 m/s
# 16. Угол входа потока на РЛ:
β_1 := acot((c_11*cos(α_11*deg) - u_1)/c_1а)/deg = 40.0659
# 17. Располагаемый теплоперепад в РК:
H_л := ρ_1*H_1т*T_1/T'_1 explicit, ALL → 0.2*255951.736403*m^2*s^-2*1523.65116975*K/(1514.27024099*K) = 51507.5 m^2/s^2
# 18. Окружная скорость при входе в РЛ:
u_1 = 376.722 m/s
# 19. Окружная скорость на выходе из РЛ:
D_л1 := D_1
u_21 := π*D_л1*n_т/(60*s) = 376.722 m/s
# 20. Коэффициент скорости в РЛ:
ψ_1 := 0.97
# 21. Относительная скорость за РЛ:
w_2 := ψ_1*sqrt(w_1^2 + 2*H_л + u_21^2 - u_1^2) = 415.142 m/s
# 22. Температура за РЛ:
T_2 := T_1 - (w_2^2 - w_1^2 - u_21^2 + u_1^2)/(2*c_pг) = 1487.92 K
# 23. Температура в конце адиабатного расширения в РЛ:
T'_2 := T_1 - H_л/c_pг explicit, ALL → 1523.65116975*K - 51507.472314*m^2*s^-2/(1290*J/(kg*K)) = 1483.72 K
# 24. Давление за РЛ:
P_2 := P_1*(T'_2/T_1)^(k_г/(k_г - 1)) explicit, ALL → 1250418.00299*Pa*(1483.72289664*K/(1523.65116975*K))^(1.3/(1.3 - 1)) = 1114500 kg/(m*s^2)
# 25. Удельный объем за РЛ:
υ_2 := R_г*T_2/P_2 explicit, ALL → 289*J/(kg*K)*1487.91872753*K/(1114499.72281*Pa) = 0.385831 m^3/kg
# 26. Площадь кольцевого сечения за РЛ:
l_л1 := l_р1 = 0.114 m
A_ла := π*D_л1*l_л1 = 0.858926 m^2
# 27. Осевая скорость за РЛ:
c_2а := G_г*υ_2/A_ла explicit, ALL → 339.146213*kg*s^-1*0.385830972815*m^3*kg^-1/(0.858926147156*m^2) = 152.345 m/s
# 28. Угол выхода потока из РЛ:
β_2 := asin(c_2а/w_2)/deg explicit, ALL → asin(152.345010944*m*s^-1/(415.14215442*m*s^-1))/deg = 21.5289
# 29. Скорость закрутки потока за РЛ:
c_2u := w_2*cos(β_2*deg) - u_21 = 9.45673 m/s
# 30. Угол выхода потока из РЛ:
α_2 := acot(c_2u/c_2а)/deg = 86.448
# 31. Скорость газа за РЛ:
c_2 := sqrt(c_2u^2 + c_2а^2) explicit, ALL → sqrt((9.45672852879*m*s^-1)^2 + (152.345010944*m*s^-1)^2) = 152.638 m/s
# 32. Работа на окружности колеса:
c_1u := cos(α_11*deg)*c_1 explicit, ALL → cos(17.0718382442*deg)*620.74147763*m*s^-1 = 593.39 m/s
W_u := c_1u*u_1 + c_2u*u_21 = 227106 m^2/s^2
# 33. КПД на окружности колеса:
η_u := W_u/H_1т explicit, ALL → 227105.625453*m^2*s^-2/(255951.736403*m^2*s^-2) = 0.887299
# 34. Удельные потери в СА:
h_с := (φ_1^-2 - 1)*c_1^2/2 explicit, ALL → (0.97^-2 - 1)*(620.74147763*m*s^-1)^2/2 = 12101.4 m^2/s^2
# 35. Удельные потери в СА с учетом их использования в РЛ:
h'_с := h_с*T'_2/T_1 explicit, ALL → 12101.3980971*m^2*s^-2*1483.72289664*K/(1523.65116975*K) = 11784.3 m^2/s^2
# 36. Относительные потери в СА:
ξ_С := h_с/H_1т = 0.04728
# 37. Удельные потери в СА с учетом их использования в РЛ:
ξ'_с := ξ_С*T'_2/T_1 explicit, ALL → 0.04728*1483.72289664*K/(1523.65116975*K) = 0.046041
# 38. Удельные потери в РЛ:
h_л := (ψ_1^-2 - 1)*w_2^2/2 explicit, ALL → (0.97^-2 - 1)*(415.14215442*m*s^-1)^2/2 = 5412.62 m^2/s^2
# 39. Относительные потери в РЛ:
ξ_л := h_л/H_1т = 0.021147
# 40. Удельные потери с выходной скоростью:
h_в := c_2^2/2 = 11649.2 m^2/s^2
# 41. Относительные потери с выходной скоростью:
ξ_в := h_в/H_1т = 0.0455133
# 42. КПД  на окружности колеса:
η_u := 1 - ξ'_с - ξ_л - ξ_в explicit, ALL → 1 - 0.046040996749 - 0.0211470409417 - 0.0455133307579 = 0.887299
# 43. Радиальный зазор между корпусом и сопловыми лопатками принимаем равным нулю:
δ_с := 0*m
# 44. Относительный радиальный зазор между корпусом и рабочими лопатками:
δ_D := 0.001
# 45. Радиальный зазор между корпусом и рабочими лопатками:
δ_л := δ_D*D_л1 explicit, ALL → 0.001*2.398286703*m = 0.00239829 m
# 46. Удельные потери в радиальном зазоре:
h_з := 1.37*(1 + 1.6*ρ_1)*(1 + l_л1/D_л1)*δ_л/l_л1*W_u → 9050.79521689*m^2/s^2 = 9050.8 m^2/s^2
# 47. Относительные потери в радиальном зазоре:
ξ_з := h_з/H_1т = 0.0353613
# 48. Удельная работа ступени с учетом потери в радиальном зазоре:
W_uз := W_u - h_з = 218055 m^2/s^2
# 49. Мощностной КПД ступени:
η'_т := η_u - ξ_з = 0.851937
# 50. Лопаточный КПД ступени:
η'_л := η'_т + ξ_в = 0.897451
# 51. Затраты мощности на трение и вентиляцию:
υ_1 := R_г*T_1/P_1 = 0.35215 m^3/kg
N_тв := 1.07*D_л1^2*(u_1/100)^3*(1/υ_1 + 1/υ_2)/2 = 893.592 kg*m^2/s^3
# 52. Удельные потери на трение и вентиляцию:
h_т.в := N_тв/G_г = 2.63483 m^2/s^2
# 53. Относительные потери на трение и вентиляцию:
ξ_т.в := h_т.в/H_1т = 1.02942e-5
# 54. Мощностной КПД  с учетом потерь на трение и вентиляцию:
η_т := η'_т - ξ_т.в explicit, ALL → 0.851937296074 - 1.0294232931e-5 = 0.851927
# 55. Лопаточный КПД  с учетом потерь на трение и вентиляцию:
η_л := η'_л - ξ_т.в explicit, ALL → 0.897450626832 - 1.0294232931e-5 = 0.89744
# 56. Удельная работа ступени:
L_т := H_1т*η_т explicit, ALL → 255951.736403*m^2*s^-2*0.851927001841 = 218052 m^2/s^2
# 57. Температура за ступенью:
T_ст := T_2 + h_з/c_pг + h_т.в/c_pг = 1494.94 K
# 58. Температура торможения за ступенью:
T*_ст := T_ст + h_в/c_pг explicit, ALL → 1494.93689035*K + 11649.216037*m^2*s^-2/(1290*J/(kg*K)) = 1503.97 K
# 59. Давление торможения за ступенью:
P*_ст := P_2*(T*_ст/T_ст)^(k_г/(k_г - 1)) explicit, ALL → 1114499.72281*Pa*(1503.96729038*K/(1494.93689035*K))^(1.3/(1.3 - 1)) = 1143968 kg/(m*s^2)
# 60. Располагаемый теплоперепад по параметрам торможения:
H*_т := c_pг*T*_г*(1 - (P*_ст/P*_г)^((k_г - 1)/k_г)) = 244461 m^2/s^2
# 61. КПД турбины по параметрам торможения:
η*_т := L_т/H*_т explicit, ALL → 218052.19541*m^2*s^-2/(244461.089558*m^2*s^-2) = 0.891971
η_л := η*_т*H*_т/H_1т + c_2^2/(2*H_1т) = 0.89744
# Расчет второй ступени турбины
T*_02 := T*_ст = 1503.97 K
c_pг := 1280*J/(kg*K)
k_г := c_pг/(c_pг - R_г) = 1.29162
P*_02 := P_2*(1 + (μ*c_2)^2/(2*c_pг*T_ст))^(k_г/(k_г - 1)) = 1139047 kg/(m*s^2)
H_2т := H_2т*(1 + (1 - μ)^2*c_2^2/(2*c_pг*T_ст)) + 0.5*(μ*c_2)^2 = 234956 m^2/s^2
# 1. Располагаемый теплоперепад первой ступени:
H_2т = 234956 m^2/s^2
# 2. Степень реактивности:
ρ_2 = 0.25
# 3. Располагаемый теплоперепад в СА:
H_с2 := H_2т*(1 - ρ_2) = 176217 m^2/s^2
# 4. Коэффициент скорости:
φ_2 := φ = 0.97
# 5. Скорость за СА:
c_12 := φ_2*sqrt(2*H_с2) explicit, ALL → 0.97*sqrt(2*176217.338103*m^2*s^-2) = 575.852 m/s
# 6. Средняя условная температура первой ступени:
c_pг := 1270*J/(kg*K)
T_у := T*_02 - H_2т*φ_2^2/(2*c_pг) explicit, ALL → 1503.96729038*K - 234956.450803*m^2*s^-2*0.97^2/(2*1270*J/(kg*K)) = 1416.93 K
# 8. Температура за СА:
T_12 := T*_02 - H_с2*φ_2^2/c_pг explicit, ALL → 1503.96729038*K - 176217.338103*m^2*s^-2*0.97^2/(1270*J/(kg*K)) = 1373.41 K
# 9. Температура в конце адиабатного расширения в СА:
T'_12 := T*_02 - H_с2/c_pг explicit, ALL → 1503.96729038*K - 176217.338103*m^2*s^-2/(1270*J/(kg*K)) = 1365.21 K
# 10. Давление перед РЛ:
P_12 := P*_02*(T'_12/T*_02)^(k_г/(k_г - 1)) explicit, ALL → 1139047.48511*Pa*(1365.21348085*K/(1503.96729038*K))^(1.29162462159/(1.29162462159 - 1)) = 741914 kg/(m*s^2)
# 11. Кольцевая площадь сечения перед РЛ:
A_12а := π*D_2*l_с2 explicit, ALL → π*2.398286703*m*0.137*m = 1.03222 m^2
# 12. Удельный объем:
υ_12 := R_г*T_12/P_12 explicit, ALL → 289*J/(kg*K)*1373.41383099*K/(741913.969307*Pa) = 0.53499 m^3/kg
# 13. Средняя скорость перед РЛ:
c_12а := G_г*υ_12/A_12а explicit, ALL → 339.146213*kg*s^-1*0.534990057577*m^3*kg^-1/(1.03221826457*m^2) = 175.777 m/s
# 14. Угол потока за СА:
α_12 := asin(c_12а/c_12)/deg explicit, ALL → asin(175.776633924*m*s^-1/(575.852226566*m*s^-1))/deg = 17.773
# 15. Относительная скорость при входе в РЛ:
w_12 := sqrt(c_12^2 + u_2^2 - 2*c_12*u_2*cos(α_12*deg)) = 245.683 m/s
# 16. Угол входа потока на РЛ:
β_12 := acot((c_12*cos(α_12*deg) - u_2)/c_12а)/deg = 45.681
# 17. Располагаемый теплоперепад в РК:
H_л2 := ρ_2*H_2т*T_12/T'_12 explicit, ALL → 0.25*234956.450803*m^2*s^-2*1373.41383099*K/(1365.21348085*K) = 59091.9 m^2/s^2
# 18. Окружная скорость при входе в РЛ:
u_2 = 376.722 m/s
# 19. Окружная скорость на выходе из РЛ:
D_л2 := D_2
u_22 := π*D_л2*n_т/(60*s) = 376.722 m/s
# 20. Коэффициент скорости в РЛ:
ψ_2 := 0.97
# 21. Относительная скорость за РЛ:
w_22 := ψ_2*sqrt(w_12^2 + 2*H_л2 + u_22^2 - u_2^2) = 409.868 m/s
# 22. Температура за РЛ:
T_22 := T_12 - (w_22^2 - w_12^2 - u_22^2 + u_2^2)/(2*c_pг) = 1331.04 K
# 23. Температура в конце адиабатного расширения в РЛ:
T'_22 := T_12 - H_л2/c_pг explicit, ALL → 1373.41383099*K - 59091.9375872*m^2*s^-2/(1270*J/(kg*K)) = 1326.88 K
# 24. Давление за РЛ:
P_22 := P_12*(T'_22/T_12)^(k_г/(k_г - 1)) explicit, ALL → 741913.969307*Pa*(1326.88474628*K/(1373.41383099*K))^(1.29162462159/(1.29162462159 - 1)) = 636881 kg/(m*s^2)
# 25. Удельный объем за РЛ:
υ_22 := R_г*T_22/P_22 explicit, ALL → 289*J/(kg*K)*1331.03905589*K/(636881.068413*Pa) = 0.603991 m^3/kg
# 26. Площадь кольцевого сечения за РЛ:
l_л2 := l_р2 = 0.172 m
A_22ла := π*D_л2*l_л2 = 1.29592 m^2
# 27. Осевая скорость за РЛ:
c_22а := G_г*υ_22/A_22ла explicit, ALL → 339.146213*kg*s^-1*0.603990770383*m^3*kg^-1/(1.29592366062*m^2) = 158.066 m/s
# 28. Угол выхода потока из РЛ:
β_22 := asin(c_22а/w_22)/deg explicit, ALL → asin(158.065778631*m*s^-1/(409.86825474*m*s^-1))/deg = 22.6841
# 29. Скорость закрутки потока за РЛ:
c_22u := w_22*cos(β_22*deg) - u_22 = 1.44093 m/s
# 30. Угол выхода потока из РЛ:
α_22 := acot(c_22u/c_22а)/deg = 89.4777
# 31. Скорость газа за РЛ:
c_22 := sqrt(c_22u^2 + c_22а^2) explicit, ALL → sqrt((1.44092802121*m*s^-1)^2 + (158.065778631*m*s^-1)^2) = 158.072 m/s
# 32. Работа на окружности колеса:
c_12u := cos(α_12*deg)*c_12 explicit, ALL → cos(17.7729691832*deg)*575.852226566*m*s^-1 = 548.369 m/s
W_u2 := c_12u*u_2 + c_22u*u_22 = 207125 m^2/s^2
# 33. КПД на окружности колеса:
η_u2 := W_u2/H_2т explicit, ALL → 207125.424474*m^2*s^-2/(234956.450803*m^2*s^-2) = 0.881548
# 34. Удельные потери в СА:
h_с2 := (φ_2^-2 - 1)*c_12^2/2 explicit, ALL → (0.97^-2 - 1)*(575.852226566*m*s^-1)^2/2 = 10414.4 m^2/s^2
# 35. Удельные потери в СА с учетом их использования в РЛ:
h'_с2 := h_с2*T'_22/T_12 explicit, ALL → 10414.4446819*m^2*s^-2*1326.88474628*K/(1373.41383099*K) = 10061.6 m^2/s^2
# 36. Относительные потери в СА:
ξ_С2 := h_с2/H_2т = 0.044325
# 37. Удельные потери в СА с учетом их использования в РЛ:
ξ'_с2 := ξ_С2*T'_22/T_12 explicit, ALL → 0.044325*1326.88474628*K/(1373.41383099*K) = 0.0428233
# 38. Удельные потери в РЛ:
h_л2 := (ψ_2^-2 - 1)*w_22^2/2 explicit, ALL → (0.97^-2 - 1)*(409.86825474*m*s^-1)^2/2 = 5275.97 m^2/s^2
# 39. Относительные потери в РЛ:
ξ_л2 := h_л2/H_2т = 0.0224551
# 40. Удельные потери с выходной скоростью:
h_в2 := c_22^2/2 = 12493.4 m^2/s^2
# 41. Относительные потери с выходной скоростью:
ξ_в2 := h_в2/H_2т = 0.0531734
# 42. КПД  на окружности колеса:
η_u2 := 1 - ξ'_с2 - ξ_л2 - ξ_в2 explicit, ALL → 1 - 0.0428233392235 - 0.022455111116 - 0.0531733999264 = 0.881548
# 43. Радиальный зазор между корпусом и сопловыми лопатками принимаем равным нулю:
# 44. Относительный радиальный зазор между корпусом и рабочими лопатками:
δ_D := 0.001
# 45. Радиальный зазор между корпусом и рабочими лопатками:
δ_л := δ_D*D_л1 explicit, ALL → 0.001*2.398286703*m = 0.00239829 m
# 46. Удельные потери в радиальном зазоре:
h_з2 := 1.37*(1 + 1.6*ρ_2)*(1 + l_л2/D_л2)*δ_л/l_л2*W_u2 → 5936.5637637*m^2/s^2 = 5936.56 m^2/s^2
# 47. Относительные потери в радиальном зазоре:
ξ_з2 := h_з2/H_2т = 0.0252667
# 48. Удельная работа ступени с учетом потери в радиальном зазоре:
W_uз2 := W_u2 - h_з2 = 201189 m^2/s^2
# 49. Мощностной КПД ступени:
η'_т2 := η_u2 - ξ_з2 = 0.856281
# 50. Лопаточный КПД ступени:
η'_л2 := η'_т2 + ξ_в2 = 0.909455
# 51. Затраты мощности на трение и вентиляцию:
υ_12 := R_г*T_12/P_12 = 0.53499 m^3/kg
N_тв2 := 1.07*D_л2^2*(u_2/100)^3*(1/υ_12 + 1/υ_22)/2 = 579.908 kg*m^2/s^3
# 52. Удельные потери на трение и вентиляцию:
h_т.в2 := N_тв2/G_г = 1.70991 m^2/s^2
# 53. Относительные потери на трение и вентиляцию:
ξ_т.в2 := h_т.в2/H_2т = 7.27755e-6
# 54. Мощностной КПД  с учетом потерь на трение и вентиляцию:
η_т2 := η'_т2 - ξ_т.в2 explicit, ALL → 0.856281493963 - 7.2775461196e-6 = 0.856274
# 55. Лопаточный КПД  с учетом потерь на трение и вентиляцию:
η_л2 := η'_л2 - ξ_т.в2 explicit, ALL → 0.909454893889 - 7.2775461196e-6 = 0.909448
# 56. Удельная работа ступени:
L_т2 := H_2т*η_т2 explicit, ALL → 234956.450803*m^2*s^-2*0.856274216417 = 201187 m^2/s^2
# 57. Температура за ступенью:
T_ст2 := T_22 + h_з2/c_pг + h_т.в2/c_pг = 1335.71 K
# 58. Темпеартура торможения за ступенью:
T*_ст2 := T_ст2 + h_в2/c_pг explicit, ALL → 1335.71486193*K + 12493.4333239*m^2*s^-2/(1270*J/(kg*K)) = 1345.55 K
# 59. Давление торможения за ступенью:
P*_ст2 := P_22*(T*_ст2/T_ст2)^(k_г/(k_г - 1)) explicit, ALL → 636881.068413*Pa*(1345.55221101*K/(1335.71486193*K))^(1.29162462159/(1.29162462159 - 1)) = 657920 kg/(m*s^2)
# 60. Располагаемый теплоперепад по параметрам торможения:
H*_2т := c_pг*T*_02*(1 - (P*_ст2/P*_02)^((k_г - 1)/k_г)) = 222620 m^2/s^2
# 61. КПД турбины по параметрам торможения:
η*_т2 := L_т2/H*_2т explicit, ALL → 201187.150804*m^2*s^-2/(222619.711197*m^2*s^-2) = 0.903726
η_л2 := η*_т2*H*_2т/H_2т + c_22^2/(2*H_2т) = 0.909448
# Расчет третей ступени турбины
T*_03 := T*_ст2 = 1345.55 K
c_pг := 1260*J/(kg*K)
k_г := c_pг/(c_pг - R_г) = 1.29763
P*_03 := P_22*(1 + (μ*c_22)^2/(2*c_pг*T_ст2))^(k_г/(k_г - 1)) = 653747 kg/(m*s^2)
H_3т := H_3т*(1 + (1 - μ)^2*c_22^2/(2*c_pг*T_ст2)) + 0.5*(μ*c_22)^2 = 222697 m^2/s^2
# 1. Располагаемый теплоперепад первой ступени:
H_3т = 222697 m^2/s^2
# 2. Степень реактивности:
ρ_3 = 0.3
# 3. Располагаемый теплоперепад в СА:
H_с3 := H_3т*(1 - ρ_3) = 155888 m^2/s^2
# 4. Коэффициент скорости:
φ_3 := φ = 0.97
# 5. Скорость за СА:
c_13 := φ_3*sqrt(2*H_с3) explicit, ALL → 0.97*sqrt(2*155888.110898*m^2*s^-2) = 541.618 m/s
# 6. Средняя условная температура первой ступени:
c_pг := 1250*J/(kg*K)
T_у := T*_03 - H_3т*φ_3^2/(2*c_pг) explicit, ALL → 1345.55221101*K - 222697.301283*m^2*s^-2*0.97^2/(2*1250*J/(kg*K)) = 1261.74 K
# 8. Температура за СА:
T_13 := T*_03 - H_с3*φ_3^2/c_pг explicit, ALL → 1345.55221101*K - 155888.110898*m^2*s^-2*0.97^2/(1250*J/(kg*K)) = 1228.21 K
# 9. Температура в конце адиабатного расширения в СА:
T'_13 := T*_03 - H_с3/c_pг explicit, ALL → 1345.55221101*K - 155888.110898*m^2*s^-2/(1250*J/(kg*K)) = 1220.84 K
# 10. Давление перед РЛ:
P_13 := P*_03*(T'_13/T*_03)^(k_г/(k_г - 1)) explicit, ALL → 653746.561411*Pa*(1220.84172229*K/(1345.55221101*K))^(1.29763130793/(1.29763130793 - 1)) = 427803 kg/(m*s^2)
# 11. Кольцевая площадь сечения перед РЛ:
A_13а := π*D_3*l_с3 explicit, ALL → π*2.398286703*m*0.206*m = 1.55209 m^2
# 12. Удельный объем:
υ_13 := R_г*T_13/P_13 explicit, ALL → 289*J/(kg*K)*1228.21211217*K/(427802.8465*Pa) = 0.829712 m^3/kg
# 13. Средняя скорость перед РЛ:
c_13а := G_г*υ_13/A_13а explicit, ALL → 339.146213*kg*s^-1*0.829712339041*m^3*kg^-1/(1.55209461679*m^2) = 181.299 m/s
# 14. Угол потока за СА:
α_13 := asin(c_13а/c_13)/deg explicit, ALL → asin(181.299383827*m*s^-1/(541.618174628*m*s^-1))/deg = 19.5565
# 15. Относительная скорость при входе в РЛ:
w_13 := sqrt(c_13^2 + u_3^2 - 2*c_13*u_3*cos(α_13*deg)) = 225.238 m/s
# 16. Угол входа потока на РЛ:
β_13 := acot((c_13*cos(α_13*deg) - u_3)/c_13а)/deg = 53.6029
# 17. Располагаемый теплоперепад в РК:
H_л3 := ρ_3*H_3т*T_13/T'_13 explicit, ALL → 0.3*222697.301283*m^2*s^-2*1228.21211217*K/(1220.84172229*K) = 67212.5 m^2/s^2
# 18. Окружная скорость при входе в РЛ:
u_3 = 376.722 m/s
# 19. Окружная скорость на выходе из РЛ:
D_л3 := D_3
u_23 := π*D_л3*n_т/(60*s) = 376.722 m/s
# 20. Коэффициент скорости в РЛ:
ψ_3 := 0.97
# 21. Относительная скорость за РЛ:
w_23 := ψ_3*sqrt(w_13^2 + 2*H_л3 + u_23^2 - u_3^2) = 417.39 m/s
# 22. Температура за РЛ:
T_13 = 1228.21 K
T_23 := T_13 - (w_23^2 - w_13^2 - u_23^2 + u_3^2)/(2*c_pг) = 1178.82 K
# 23. Температура в конце адиабатного расширения в РЛ:
T'_23 := T_13 - H_л3/c_pг explicit, ALL → 1228.21211217*K - 67212.5266829*m^2*s^-2/(1250*J/(kg*K)) = 1174.44 K
# 24. Давление за РЛ:
P_23 := P_13*(T'_23/T_13)^(k_г/(k_г - 1)) explicit, ALL → 427802.8465*Pa*(1174.44209083*K/(1228.21211217*K))^(1.29763130793/(1.29763130793 - 1)) = 351949 kg/(m*s^2)
# 25. Удельный объем за РЛ:
υ_23 := R_г*T_23/P_23 explicit, ALL → 289*J/(kg*K)*1178.81920606*K/(351949.417428*Pa) = 0.967976 m^3/kg
# 26. Площадь кольцевого сечения за РЛ:
l_л3 := l_р3 = 0.256 m
A_23ла := π*D_л3*l_л3 = 1.92882 m^2
# 27. Осевая скорость за РЛ:
c_23а := G_г*υ_23/A_23ла explicit, ALL → 339.146213*kg*s^-1*0.967976458209*m^3*kg^-1/(1.92881661116*m^2) = 170.2 m/s
# 28. Угол выхода потока из РЛ:
β_23 := asin(c_23а/w_23)/deg explicit, ALL → asin(170.200499195*m*s^-1/(417.389950364*m*s^-1))/deg = 24.065
# 29. Скорость закрутки потока за РЛ:
c_23u := w_23*cos(β_23*deg) - u_23 = 4.38975 m/s
# 30. Угол выхода потока из РЛ:
α_23 := acot(c_23u/c_23а)/deg = 88.5226
# 31. Скорость газа за РЛ:
c_23 := sqrt(c_23u^2 + c_23а^2) explicit, ALL → sqrt((4.38974874658*m*s^-1)^2 + (170.200499195*m*s^-1)^2) = 170.257 m/s
# 32. Работа на окружности колеса:
c_13u := cos(α_13*deg)*c_13 explicit, ALL → cos(19.5565167621*deg)*541.618174628*m*s^-1 = 510.373 m/s
W_u3 := c_13u*u_3 + c_23u*u_23 = 193923 m^2/s^2
# 33. КПД на окружности колеса:
η_u3 := W_u3/H_3т explicit, ALL → 193922.516276*m^2*s^-2/(222697.301283*m^2*s^-2) = 0.87079
# 34. Удельные потери в СА:
h_с3 := (φ_3^-2 - 1)*c_13^2/2 explicit, ALL → (0.97^-2 - 1)*(541.618174628*m*s^-1)^2/2 = 9212.99 m^2/s^2
# 35. Удельные потери в СА с учетом их использования в РЛ:
h'_с3 := h_с3*T'_23/T_13 explicit, ALL → 9212.98735406*m^2*s^-2*1174.44209083*K/(1228.21211217*K) = 8809.65 m^2/s^2
# 36. Относительные потери в СА:
ξ_С3 := h_с3/H_3т = 0.04137
# 37. Удельные потери в СА с учетом их использования в РЛ:
ξ'_с3 := ξ_С3*T'_23/T_13 explicit, ALL → 0.04137*1174.44209083*K/(1228.21211217*K) = 0.0395589
# 38. Удельные потери в РЛ:
h_л3 := (ψ_3^-2 - 1)*w_23^2/2 explicit, ALL → (0.97^-2 - 1)*(417.389950364*m*s^-1)^2/2 = 5471.39 m^2/s^2
# 39. Относительные потери в РЛ:
ξ_л3 := h_л3/H_3т = 0.0245687
# 40. Удельные потери с выходной скоростью:
h_в3 := c_23^2/2 = 14493.7 m^2/s^2
# 41. Относительные потери с выходной скоростью:
ξ_в3 := h_в3/H_3т = 0.0650827
# 42. КПД  на окружности колеса:
η_u3 := 1 - ξ'_с3 - ξ_л3 - ξ_в3 explicit, ALL → 1 - 0.0395588586173 - 0.0245687487431 - 0.0650826921866 = 0.87079
# 43. Радиальный зазор между корпусом и сопловыми лопатками принимаем равным нулю:
δ_с := 0*m
# 44. Относительный радиальный зазор между корпусом и рабочими лопатками:
δ_D := 0.001
# 45. Радиальный зазор между корпусом и рабочими лопатками:
δ_л := δ_D*D_л3 explicit, ALL → 0.001*2.398286703*m = 0.00239829 m
# 46. Удельные потери в радиальном зазоре:
h_з3 := 1.37*(1 + 1.6*ρ_3)*(1 + l_л3/D_л3)*δ_л/l_л3*W_u3 → 4076.79042625*m^2/s^2 = 4076.79 m^2/s^2
# 47. Относительные потери в радиальном зазоре:
ξ_з3 := h_з3/H_3т = 0.0183064
# 48. Удельная работа ступени с учетом потери в радиальном зазоре:
W_uз3 := W_u3 - h_з3 = 189846 m^2/s^2
# 49. Мощностной КПД ступени:
η'_т3 := η_u3 - ξ_з3 = 0.852483
# 50. Лопаточный КПД ступени:
η'_л3 := η'_т3 + ξ_в3 = 0.917566
# 51. Затраты мощности на трение и вентиляцию:
υ_13 := R_г*T_13/P_13 = 0.829712 m^3/kg
N_тв3 := 1.07*D_л3^2*(u_3/100)^3*(1/υ_13 + 1/υ_23)/2 = 368.249 kg*m^2/s^3
# 52. Удельные потери на трение и вентиляцию:
h_т.в3 := N_тв3/G_г = 1.08581 m^2/s^2
# 53. Относительные потери на трение и вентиляцию:
ξ_т.в3 := h_т.в3/H_3т = 4.87572e-6
# 54. Мощностной КПД  с учетом потерь на трение и вентиляцию:
η_т3 := η'_т3 - ξ_т.в3 explicit, ALL → 0.852483280022 - 4.8757244427e-6 = 0.852478
# 55. Лопаточный КПД  с учетом потерь на трение и вентиляцию:
η_л3 := η'_л3 - ξ_т.в3 explicit, ALL → 0.917565972208 - 4.8757244427e-6 = 0.917561
# 56. Удельная работа ступени:
L_т3 := H_3т*η_т3 explicit, ALL → 222697.301283*m^2*s^-2*0.852478404297 = 189845 m^2/s^2
# 57. Температура за ступенью:
T_ст3 := T_23 + h_з3/c_pг + h_т.в3/c_pг = 1182.08 K
# 58. Темпеартура торможения за ступенью:
T*_ст3 := T_ст3 + h_в3/c_pг explicit, ALL → 1182.08150705*K + 14493.7399101*m^2*s^-2/(1250*J/(kg*K)) = 1193.68 K
# 59. Давление торможения за ступенью:
P*_ст3 := P_23*(T*_ст3/T_ст3)^(k_г/(k_г - 1)) explicit, ALL → 351949.417428*Pa*(1193.67649898*K/(1182.08150705*K))^(1.29763130793/(1.29763130793 - 1)) = 367251 kg/(m*s^2)
# 60. Располагаемый теплоперепад по параметрам торможения:
H*_3т := c_pг*T*_03*(1 - (P*_ст3/P*_03)^((k_г - 1)/k_г)) = 208384 m^2/s^2
# 61. КПД турбины по параметрам торможения:
η*_т3 := L_т3/H*_3т explicit, ALL → 189844.640039*m^2*s^-2/(208383.643324*m^2*s^-2) = 0.911034
η_л3 := η*_т3*H*_3т/H_3т + c_23^2/(2*H_3т) = 0.917561
# Расчет четвертой ступени турбины
T*_04 := T*_ст3 = 1193.68 K
c_pг := 1230*J/(kg*K)
k_г := c_pг/(c_pг - R_г) = 1.30712
P*_04 := P_23*(1 + (μ*c_23)^2/(2*c_pг*T_ст3))^(k_г/(k_г - 1)) = 364204 kg/(m*s^2)
H_4т := H_4т*(1 + (1 - μ)^2*c_23^2/(2*c_pг*T_ст3)) + 0.5*(μ*c_23)^2 = 203596 m^2/s^2  # c_23
# 1. Располагаемый теплоперепад первой ступени:
H_4т = 203596 m^2/s^2
# 2. Степень реактивности:
ρ_4 = 0.35
# 3. Располагаемый теплоперепад в СА:
H_с4 := H_4т*(1 - ρ_4) = 132337 m^2/s^2
# 4. Коэффициент скорости:
φ_4 := φ = 0.97
# 5. Скорость за СА:
c_14 := φ_4*sqrt(2*H_с4) explicit, ALL → 0.97*sqrt(2*132337.474215*m^2*s^-2) = 499.032 m/s
# 6. Средняя условная температура первой ступени:
c_pг := 1220*J/(kg*K)
T_у := T*_04 - H_4т*φ_4^2/(2*c_pг) explicit, ALL → 1193.67649898*K - 203596.114177*m^2*s^-2*0.97^2/(2*1220*J/(kg*K)) = 1115.17 K
# 8. Температура за СА:
T_14 := T*_04 - H_с4*φ_4^2/c_pг explicit, ALL → 1193.67649898*K - 132337.474215*m^2*s^-2*0.97^2/(1220*J/(kg*K)) = 1091.61 K
# 9. Температура в конце адиабатного расширения в СА:
T'_14 := T*_04 - H_с4/c_pг explicit, ALL → 1193.67649898*K - 132337.474215*m^2*s^-2/(1220*J/(kg*K)) = 1085.2 K
# 10. Давление перед РЛ:
P_14 := P*_04*(T'_14/T*_04)^(k_г/(k_г - 1)) explicit, ALL → 364204.226734*Pa*(1085.20315946*K/(1193.67649898*K))^(1.30712008502/(1.30712008502 - 1)) = 242800 kg/(m*s^2)
# 11. Кольцевая площадь сечения перед РЛ:
A_14а := π*D_4*l_с4 explicit, ALL → π*2.398286703*m*0.307*m = 2.31307 m^2
# 12. Удельный объем:
υ_14 := R_г*T_14/P_14 explicit, ALL → 289*J/(kg*K)*1091.61393382*K/(242799.709333*Pa) = 1.29933 m^3/kg
# 13. Средняя скорость перед РЛ:
c_14а := G_г*υ_14/A_14а explicit, ALL → 339.146213*kg*s^-1*1.29932786057*m^3*kg^-1/(2.31307304541*m^2) = 190.509 m/s
# 14. Угол потока за СА:
α_14 := asin(c_14а/c_14)/deg explicit, ALL → asin(190.509385007*m*s^-1/(499.031721415*m*s^-1))/deg = 22.4426
# 15. Относительная скорость при входе в РЛ:
w_14 := sqrt(c_14^2 + u_4^2 - 2*c_14*u_4*cos(α_14*deg)) = 208.414 m/s
# 16. Угол входа потока на РЛ:
β_14 := acot((c_14*cos(α_14*deg) - u_4)/c_14а)/deg = 66.0769
# 17. Располагаемый теплоперепад в РК:
H_л4 := ρ_4*H_4т*T_14/T'_14 explicit, ALL → 0.35*203596.114177*m^2*s^-2*1091.61393382*K/(1085.20315946*K) = 71679.6 m^2/s^2
# 18. Окружная скорость при входе в РЛ:
u_4 = 376.722 m/s
# 19. Окружная скорость на выходе из РЛ:
D_л4 := D_4
u_24 := π*D_л4*n_т/(60*s) = 376.722 m/s
# 20. Коэффициент скорости в РЛ:
ψ_4 := 0.97
# 21. Относительная скорость за РЛ:
w_24 := ψ_4*sqrt(w_14^2 + 2*H_л4 + u_24^2 - u_4^2) = 419.233 m/s
# 22. Температура за РЛ:
T_24 := T_14 - (w_24^2 - w_14^2 - u_24^2 + u_4^2)/(2*c_pг) = 1037.38 K
# 23. Температура в конце адиабатного расширения в РЛ:
T'_24 := T_14 - H_л4/c_pг explicit, ALL → 1091.61393382*K - 71679.5962211*m^2*s^-2/(1220*J/(kg*K)) = 1032.86 K
# 24. Давление за РЛ:
P_24 := P_14*(T'_24/T_14)^(k_г/(k_г - 1)) explicit, ALL → 242799.709333*Pa*(1032.86016643*K/(1091.61393382*K))^(1.30712008502/(1.30712008502 - 1)) = 191861 kg/(m*s^2)
# 25. Удельный объем за РЛ:
υ_24 := R_г*T_24/P_24 explicit, ALL → 289*J/(kg*K)*1037.38460252*K/(191860.518499*Pa) = 1.56262 m^3/kg
# 26. Площадь кольцевого сечения за РЛ:
l_л4 := l_р4 = 0.383 m
A_24ла := π*D_л4*l_л4 = 2.88569 m^2
# 27. Осевая скорость за РЛ:
c_24а := G_г*υ_24/A_24ла explicit, ALL → 339.146213*kg*s^-1*1.56261513558*m^3*kg^-1/(2.88569047685*m^2) = 183.649 m/s
# 28. Угол выхода потока из РЛ:
β_24 := asin(c_24а/w_24)/deg explicit, ALL → asin(183.649289437*m*s^-1/(419.232686343*m*s^-1))/deg = 25.9802
# 29. Скорость закрутки потока за РЛ:
c_24u := w_24*cos(β_24*deg) - u_24 = 0.145335 m/s
# 30. Угол выхода потока из РЛ:
α_24 := acot(c_24u/c_24а)/deg = 89.9547
# 31. Скорость газа за РЛ:
c_24 := sqrt(c_24u^2 + c_24а^2) explicit, ALL → sqrt((0.145334791882*m*s^-1)^2 + (183.649289437*m*s^-1)^2) = 183.649 m/s
# 32. Работа на окружности колеса:
c_14u := cos(α_14*deg)*c_14 explicit, ALL → cos(22.4426239231*deg)*499.031721415*m*s^-1 = 461.236 m/s
W_u4 := c_14u*u_4 + c_24u*u_24 = 173813 m^2/s^2
# 33. КПД на окружности колеса:
η_u4 := W_u4/H_4т explicit, ALL → 173812.572364*m^2*s^-2/(203596.114177*m^2*s^-2) = 0.853713
# 34. Удельные потери в СА:
h_с4 := (φ_4^-2 - 1)*c_14^2/2 explicit, ALL → (0.97^-2 - 1)*(499.031721415*m*s^-1)^2/2 = 7821.14 m^2/s^2
# 35. Удельные потери в СА с учетом их использования в РЛ:
h'_с4 := h_с4*T'_24/T_14 explicit, ALL → 7821.14472611*m^2*s^-2*1032.86016643*K/(1091.61393382*K) = 7400.19 m^2/s^2
# 36. Относительные потери в СА:
ξ_С4 := h_с4/H_4т = 0.038415
# 37. Удельные потери в СА с учетом их использования в РЛ:
ξ'_с4 := ξ_С4*T'_24/T_14 explicit, ALL → 0.038415*1032.86016643*K/(1091.61393382*K) = 0.0363474
# 38. Удельные потери в РЛ:
h_л4 := (ψ_4^-2 - 1)*w_24^2/2 explicit, ALL → (0.97^-2 - 1)*(419.232686343*m*s^-1)^2/2 = 5519.81 m^2/s^2
# 39. Относительные потери в РЛ:
ξ_л4 := h_л4/H_4т = 0.0271116
# 40. Удельные потери с выходной скоростью:
h_в4 := c_24^2/2 = 16863.5 m^2/s^2
# 41. Относительные потери с выходной скоростью:
ξ_в4 := h_в4/H_4т = 0.0828284
# 42. КПД  на окружности колеса:
η_u4 := 1 - ξ'_с4 - ξ_л4 - ξ_в4 explicit, ALL → 1 - 0.0363473954152 - 0.0271115784887 - 0.0828284045827 = 0.853713
# 43. Радиальный зазор между корпусом и сопловыми лопатками принимаем равным нулю:
δ_с := 0*m
# 44. Относительный радиальный зазор между корпусом и рабочими лопатками:
δ_D := 0.001
# 45. Радиальный зазор между корпусом и рабочими лопатками:
δ_л := δ_D*D_л4 explicit, ALL → 0.001*2.398286703*m = 0.00239829 m
# 46. Удельные потери в радиальном зазоре:
h_з4 := 1.37*(1 + 1.6*ρ_4)*(1 + l_л4/D_л4)*δ_л/l_л4*W_u4 → 2697.57381952*m^2/s^2 = 2697.57 m^2/s^2
# 47. Относительные потери в радиальном зазоре:
ξ_з4 := h_з4/H_4т = 0.0132496
# 48. Удельная работа ступени с учетом потери в радиальном зазоре:
W_uз4 := W_u4 - h_з4 = 171115 m^2/s^2
# 49. Мощностной КПД ступени:
η'_т4 := η_u4 - ξ_з4 = 0.840463
# 50. Лопаточный КПД ступени:
η'_л4 := η'_т4 + ξ_в4 = 0.923291
# 51. Затраты мощности на трение и вентиляцию:
υ_14 := R_г*T_14/P_14 = 1.29933 m^3/kg
N_тв4 := 1.07*D_л4^2*(u_4/100)^3*(1/υ_14 + 1/υ_24)/2 = 231.904 kg*m^2/s^3
# 52. Удельные потери на трение и вентиляцию:
h_т.в4 := N_тв4/G_г = 0.683789 m^2/s^2
# 53. Относительные потери на трение и вентиляцию:
ξ_т.в4 := h_т.в4/H_4т = 3.35856e-6
# 54. Мощностной КПД  с учетом потерь на трение и вентиляцию:
η_т4 := η'_т4 - ξ_т.в4 explicit, ALL → 0.840462988384 - 3.35855647916e-6 = 0.84046
# 55. Лопаточный КПД  с учетом потерь на трение и вентиляцию:
η_л4 := η'_л4 - ξ_т.в4 explicit, ALL → 0.923291392966 - 3.35855647916e-6 = 0.923288
# 56. Удельная работа ступени:
L_т4 := H_4т*η_т4 explicit, ALL → 203596.114177*m^2*s^-2*0.840459629827 = 171114 m^2/s^2
# 57. Температура за ступенью:
T_ст4 := T_24 + h_з4/c_pг + h_т.в4/c_pг = 1039.6 K
# 58. Темпеартура торможения за ступенью:
T*_ст4 := T_ст4 + h_в4/c_pг explicit, ALL → 1039.59628908*K + 16863.5413165*m^2*s^-2/(1220*J/(kg*K)) = 1053.42 K
# 59. Давление торможения за ступенью:
P*_ст4 := P_24*(T*_ст4/T_ст4)^(k_г/(k_г - 1)) explicit, ALL → 191860.518499*Pa*(1053.41886393*K/(1039.59628908*K))^(1.30712008502/(1.30712008502 - 1)) = 202955 kg/(m*s^2)
# 60. Располагаемый теплоперепад по параметрам торможения:
H*_4т := c_pг*T*_04*(1 - (P*_ст4/P*_04)^((k_г - 1)/k_г)) = 186940 m^2/s^2
# 61. КПД турбины по параметрам торможения:
η*_т4 := L_т4/H*_4т explicit, ALL → 171114.314755*m^2*s^-2/(186940.234762*m^2*s^-2) = 0.915342
η_л4 := η*_т4*H*_4т/H_4т + c_24^2/(2*H_4т) = 0.923288
# Расчет пятой ступени турбины
T*_05 := T*_ст4 = 1053.42 K
c_pг := 1180*J/(kg*K)
k_г := c_pг/(c_pг - R_г) = 1.32435
P*_05 := P_24*(1 + (μ*c_24)^2/(2*c_pг*T_ст4))^(k_г/(k_г - 1)) = 200734 kg/(m*s^2)
H_5т := c_pг*T*_05*(1 - (p_т/P*_05)^((k_г - 1)/k_г)) = 189169 m^2/s^2
# 1. Располагаемый теплоперепад первой ступени:
H_5т = 189169 m^2/s^2
# 2. Степень реактивности:
H_4т = 203596 m^2/s^2
ρ_2 = 0.25
ρ_5 = 0.4
# 3. Располагаемый теплоперепад в СА:
H_с5 := H_5т*(1 - ρ_5) = 113501 m^2/s^2
# 4. Коэффициент скорости:
φ_5 := φ = 0.97
# 5. Скорость за СА:
c_15 := φ_5*sqrt(2*H_с5) explicit, ALL → 0.97*sqrt(2*113501.252815*m^2*s^-2) = 462.154 m/s
# 6. Средняя условная температура первой ступени:
c_pг = 1180 m^2/(K*s^2)
T_у := T*_05 - H_5т*φ_5^2/(2*c_pг) explicit, ALL → 1053.41886393*K - 189168.754692*m^2*s^-2*0.97^2/(2*1180*J/(kg*K)) = 978 K
# 8. Температура за СА:
T_15 := T*_05 - H_с5*φ_5^2/c_pг explicit, ALL → 1053.41886393*K - 113501.252815*m^2*s^-2*0.97^2/(1180*J/(kg*K)) = 962.916 K
T_14 = 1091.61 K
# 9. Температура в конце адиабатного расширения в СА:
T'_15 := T*_05 - H_с5/c_pг explicit, ALL → 1053.41886393*K - 113501.252815*m^2*s^-2/(1180*J/(kg*K)) = 957.231 K
# 10. Давление перед РЛ:
P_15 := P*_05*(T'_15/T*_05)^(k_г/(k_г - 1)) explicit, ALL → 200734.223193*Pa*(957.231361545*K/(1053.41886393*K))^(1.32435465769/(1.32435465769 - 1)) = 135779 kg/(m*s^2)
# 11. Кольцевая площадь сечения перед РЛ:
P_14 = 242800 kg/(m*s^2)
A_15а := π*D_т*l_с5 explicit, ALL → π*2.398286703*m*0.465*m = 3.50351 m^2
# 12. Удельный объем:
υ_15 := R_г*T_15/P_15 explicit, ALL → 289*J/(kg*K)*962.916042936*K/(135778.615409*Pa) = 2.04953 m^3/kg
# 13. Средняя скорость перед РЛ:
c_15а := G_г*υ_15/A_15а explicit, ALL → 339.146213*kg*s^-1*2.049532878*m^3*kg^-1/(3.50351454761*m^2) = 198.398 m/s
# 14. Угол потока за СА:
α_15 := asin(c_15а/c_15)/deg explicit, ALL → asin(198.398295353*m*s^-1/(462.154365497*m*s^-1))/deg = 25.4225
# 15. Относительная скорость при входе в РЛ:
w_15 := sqrt(c_15^2 + u_т^2 - 2*c_15*u_т*cos(α_15*deg)) = 202.526 m/s
# 16. Угол входа потока на РЛ:
β_15 := acot((c_15*cos(α_15*deg) - u_т)/c_15а)/deg = 78.4124
β_14 = 66.0769
# 17. Располагаемый теплоперепад в РК:
H_л5 := c_pг*T_15*(1 - (p_т/P_15)^((k_г - 1)/k_г)) = 76116.9 m^2/s^2
# 18. Окружная скорость при входе в РЛ:
u_т = 376.722 m/s
# 19. Окружная скорость на выходе из РЛ:
D_л5 := D_т
u_25 := π*D_л5*n_т/(60*s) = 376.722 m/s
# 20. Коэффициент скорости в РЛ:
ψ_5 := 0.97
# 21. Относительная скорость за РЛ:
w_25 := ψ_5*sqrt(w_15^2 + 2*H_л5 + u_25^2 - u_т^2) = 426.415 m/s
# 22. Температура за РЛ:
T_24 = 1037.38 K
T_25 := T_15 - (w_25^2 - w_15^2 - u_25^2 + u_т^2)/(2*c_pг) = 903.25 K
# 23. Температура в конце адиабатного расширения в РЛ:
T'_25 := T_15 - H_л5/c_pг explicit, ALL → 962.916042936*K - 76116.8662176*m^2*s^-2/(1180*J/(kg*K)) = 898.41 K
# 24. Давление за РЛ:
P_25 := P_15*(T'_25/T_15)^(k_г/(k_г - 1)) explicit, ALL → 135778.615409*Pa*(898.410224108*K/(962.916042936*K))^(1.32435465769/(1.32435465769 - 1)) = 102300 kg/(m*s^2)
# 25. Удельный объем за РЛ:
P_24 = 191861 kg/(m*s^2)
υ_25 := R_г*T_25/P_25 explicit, ALL → 289*J/(kg*K)*903.2496755*K/(102300*Pa) = 2.5517 m^3/kg
# 26. Площадь кольцевого сечения за РЛ:
l_л5 := l_р5 = 0.59 m
A_25ла := π*D_л5*l_л5 = 4.44532 m^2
# 27. Осевая скорость за РЛ:
c_25а := G_г*υ_25/A_25ла explicit, ALL → 339.146213*kg*s^-1*2.55170240684*m^3*kg^-1/(4.44531953353*m^2) = 194.677 m/s
# 28. Угол выхода потока из РЛ:
β_24 = 25.9802
β_25 := asin(c_25а/w_25)/deg explicit, ALL → asin(194.676715915*m*s^-1/(426.414595396*m*s^-1))/deg = 27.1643
# 29. Скорость закрутки потока за РЛ:
c_25u := w_25*cos(β_25*deg) - u_25 = 2.65959 m/s
# 30. Угол выхода потока из РЛ:
α_25 := acot(c_25u/c_25а)/deg = 89.2173
# 31. Скорость газа за РЛ:
c_25 := sqrt(c_25u^2 + c_25а^2) explicit, ALL → sqrt((2.65958590173*m*s^-1)^2 + (194.676715915*m*s^-1)^2) = 194.695 m/s
# 32. Работа на окружности колеса:
c_15u := cos(α_15*deg)*c_15 explicit, ALL → cos(25.422516757*deg)*462.154365497*m*s^-1 = 417.402 m/s
W_u5 := c_15u*u_т + c_25u*u_25 = 158247 m^2/s^2
# 33. КПД на окружности колеса:
η_u4 = 0.853713
η_u5 := W_u5/H_5т explicit, ALL → 158246.59379*m^2*s^-2/(189168.754692*m^2*s^-2) = 0.836537
# 34. Удельные потери в СА:
h_с5 := (φ_5^-2 - 1)*c_15^2/2 explicit, ALL → (0.97^-2 - 1)*(462.154365497*m*s^-1)^2/2 = 6707.92 m^2/s^2
# 35. Удельные потери в СА с учетом их использования в РЛ:
h'_с5 := h_с5*T'_25/T_15 explicit, ALL → 6707.92404138*m^2*s^-2*898.410224108*K/(962.916042936*K) = 6258.56 m^2/s^2
# 36. Относительные потери в СА:
ξ_С5 := h_с5/H_5т = 0.03546
# 37. Удельные потери в СА с учетом их использования в РЛ:
ξ'_с5 := ξ_С5*T'_25/T_15 explicit, ALL → 0.03546*898.410224108*K/(962.916042936*K) = 0.0330845
# 38. Удельные потери в РЛ:
h_л5 := (ψ_5^-2 - 1)*w_25^2/2 explicit, ALL → (0.97^-2 - 1)*(426.414595396*m*s^-1)^2/2 = 5710.55 m^2/s^2
# 39. Относительные потери в РЛ:
ξ_л5 := h_л5/H_5т = 0.0301876
# 40. Удельные потери с выходной скоростью:
h_в5 := c_25^2/2 = 18953 m^2/s^2
# 41. Относительные потери с выходной скоростью:
ξ_в5 := h_в5/H_5т = 0.100191
# 42. КПД  на окружности колеса:
η_u5 := 1 - ξ'_с5 - ξ_л5 - ξ_в5 explicit, ALL → 1 - 0.0330845319076 - 0.0301876102757 - 0.100191221268 = 0.836537
# 43. Радиальный зазор между корпусом и сопловыми лопатками принимаем равным нулю:
δ_с := 0*m
# 44. Относительный радиальный зазор между корпусом и рабочими лопатками:
δ_D := 0.001
# 45. Радиальный зазор между корпусом и рабочими лопатками:
δ_л := δ_D*D_л4 explicit, ALL → 0.001*2.398286703*m = 0.00239829 m
# 46. Удельные потери в радиальном зазоре:
h_з5 := 1.37*(1 + 1.6*ρ_5)*(1 + l_л5/D_л5)*δ_л/l_л5*W_u5 → 1800.81473936*m^2/s^2 = 1800.81 m^2/s^2
# 47. Относительные потери в радиальном зазоре:
ξ_з5 := h_з5/H_5т = 0.00951962
# 48. Удельная работа ступени с учетом потери в радиальном зазоре:
W_uз5 := W_u5 - h_з5 = 156446 m^2/s^2
# 49. Мощностной КПД ступени:
η'_т5 := η_u5 - ξ_з5 = 0.827017
# 50. Лопаточный КПД ступени:
η'_т4 = 0.840463
η'_л5 := η'_т5 + ξ_в5 = 0.927208
η'_л4 = 0.923291
# 51. Затраты мощности на трение и вентиляцию:
υ_15 := R_г*T_15/P_15 = 2.04953 m^3/kg
N_тв5 := 1.07*D_л5^2*(u_т/100)^3*(1/υ_15 + 1/υ_25)/2 = 144.747 kg*m^2/s^3
# 52. Удельные потери на трение и вентиляцию:
h_т.в5 := N_тв5/G_г = 0.426797 m^2/s^2
# 53. Относительные потери на трение и вентиляцию:
ξ_т.в5 := h_т.в5/H_5т = 2.25617e-6
η_т2 = 0.856274
# 54. Мощностной КПД  с учетом потерь на трение и вентиляцию:
η_т5 := η'_т5 - ξ_т.в5 explicit, ALL → 0.827017016132 - 2.25617126073e-6 = 0.827015
# 55. Лопаточный КПД  с учетом потерь на трение и вентиляцию:
η_л5 := η'_л5 - ξ_т.в5 explicit, ALL → 0.9272082374 - 2.25617126073e-6 = 0.927206
# 56. Удельная работа ступени:
L_т5 := H_5т*η_т5 explicit, ALL → 189168.754692*m^2*s^-2*0.827014759961 = 156445 m^2/s^2
# 57. Температура за ступенью:
T_ст5 := T_25 + h_з5/c_pг + h_т.в5/c_pг = 904.776 K
# 58. Темпеартура торможения за ступенью:
T*_ст5 := T_ст5 + h_в5/c_pг explicit, ALL → 904.776151378*K + 18953.0485584*m^2*s^-2/(1180*J/(kg*K)) = 920.838 K
# 59. Давление торможения за ступенью:
P*_ст5 := P_25*(T*_ст5/T_ст5)^(k_г/(k_г - 1)) explicit, ALL → 102300*Pa*(920.838056936*K/(904.776151378*K))^(1.32435465769/(1.32435465769 - 1)) = 109921 kg/(m*s^2)
# 60. Располагаемый теплоперепад по параметрам торможения:
H*_5т := c_pг*T*_05*(1 - (P*_ст5/P*_05)^((k_г - 1)/k_г)) = 170460 m^2/s^2
# 61. КПД турбины по параметрам торможения:
η*_т5 := L_т5/H*_5т explicit, ALL → 156445.352254*m^2*s^-2/(170460.162316*m^2*s^-2) = 0.917782
η_л5 := η*_т5*H*_5т/H_5т + c_25^2/(2*H_5т) = 0.927206
# Расчет параметров турбины.
# 1) Удельная работа турбины:
L_тΣ := L_т + L_т2 + L_т3 + L_т4 + L_т5 = 936644 m^2/s^2
# 2) Мощностной КПД турбины:
η_т := L_тΣ/H_т = 0.908606
# 3) Лопаточный КПД турбины:
η_л := (L_тΣ + h_в5)/H_т = 0.926991
# 4) Располагаемый теплоперепад турбины по параметрам торможения:
k_г := 1.3
T*_г := 1673*K
H*_т := R_г*k_г/(k_г - 1)*T*_г*(1 - (P*_ст5/P*_г)^((k_г - 1)/k_г)) = 1013131 m^2/s^2
# 5) КПД турбины по параметрам торможения:
η*_т := L_тΣ/H*_т = 0.924504
# 6) Мощность турбины:
η_м := 0.99
N := (L_тΣ*G_г)*η_м = 314482556 kg*m^2/s^3
# Профилирование
# Выберем закон профилирования лопатки по высоте  Г=const.
# Для этого закона существуют следующие зависимости:
C_u*r == const
C_а == const
# Основные геометрические параметры:
r_са.ср := D_1/2 = 1.19914 m  # средний радиус на выходе из СА
D_са.пер := D_1 + l_с1 = 2.48527 m  # периферийный радиус на выходе из СА
r_са.пер := D_са.пер/2 = 1.24264 m
D_са.вт := D_са.пер - 2*l_с1 = 2.3113 m
r_са.вт := D_са.вт/2 = 1.15565 m
r_рл.ср := D_л1/2 = 1.19914 m
D_рл.пер := D_л2 + l_л1 = 2.51229 m
r_рл.пер := D_рл.пер/2 = 1.25614 m  # периферийный радиус на выходе из РЛ
D_рл.вт := D_рл.пер - 2*l_л1 = 2.28429 m
r_рл.вт := D_рл.вт/2 = 1.14214 m  # периферийный радиус на выходе из РЛ
# Cкорости на периферийном радиусе:
c_1а.пер := c_1а = 182.231 m/s
c_1u.пер := c_1u*r_са.ср/r_са.пер explicit, ALL → 593.390009515*m*s^-1*1.1991433515*m/(1.2426355134*m) = 572.621 m/s
c_1.пер := sqrt(c_1а.пер^2 + c_1u.пер^2) = 600.919 m/s
c_2а.пер := c_2а = 152.345 m/s
c_2u.пер := c_2u*r_рл.ср/r_рл.пер explicit, ALL → 9.45672852879*m*s^-1*1.1991433515*m/(1.2561433515*m) = 9.02761 m/s
c_2.пер := sqrt(c_2а.пер^2 + c_2u.пер^2) = 152.612 m/s
# Cкорости на втулочном радиусе:
c_1а.вт := c_1а = 182.231 m/s
c_1u.вт := c_1u*r_са.ср/r_са.вт explicit, ALL → 593.390009515*m*s^-1*1.1991433515*m/(1.15565118959*m) = 615.722 m/s
c_1.вт := sqrt(c_1а.вт^2 + c_1u.вт^2) = 642.123 m/s
c_2а.вт := c_2а = 152.345 m/s
c_2u.вт := c_2u*r_рл.ср/r_рл.вт explicit, ALL → 9.45672852879*m*s^-1*1.1991433515*m/(1.1421433515*m) = 9.92868 m/s
c_2.вт := sqrt(c_2а.вт^2 + c_2u.вт^2) = 152.668 m/s
# Располагаемый теплоперепад в СА:
H_са.пер := (c_1.пер/φ)^2/2 explicit, ALL → (600.918916313*m*s^-1/0.97)^2/2 = 191893 m^2/s^2
H_са.вт := (c_1.вт/φ)^2/2 explicit, ALL → (642.122785243*m*s^-1/0.97)^2/2 = 219110 m^2/s^2
# Располагаемый теплоперепад в РЛ:
H_рл.пер := H_1т - H_са.пер explicit, ALL → 255951.736403*m^2*s^-2 - 191892.6262*m^2*s^-2 = 64059.1 m^2/s^2
H_рл.вт := H_1т - H_са.вт explicit, ALL → 255951.736403*m^2*s^-2 - 219110.25153*m^2*s^-2 = 36841.5 m^2/s^2
# Степени реактивности :
ρ_1.пер := H_рл.пер/H_1т explicit, ALL → 64059.1102029*m^2*s^-2/(255951.736403*m^2*s^-2) = 0.250278
ρ_1.вт := H_рл.вт/H_1т explicit, ALL → 36841.4848729*m^2*s^-2/(255951.736403*m^2*s^-2) = 0.143939
# Уточнение коэффициентов φ и ψ
# Потери в сопловом аппарате первой ступени
ffffffffffffffffffffffffffffffffff
# 1. Определим коэффициент потерь от трения в сопловом аппарате в зависимости от направления потока.
ξ_тр.с := 0.015
# 2. Определим кромочные потери:
b_c := 0.089*m
t_bc := 0.75
s_c := 2.5*10^-3*m
t_c := t_bc*b_c explicit, ALL → 0.75*0.089*m = 0.06675 m
ξ_кр.с := 0.2*s_c/(t_c*sin(α_11*deg)) explicit, ALL → 0.2*2.5*10^-3*m/(0.06675*m*sin(17.0718382442*deg)) = 0.0255156
# 3. Определим коэффициент профильных потерь:
ξ_пр.с := ξ_тр.с + ξ_кр.с explicit, ALL → 0.015 + 0.0255156312814 = 0.0405156
# 4. Определим число Маха на выходе из соплового аппарата:
M_1 := c_1/sqrt(k_г*R_г*T_1) explicit, ALL → 620.74147763*m*s^-1/sqrt(1.3*289*J/(kg*K)*1523.65116975*K) = 0.820441
# Течение дозвуковое. Учет волновых потерь не требуется.
# 5. Определим учет концевых потерь.
ξ_к.с := 2*ξ_тр.с*t_c*sin(α_11*deg)/l_с1 explicit, ALL → 2*0.015*0.06675*m*sin(17.0718382442*deg)/(0.0869843238067*m) = 0.0067584
# 6. Определим коэффициент потерь в сопловом аппарате:
ξ_с := ξ_пр.с + ξ_к.с explicit, ALL → 0.0405156312814 + 0.00675840089451 = 0.047274
# 7. Определим коэффициент скорости в сопловом аппарате:
φ := sqrt(1 - ξ_с) explicit, ALL → sqrt(1 - 0.0472740321759) = 0.976077
# Потери в рабочих лопатках первой ступени
# 1. Определим коэффициент потерь от трения в рабочих в зависимости от направления потока.
ξ_тр.л := 0.025
# 2. Определим коэффициент профильных потерь:
b_л := 0.063*m
t_b := 0.75
s_c := 2*10^-3*m
t_л := t_b*b_л explicit, ALL → 0.75*0.063*m = 0.04725 m
ξ_кр.л := 0.2*s_c/(t_л*sin(β_2*deg)) explicit, ALL → 0.2*2*10^-3*m/(0.04725*m*sin(21.5289139592*deg)) = 0.0230689
# 3. Определим кромочные потери:
ξ_пр.л := ξ_тр.л + ξ_кр.л explicit, ALL → 0.025 + 0.0230688941838 = 0.0480689
# 4. Определим число Маха на выходе из рабочей лопатки:
M_2 := w_2/sqrt(k_г*R_г*T_2) explicit, ALL → 415.14215442*m*s^-1/sqrt(1.3*289*J/(kg*K)*1487.91872753*K) = 0.555248
# Течение дозвуковое. Учетволновых потерь не требуется.
# 5. Определим учет концевых потерь.
ξ_к.л := 2*ξ_тр.л*t_л*sin(β_2*deg)/l_л1 explicit, ALL → 2*0.025*0.04725*m*sin(21.5289139592*deg)/(0.114*m) = 0.00760499
# 6. Определим коэффициент потерь в рабочей лопатке:
ξ_л := ξ_пр.л + ξ_к.л explicit, ALL → 0.0480688941838 + 0.00760498509783 = 0.0556739
# 7. Определим коэффициент скорости в рабочей лопатке:
ψ := sqrt(1 - ξ_л) explicit, ALL → sqrt(1 - 0.0556738792816) = 0.971764
# Профилирование последней ступени
# Выберем закон профилирования лопатки по высоте  Г=const.
# Для этого закона существуют следующие зависимости:
C_u*r == const
C_а == const
# Основные геометрические параметры:
r_са.ср := D_т/2 = 1.19914 m  # средний радиус на выходе из СА
D_са.пер := D_т + l_с5 = 2.86329 m  # периферийный радиус на выходе из СА
r_са.пер := D_са.пер/2 = 1.43164 m
D_са.вт := D_са.пер - 2*l_с5 = 1.93329 m
r_са.вт := D_са.вт/2 = 0.966643 m
r_рл.ср := D_т/2 = 1.19914 m
D_рл.пер := D_т + l_л5 = 2.98829 m
r_рл.пер := D_рл.пер/2 = 1.49414 m  # периферийный радиус на выходе из РЛ
D_рл.вт := D_рл.пер - 2*l_л5 = 1.80829 m
r_рл.вт := D_рл.вт/2 = 0.904143 m  # периферийный радиус на выходе из РЛ
# Cкорости на периферийном радиусе:
c_1а.пер := c_15а = 198.398 m/s
c_1u.пер := c_15u*r_са.ср/r_са.пер explicit, ALL → 417.402412485*m*s^-1*1.1991433515*m/(1.4316433515*m) = 349.616 m/s
c_1.пер := sqrt(c_1а.пер^2 + c_1u.пер^2) = 401.987 m/s
c_2а.пер := c_25а = 194.677 m/s
c_2u.пер := c_25u*r_рл.ср/r_рл.пер explicit, ALL → 2.65958590173*m*s^-1*1.1991433515*m/(1.4941433515*m) = 2.13448 m/s
c_2.пер := sqrt(c_2а.пер^2 + c_2u.пер^2) = 194.688 m/s
# Cкорости на втулочном радиусе:
c_1а.вт := c_15а = 198.398 m/s
c_1u.вт := c_15u*r_са.ср/r_са.вт explicit, ALL → 417.402412485*m*s^-1*1.1991433515*m/(0.966643351498*m) = 517.797 m/s
c_1.вт := sqrt(c_1а.вт^2 + c_1u.вт^2) = 554.505 m/s
c_2а.вт := c_25а = 194.677 m/s
c_2u.вт := c_25u*r_рл.ср/r_рл.вт explicit, ALL → 2.65958590173*m*s^-1*1.1991433515*m/(0.904143351498*m) = 3.52734 m/s
c_2.вт := sqrt(c_2а.вт^2 + c_2u.вт^2) = 194.709 m/s
# Располагаемый теплоперепад в СА:
H_са.пер := (c_1.пер/φ)^2/2 explicit, ALL → (401.986548373*m*s^-1/0.976076824755)^2/2 = 84805.7 m^2/s^2
H_са.вт := (c_1.вт/φ)^2/2 explicit, ALL → (554.505129451*m*s^-1/0.976076824755)^2/2 = 161366 m^2/s^2
# Располагаемый теплоперепад в РЛ:
H_рл.пер := H_5т - H_са.пер explicit, ALL → 189168.754692*m^2*s^-2 - 84805.6999233*m^2*s^-2 = 104363 m^2/s^2
H_рл.вт := H_5т - H_са.вт explicit, ALL → 189168.754692*m^2*s^-2 - 161366.41016*m^2*s^-2 = 27802.3 m^2/s^2
# Степени реактивности :
ρ_5.пер := H_рл.пер/H_5т explicit, ALL → 104363.054769*m^2*s^-2/(189168.754692*m^2*s^-2) = 0.551693
ρ_5.вт := H_рл.вт/H_5т explicit, ALL → 27802.344532*m^2*s^-2/(189168.754692*m^2*s^-2) = 0.146971
# Температура конца адиабатического расширения в сопловом аппарате:
T'_1.пер := T*_05 - H_са.пер/c_pг explicit, ALL → 1053.41886393*K - 84805.6999233*m^2*s^-2/(1180*J/(kg*K)) = 981.55 K
T'_1.вт := T*_05 - H_са.вт/c_pг explicit, ALL → 1053.41886393*K - 161366.41016*m^2*s^-2/(1180*J/(kg*K)) = 916.668 K
# Температура после СА:
T_1.пер := T*_05 - c_1.пер^2/(2*c_pг) explicit, ALL → 1053.41886393*K - (401.986548373*m*s^-1)^2/(2*1180*J/(kg*K)) = 984.947 K
T_1.вт := T*_05 - c_1.вт^2/(2*c_pг) explicit, ALL → 1053.41886393*K - (554.505129451*m*s^-1)^2/(2*1180*J/(kg*K)) = 923.132 K
# Составляющие треугольника скоростей на периферии
# Окружная скорость:
u_1.ср := π*n_т*D_т/(60*s) = 376.722 m/s
u_2.ср := π*n_т*D_т/(60*s) = 376.722 m/s
u_1.пер := u_1.ср*r_са.пер/r_са.ср explicit, ALL → 376.721994367*m*s^-1*1.4316433515*m/(1.1991433515*m) = 449.764 m/s
u_2.пер := u_2.ср*r_рл.пер/r_рл.ср explicit, ALL → 376.721994367*m*s^-1*1.4941433515*m/(1.1991433515*m) = 469.399 m/s
# Направление абсолютной скорости на выходе из СА:
α_1.пер := asin(c_1а.пер/c_1.пер)/deg explicit, ALL → asin(198.398295353*m*s^-1/(401.986548373*m*s^-1))/deg = 29.5738
# Относительная скорость за СА:
w_1.пер := sqrt(c_1.пер^2 + u_1.пер^2 - 2*c_1.пер*u_1.пер*cos(α_1.пер*deg)) = 222.242 m/s
# Угол входа потока в относительном движении:
β_1.пер := acot((c_1.пер*cos(α_1.пер*deg) - u_1.пер)/c_1а.пер)/deg = 116.784
# Относительная скорость за РЛ:
w_2.пер := ψ_5*sqrt(w_1.пер^2 + 2*H_рл.пер + u_2.пер^2 - u_1.пер^2) = 509.749 m/s
# Угол выхода потока в относительном движении:
β_2.пер := asin(c_2а.пер/w_2.пер)/deg explicit, ALL → asin(194.676715915*m*s^-1/(509.748941835*m*s^-1))/deg = 22.4519
# Угол выхода потока за РЛ:
α_2.пер := acot(c_2u.пер/c_2а.пер)/deg = 89.3718
# Действительная температура за РЛ:
T_2.пер := T_1.пер - (w_2.пер^2 - w_1.пер^2 - u_2.пер^2 + u_1.пер^2)/(2*c_pг) = 903.42 K
# Число Маха по относительной скорости на входе в РК:
M_1w.пер := w_1.пер/sqrt(k_г*R_г*T_1.пер) explicit, ALL → 222.242037865*m*s^-1/sqrt(1.3*289*J/(kg*K)*984.947175341*K) = 0.365342
# Число Маха по относительной скорости на выходе из РК:
M_2w.пер := w_2.пер/sqrt(k_г*R_г*T_2.пер) explicit, ALL → 509.748941835*m*s^-1/sqrt(1.3*289*J/(kg*K)*903.419744416*K) = 0.874966
# Число Маха по абсолютной скорости на входе в РК
M_1c.пер := c_1.пер/sqrt(k_г*R_г*T_1.пер) explicit, ALL → 401.986548373*m*s^-1/sqrt(1.3*289*J/(kg*K)*984.947175341*K) = 0.660822
# Составляющие треугольника скоростей на втулке
# Окружная скорость:
u_1.ср := π*n_т*D_т/(60*s) = 376.722 m/s
u_2.ср := π*n_т*D_т/(60*s) = 376.722 m/s
u_1.вт := u_1.ср*r_са.вт/r_са.ср explicit, ALL → 376.721994367*m*s^-1*0.966643351498*m/(1.1991433515*m) = 303.68 m/s
u_2.вт := u_2.ср*r_рл.вт/r_рл.ср explicit, ALL → 376.721994367*m*s^-1*0.904143351498*m/(1.1991433515*m) = 284.045 m/s
# Направление абсолютной скорости на выходе из СА:
α_1.вт := asin(c_1а.вт/c_1.вт)/deg explicit, ALL → asin(198.398295353*m*s^-1/(554.505129451*m*s^-1))/deg = 20.9647
# Относительная скорость за СА:
w_1.вт := sqrt(c_1.вт^2 + u_1.вт^2 - 2*c_1.вт*u_1.вт*cos(α_1.вт*deg)) = 291.904 m/s
# Угол входа потока в относительном движении:
β_1.вт := acot((c_1.вт*cos(α_1.вт*deg) - u_1.вт)/c_1а.вт)/deg = 42.8178
# Относительная скорость за РЛ:
w_2.вт := ψ_2*sqrt(w_1.вт^2 + 2*H_рл.вт + u_2.вт^2 - u_1.вт^2) = 348.759 m/s
# Угол выхода потока в относительном движении:
β_2.вт := asin(c_2а.вт/w_2.вт)/deg explicit, ALL → asin(194.676715915*m*s^-1/(348.758987744*m*s^-1))/deg = 33.9313
# Угол выхода потока за РЛ:
α_2.вт := acot(c_2u.вт/c_2а.вт)/deg = 88.962
# Действительная температура за РЛ:
T_2.вт := T_1.вт - (w_2.вт^2 - w_1.вт^2 - u_2.вт^2 + u_1.вт^2)/(2*c_pг) = 902.808 K
# Число Маха по относительной скорости на входе в РК:
M_1w.вт := w_1.вт/sqrt(k_г*R_г*T_1.вт) explicit, ALL → 291.904301551*m*s^-1/sqrt(1.3*289*J/(kg*K)*923.132449275*K) = 0.495665
# Число Маха по относительной скорости на выходе из РК:
M_2w.вт := w_2.вт/sqrt(k_г*R_г*T_2.вт) explicit, ALL → 348.758987744*m*s^-1/sqrt(1.3*289*J/(kg*K)*902.808439448*K) = 0.598835
# Число Маха по абсолютной скорости на входе в РК
M_1c.вт := c_1.вт/sqrt(k_г*R_г*T_1.вт) explicit, ALL → 554.505129451*m*s^-1/sqrt(1.3*289*J/(kg*K)*923.132449275*K) = 0.941571
