# Исходные данные:
# Спроектировать турбину привода компрессора и силовую турбину двухвального судового ГТД.
N_e := 30*10^6*W
T*_а := 288 K
T*_г := 1473 K
p*_а := 101300 Pa
p_а := p*_а
# 1. Выбор исходных значений КПД и коэффициентов, характеризующих потери по тракту установки:
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# 1.1. Коэффициент полного давления при входе:
σ_вх := 0.99
# 1.2. Коэффициент полноты горения:
η_г := 0.98
# 1.3. Коэффициент полного давления в камере сгорания:
σ_г := 0.97
# 1.4. КПД турбин по параметрам торможения:
η*_т1 := 0.90
η_т2 := 0.86
# 1.5. Механический КПД:
η_м := 0.995
# 1.6. Коэффициент полного давления:
σ_вых := 0.99
# 1.7. Низшая рабочая теплота сгорания топлива:
Q_н := 43000*10^3*J/kg
π*_к0 := 20
# 1.8. Политропный КПД компрессора:
η*_к.п := 0.91
# 1.9. Политроный КПД турбины:
η*_т.п := 0.91
# 2. Параметры газа по тракту ГТУ:
# 2.1. Параметры на входе в компрессор:
R_в := 287.4*J/(kg*K)
k_в := 1.4
T*_в := T*_а = 288 K
p*_в := p*_а*σ_вх = 100287 Pa
# 2.2. Параметры компрессора:
# 2.2.1. Отношение температур:
ν := T*_г/T*_а explicit, ALL → 1473*K/(288*K) = 5.11458
# Ряд возможных диапозонов изменений степени повышения давления компрессора:
π*_к := 5 .. 45
# 2.2.2. Давление за компрессором:
p*_к(π*_к) := p*_а*σ_вх*π*_к
# 2.2.3. КПД компрессора через политропический КПД:
η*_к(π*_к) := (π*_к^((k_в - 1)/k_в) - 1)/(π*_к^((k_в - 1)/(k_в*η*_к.п)) - 1)
# 2.2.4. Температура за компрессором:
T*_к(π*_к) := T*_а*(1 + (π*_к^((k_в - 1)/k_в) - 1)/η*_к(π*_к))
# 2.2.5. Удельная работа компрессора:
L_к(π*_к) := R_в*k_в/(k_в - 1)*T*_а*(π*_к^((k_в - 1)/k_в) - 1)/η*_к(π*_к)
# 2.2.6. Степень понижения давления турбин:
# 2.2.6.1 Давление газа перед турбиной:
p*_г(π*_к) := p*_к(π*_к)*σ_г
# 2.2.6.2. Статическое давление за силовой турбиной:
p_т := p_а/σ_вых = 102323 Pa
# 2.2.6.3. Степень понижения давления обоих турбин:
π_т(π*_к) := p*_г(π*_к)/p_т
# 2.3 Коэффициент избытка воздуха, параметры расхода, истинный показатель адиабаты:
# 2.3.1. Коэффициент избытка воздуха:
Tx := stack(300, 400, 540, 700, 800, 900, 1000)*K
αx := stack(2.0, 2.2, 2.5, 3.0, 3.5, 4.0, 5.0)
αxx := lspline(Tx, αx)
α(Tk) := interp(αxx, Tx, αx, Tk)
α_г(π*_к) := α(T*_к(π*_к))
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c_pв(π*_к) :=
    (((1.25 + 2.2*α_г(π*_к))/(α_г(π*_к)*10^5))*(T*_к(π*_к)/(1 K) + 450) + 0.218)*4.187*10^3*J/(kg*K) if T*_к(π*_к) ≥ 700 K
    (((2.25 + 1.2*α_г(π*_к))/(α_г(π*_к)*10^5))*(T*_к(π*_к)/(1 K) - 70) + 0.236)*(4.187*10^3*J/(kg*K)) if T*_к(π*_к) < 700 K
# 2.3.2. Средняя удельная теплоемкость продуктов сгорания керосина:
c_pг := 1.12*10^3*J/(kg*K)
c_pв(π*_к)  # определяется из приложения 3
# 2.3.3 Коэффициент удельного расхода топлива:
g_m(π*_к) := (c_pг*T*_г - c_pв(π*_к)*T*_к(π*_к))/(Q_н*η_г - c_pг*T*_г + c_pг*T*_а)
# 2.3.4. Относительный расход газа:
# Утечки:
g_ут := 0.007
# Относительный расход воздуха на охлаждение:
g_охл := 0.05
g_т(π*_к) := (1 + g_m(π*_к))*(1 - g_ут - g_охл)
# 2.3.3. Истинный показатель адиабаты:
# Средняя температура процесса расширения:
T_ср(π*_к) := 0.5*T*_г*(1 + π_т(π*_к)^-0.25)
k_г := 1.315  # определяется из приложения 2
# Универсальная газовая постоянная для продуктов сгорания керосина:
R_г := 290*J/(kg*K)
# 2.4. Параметры турбины привода компрессора:
# 2.4.1. Давление торможения за турбиной привода компрессора:
p*_тк(π*_к) := p*_г(π*_к)*(1 - L_к(π*_к)/(R_г*k_г/(k_г - 1)*T*_г*η*_т1*η_м*g_т(π*_к)))^(k_г/(k_г - 1))
# 2.4.2. Степень понижения давления турбины привода компрессора:
π*_тк(π*_к) := p*_г(π*_к)/p*_тк(π*_к)
# 2.4.3. Температура за турбиной привода компрессора:
T*_тк(π*_к) := T*_г*(1 - (1 - π*_тк(π*_к)^((1 - k_г)/k_г))*η*_т1)
# 2.4.4. Работа турбины привода компрессора:
L_тк(π*_к) := R_г*k_г/(k_г - 1)*T*_г*(1 - π*_тк(π*_к)^((1 - k_г)/k_г))*η*_т1
# 2.5. Параметры силовой турбины:
# 2.5.1. Степень понижения давления силовой турбины:
π_тс(π*_к) := p*_тк(π*_к)/p_т
# 2.5.2. Работа силовой турбины:
L_тс(π*_к) := R_г*k_г/(k_г - 1)*T*_тк(π*_к)*(1 - π_тс(π*_к)^((1 - k_г)/k_г))*η*_т1
# 3. Экономичность, удельная мощность газотурбинных установок и удельная сила тяги воздушно-реактивных двигателей.
# 3.1. Удельные энергетические параметры газотурбинных установок:
# 3.1.1. Суммарная работа турбин:
L_т.общ(π*_к) := L_тс(π*_к) + L_тк(π*_к)
# 3.1.2. Удельная мощность ГТУ:
N_e.уд(π*_к) := L_т.общ(π*_к)*g_т(π*_к) - L_к(π*_к)
# 3.2. Удельный расход топлива:
C_e(π*_к) := g_m(π*_к)*(1 - g_ут - g_охл)*3600/N_e.уд(π*_к)
# 3.3 Эффективный КПД ГТУ:
η_e(π*_к) := 3600/(C_e(π*_к)*Q_н)
# 4. Расход воздуха.
G_В(π*_к) := N_e/N_e.уд(π*_к)
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# 5. Параметры газа по тракту ГТУ для оптимальной степени повышения давления:
# 5.1. Оптимальная степень повышения давления:
π*_к := 20
# 5.2. Параметры компрессора:
# 5.2.1. Давление за компрессором:
p*_к := p*_а*σ_вх*π*_к = 2005740 Pa
# 5.2.2. КПД компрессора через политропический КПД:
η*_к := (π*_к^((k_в - 1)/k_в) - 1)/(π*_к^((k_в - 1)/(k_в*η*_к.п)) - 1) = 0.86685
# 5.2.3. Температура за компрессором:
T*_к := T*_а*(1 + (π*_к^((k_в - 1)/k_в) - 1)/η*_к) = 737.699 K
# 5.2.4. Удельная работа компрессора:
L_к := R_в*k_в/(k_в - 1)*T*_а*(π*_к^((k_в - 1)/k_в) - 1)/η*_к = 452352 m^2/s^2
# 5.2.5. Степень понижения давления турбин:
# 5.2.5.1 Давление газа перед турбиной:
p*_г := p*_к*σ_г = 1945568 Pa
# 5.2.5.2. Статическое давление за силовой турбиной:
p_т := p_а/σ_вых = 102323 Pa
# 5.2.5.3. Степень понижения давления обоих турбин:
π_т := p*_г/p_т = 19.0139
# 5.3 Коэффициент избытка воздуха, параметры расхода, истинный показатель адиабаты:
# 5.3.1. Коэффициент избытка воздуха:
α_г := α(T*_к) = 3.18649
# 5.3.2. Средняя удельная теплоемкость продуктов сгорания керосина:
c_pг := 1.12*10^3*J/(kg*K)
c_pв :=
    (((1.25 + 2.2*α_г)/(α_г*10^5))*(T*_к/(1 K) + 450) + 0.218)*4.187*10^3*J/(kg*K) if T*_к ≥ 700 K
    (((2.25 + 1.2*α_г)/(α_г*10^5))*(T*_к/(1 K) - 70) + 0.236)*(4.187*10^3*J/(kg*K)) if T*_к < 700 K
    = 1041.68 m^2/(K*s^2)
c_pв(π*_к)  # определяется из приложения 3
# 5.3.3 Коэффициент удельного расхода топлива:
g_m := (c_pг*T*_г - c_pв*T*_к)/(Q_н*η_г - c_pг*T*_г + c_pг*T*_а) = 0.0215941
# 5.3.4. Относительный расход газа:
# Утечки:
g_ут := 0.007
# Относительный расход воздуха на охлаждение:
g_охл := 0.05
g_т := (1 + g_m)*(1 - g_ут - g_охл) = 0.963363
# 5.3.3. Истинный показатель адиабаты:
# Средняя температура процесса расширения:
T_ср := 0.5*T*_г*(1 + π_т^-0.25) = 1089.2 K
k_г := 1.315  # определяется из приложения 2
# Универсальная газовая постоянная для продуктов сгорания керосина:
R_г := 290*J/(kg*K)
# 5.4. Параметры турбины привода компрессора:
# 5.4.1. Давление торможения за турбиной привода компрессора:
p*_тк := p*_г*(1 - L_к/(R_г*k_г/(k_г - 1)*T*_г*η*_т1*η_м*g_т))^(k_г/(k_г - 1)) = 454743 Pa
# 5.4.2. Степень понижения давления турбины привода компрессора:
π*_тк := p*_г/p*_тк = 4.27839
# 5.4.3. Температура за турбиной привода компрессора:
T*_тк := T*_г*(1 - (1 - π*_тк^((1 - k_г)/k_г))*η*_т1) = 1083.19 K
# 5.4.4. Работа турбины привода компрессора:
L_тк := R_г*k_г/(k_г - 1)*T*_г*(1 - π*_тк^((1 - k_г)/k_г))*η*_т1 = 471915 m^2/s^2
# 5.5. Параметры силовой турбины:
# 5.5.1. Степень понижения давления силовой турбины:
π_тс := p*_тк/p_т = 4.44418
# 5.5.2. Работа силовой турбины:
L_тс := R_г*k_г/(k_г - 1)*T*_тк*(1 - π_тс^((1 - k_г)/k_г))*η*_т1 = 354583 m^2/s^2
# 6. Экономичность, удельная мощность газотурбинных установок и удельная сила тяги воздушно-реактивных двигателей для оптимальной степени повышения давления.
# 6.1. Удельные энергетические параметры газотурбинных установок:
# 6.1.1. Суммарная работа турбин:
L_т.общ := L_тс + L_тк = 826497 m^2/s^2
# 6.1.2. Удельная мощность ГТУ:
N_e.уд := L_т.общ*g_т - L_к = 343865 m^2/s^2
# 6.2. Удельный расход топлива:
C_e := g_m*(1 - g_ут - g_охл)*3600/N_e.уд = 0.000213187 s^2/m^2
# 6.3 Эффективный КПД ГТУ:
η_e := 3600/(C_e*Q_н) = 0.392711
# 7. Расход воздуха для оптимальной степени повышения давления.
G_В := N_e/N_e.уд = 87.2435 kg/s
# 8. Определение частоты вращения турбины привода компрессора.
# 8.1 Лопаточный КПД:
η_ткл := 0.93
# 8.2 Осевая скорость:
c_тка := 200*m/s
# 8.3 Располагаемый теплоперепад турбины привода компрессора:
H_тк := (L_тк + c_тка^2/2)/η_ткл = 528941 m^2/s^2
# 8.4 Температура за турбиной привода компрессора:
T_тк := T*_г - H_тк*η_ткл/c_pг = 1033.79 K
# 8.5 Давление за турбиной привода компрессора:
p_тк := p*_г*(1 - H_тк/(c_pг*T*_г))^(k_г/(k_г - 1)) = 387430 Pa
# 8.6 Степень понижения давления турбины привода компрессора:
π_тк := p*_г/p_тк = 5.02173
# 8.7 Удельный обьем турбины привода компрессора:
ν_тк := R_г*T_тк/p_тк = 0.773816 m^3/kg
# 8.8 Площадь кольцевого сечения турбины привода компрессора:
A_тк := G_В*g_т*ν_тк/c_тка = 0.325185 m^2
# 8.9 Напряжение на растяжение в рабочих лопатках:
σ_л := 200*10^6*Pa
# 8.10 Максимальная частота вращения турбины привода компрессора:
k_n := 6.8*10^-6*kg/m^3
n_ткmax := sqrt(σ_л/(k_n*A_тк)) = 9510317 1/s
# 8.11 Частота вращения турбины привода компрессора:
n_тк := n_ткmax*1/(60*10^3) = 158.505 1/s
n_тк := 150*1/s
# 8.12 Относительная длина рабочей лопатки:
l_Dтк := 1/6
# 8.13 Средний диаметр:
D_тк := sqrt(A_тк/(π*l_Dтк)) = 0.788073 m
# 8.14 Окружная скорость на среднем диаметре:
u_тк := π*D_тк*n_тк = 371.37 m/s
# 8.15 Условная адиабатная скорость:
c_ткад0 := sqrt(2*H_тк) = 1028.53 m/s
# 8.16 Степень реактивности:
ρ_сртк := 0.3
# 8.17 Оптимальное соотношение u/c_ад:
u_Cадтк := 0.55
# 8.18 Оптимальная окружная скорость:
u_ткη := u_Cадтк*c_ткад0 = 565.693 m/s
# 8.19 Средний диаметр при выходе рабочей лопатки из рабочих лопаток:
D_ткη := u_ткη/(π*n_тк) = 1.20044 m
# D_ткη>D_тк , следовательно одноступенчатую турбину проектировать нецелесообразно и для получения максимального КПД число ступеней необходимо увеличить!
n_тк*min = 9000
# 9. Основные размеры проточной части турбины привода компрессора:
# 9.1 Относительная длина рабочей лопатки последней ступени:
l_Dтк = 0.166667
# 9.2 Средний диаметр последней ступени:
D_тк = 0.788073 m
# 9.2.1 Длина лопатки последней ступени:
l_тк := l_Dтк*D_тк = 0.131345 m
# 9.2.2 Периферийный диаметр:
D_тк.пер := D_тк + l_тк = 0.919418 m
# 9.2.3. Втулочный диаметр:
D_тк.вт := D_тк - l_тк = 0.656727 m
# 9.3 Окружная скорость на среднем диаметре последней ступени:
u_тк = 371.37 m/s
# 9.4 Средний диаметр при выходе из СА первой ступени:
D_тк1с := 0.771*m
# 9.5 Окружна яскорость на среднем диаметре при выходе из СА первой ступени:
u_тк1 := π*D_тк1с*n_тк = 363.325 m/s
# 9.6 Средняя окружная скорость по турбине:
u_сртк := sqrt((u_тк1^2 + u_тк^2)/2) = 367.37 m/s
# 9.7 Оптимальное отношение y_0:
y_0тк := 0.5
# 9.8 Средняя скорость по ступеням:
c_тк2ср := 190*m/s
# 9.9 Коэффициент использования скорости:
μ_тк := 0.9
# 9.10 Число ступеней:
z := (c_ткад0^2/(μ_тк*c_тк2ср)^2 - 1)/(u_сртк^2/((μ_тк*c_тк2ср)^2*y_0тк^2) - 1) = 2.01457
# Принимаем число степеней:
z := 2
# 9.11 Распределение теплоперепадов по ступеням:
# 9.11.1 Коэффициент возврата теплоты:
α := (z - 1)/(2*z)*(π_тк^((k_г - 1)/k_г) - 1)*(1 - η_ткл) = 0.00825865
# 9.11.2. Теплоперепад в первой ступени:
c_21 := 150*m/s
H_тк1 := H_тк*(1 + α)*(1.03*u_тк1)^2/(u_тк1^2 + u_тк^2) + 0.5*(μ_тк*c_21)^2 = 285811 m^2/s^2
# 9.11.3. Теплоперепад во второй ступени:
H_тк2 := H_тк*(1 + α)*(0.97*u_тк)^2/(u_тк1^2 + u_тк^2) = 256389 m^2/s^2
# 9.12 Распределение степени реактивности по ступеням:
ρ_тк1 := 0.28
ρ_тк2 := 0.32
# 9.13 Располагаемый теплоперепад в СА первой ступени:
H_тк1c := 1*H_тк1*(1 - ρ_тк1) = 205784 m^2/s^2
1
# 9.14 Угол потока за СА первой ступени:
α_тк11 := 17*deg
# 9.15 Скорость за СА первой ступени:
φ := 0.95
c_тк11 := φ*sqrt(2*H_тк1c) = 609.459 m/s
# 9.16 Температура за СА первой ступени:
T_тк1с := T*_г - H_тк1c*φ^2/c_pг = 1307.18 K
# 9.16.1 Средняя удельная теплоемкость и показатель адиабаты:
# По Рис. П3 для αг=3.186 и Т_у=1307К:
c_pг1 := 1.24*10^3*J/(kg*K)
k_г.1 := 1.305
# 9.17 Давление за СА первой ступени:
p_тк1с := p*_г*(1 - H_тк1c/(c_pг1*T*_г))^(k_г.1/(k_г.1 - 1)) = 1166622 Pa
# 9.18 Удельный объем за СА первой ступени:
ν_тк1с := R_г*T_тк1с/p_тк1с = 0.32494 m^3/kg
# 9.19 Длина СЛ первой ступени:
l_тк1с := G_В*ν_тк1с/(π*D_тк1с*sin(α_тк11)*c_тк11) = 0.0656828 m
# 9.19.1 Периферийный диаметр первой ступени:
D_тк1с.пер := D_тк1с + l_тк1с = 0.836683 m
# 9.19.2. Втулочный диаметр первой ступени:
D_тк1с.вт := D_тк1с - l_тк1с = 0.705317 m
# 9.20 Геометрические параметры СЛ и РЛ первой ступени:
# 9.20.1 Ширина СЛ:
l_тк1сb := 1.7
b_тк1с := l_тк1с/l_тк1сb = 0.0386369 m
# 9.20.2 Ширина РЛ:
b_тк1л := b_тк1с/1.2 = 0.0321975 m
# 9.20.3 Осевой зазор:
δ_тк1.а.с := 0.23*b_тк1с = 0.0088865 m
# 9.21 Геометрические параметры СЛ и РЛ второй ступени:
# 9.21.1 Ширина СЛ:
l_тк2сb := 2
b_тк2с := l_тк/l_тк2сb = 0.0656727 m
# 9.21.2 Ширина РЛ:
b_тк2л := b_тк2с/1.2 = 0.0547273 m
# 9.21.3 Осевой зазор:
δ_тк2.а.с := 0.23*b_тк2с = 0.0151047 m
# 9.22 Угол раскрытия меридионального сечения:
γ_ткн := atan((D_тк/2 + l_тк/2 - (D_тк1с/2 + l_тк1с/2))/(δ_тк1.а.с + b_тк1л + δ_тк2.а.с + b_тк2с + δ_тк2.а.с + b_тк2л))*1/deg = 12.1777
γ_ткв := atan(((D_тк1с/2 - l_тк1с/2) - (D_тк/2 - l_тк/2))/(δ_тк1.а.с + b_тк1л + δ_тк2.а.с + b_тк2с + δ_тк2.а.с + b_тк2л))*1/deg = 7.22309
γ_тк := γ_ткв + γ_ткн = 19.4008
l_тк1л := l_тк1с + (δ_тк1.а.с + b_тк1л)*tan(γ_ткн*deg) + (δ_тк1.а.с + b_тк1л)*tan(γ_ткв*deg) = 0.0797557 m
# 9.23 Длины лопаток и ихсредние диаметры:
D_тк1л := (D_тк1с/2 + l_тк1с/2 + (δ_тк1.а.с + b_тк1л)*tan(γ_ткн*deg) - l_тк1л/2)*2 = 0.774659 m
l_тк1с = 0.0656828 m
l_тк2с := l_тк1с + (δ_тк1.а.с + b_тк1л + δ_тк2.а.с + b_тк2с)*tan(γ_ткн*deg) + (δ_тк1.а.с + b_тк1л + δ_тк2.а.с + b_тк2с)*tan(γ_ткв*deg) = 0.107425 m
D_тк1с = 0.771 m
D_тк2с := (D_тк1с/2 + l_тк1с/2 + (δ_тк1.а.с + b_тк1л + δ_тк2.а.с + b_тк2с)*tan(γ_ткн*deg) - l_тк2с/2)*2 = 0.781853 m
l_тк1л = 0.0797557 m
D_тк1л = 0.774659 m
l_тк2с = 0.107425 m
D_тк2с = 0.781853 m
D_тк2л := D_тк = 0.788073 m
l_тк2л := l_тк = 0.131345 m
# 10. Расчет первой ступени турбины привода компрессора:
# 10.1 Располагаемый теплоперепад первой ступени:
H_тк10 := 1*H_тк1 = 285811 m^2/s^2
1
# 10.2 Степень реактивности:
ρ_тк1 = 0.28
# 10.3 Располагаемый теплоперепад в СА первой ступени:
H_тк1c := H_тк10*(1 - ρ_тк1) = 205784 m^2/s^2
# 10.4 Коэффициент скорости:
φ_1 := φ = 0.95
# 10.5 Скорость за СА:
c_тк11 := φ*sqrt(2*H_тк1c) = 609.459 m/s
# 10.6 Средняя условная температура первой ступени:
T_тк1у := T*_г - H_тк10*φ_1^2/(2*c_pг1) = 1368.99 K
# 10.7 Средняя удельная теплоемкость и показатель адиабаты:
# По Рис. П3 для αг=3.186 и Т_у=1371К:
c_pг1 := 1.241*10^3*J/(kg*K)
k_г.1 := 1.302
# 10.8 Температура за СА:
T_тк11 := T*_г - H_тк1c*φ_1^2/c_pг1 = 1323.35 K
# 10.9 Температура в конце адиабатного расширения в СА:
T'_тк11 := T*_г - H_тк1c/c_pг1 = 1307.18 K
# 10.10 Давление перед рабочими лопатками:
p_тк11 := p*_г*(T'_тк11/T*_г)^(k_г.1/(k_г.1 - 1)) = 1162602 Pa
# 10.11 Кольцевая площадь сечения перед рабочими лопатками:
A_тк11a := π*D_тк1с*l_тк1с = 0.159095 m^2
# 10.12 Удельный объем перед рабочими лопатками:
ν_тк11 := R_г*T_тк11/p_тк11 = 0.330096 m^3/kg
# 10.13 Средняя скорость перед рабочими лопатками:
c_тк11a := G_В*ν_тк11/A_тк11a = 181.016 m/s
# 10.14 Угол потока за СА:
α_тк11 := asin(c_тк11a/c_тк11)/deg = 17.2782
# 10.15 Относительная скорость при входе в рабочие лопатки:
w_тк11 := sqrt(c_тк11^2 + u_тк1^2 - 2*c_тк11*u_тк1*cos(α_тк11*deg)) = 283.843 m/s
# 10.16 Угол входа потока на рабочие лопатки:
β_тк11 := atan(c_тк11a/(c_тк11*cos(α_тк11*deg) - u_тк1))/deg = 39.6231
# 10.17 Располагаемый теплоперепад в РК:
H_тк1л := ρ_тк1*H_тк10*T_тк11/T'_тк11 = 81017 m^2/s^2
# 10.18 Окружная скорость при входе на рабочие лопатки:
u_тк1 = 363.325 m/s
# 10.19 Окружная скорость при выходе из рабочих лопаток:
u_тк12 := π*D_тк1л*n_тк = 365.049 m/s
# 10.20 Коэффициент скорости в рабочих лопатках:
ψ_1 := 0.95
# 10.21 Относителньая скорость за рабочими лопатками:
w_тк12 := ψ_1*sqrt(w_тк11^2 + 2*H_тк1л + u_тк12^2 - u_тк1^2) = 469.127 m/s
# 10.22 Температура за рабочими лопатками:
T_тк12 := T_тк11 - (w_тк12^2 - w_тк11^2 - u_тк12^2 + u_тк1^2)/(2*c_pг1) = 1267.64 K
# 10.23 Температура в конце адиабатического расширения в рабочих лопатках:
T'_тк12 := T_тк11 - H_тк1л/c_pг1 = 1258.06 K
# 10.24 Давление за рабочими лопатками:
p_тк12 := p_тк11*(T'_тк12/T_тк11)^(k_г.1/(k_г.1 - 1)) = 934776 Pa
# 10.25 Удельный объем за рабочими лопатками:
υ_тк12 := R_г*T_тк12/p_тк12 = 0.393267 m^3/kg
# 10.26 Площадь кольцевого сечения за рабочими лопатками:
A_тк1рл := π*D_тк1л*l_тк1л = 0.194098 m^2
# 10.27 Осевая скорость за рабочими лопатками:
c_тк12а := (G_В*υ_тк12/A_тк1рл) = 176.766 m/s
# 10.28 Угол выхода потока из рабочих лопаток:
β_тк12 := asin(c_тк12а/w_тк12)/deg = 22.1354
# 10.29 Скорость закрутки потока за рабочими лопатками:
c_тк12u := w_тк12*cos(β_тк12*deg) - u_тк12 = 69.5012 m/s
# 10.30 Угол выхода потока из рабочих лопаток:
α_тк12 := atan(c_тк12а/c_тк12u)/deg = 68.5361
# 10.31 Скорость газа за РЛ:
c_тк12 := sqrt(c_тк12u^2 + c_тк12а^2) = 189.938 m/s
# 10.32. Работа на окружности рабочего колеса:
# 10.32.1 Окружная состовляющая скорости за СА:
c_тк11u := cos(α_тк11*deg)*c_тк11 = 581.957 m/s
L_тк1u := c_тк11u*u_тк1 + c_тк12u*u_тк12 = 236811 m^2/s^2
# 10.33. КПД на окружности рабочего колеса:
η_тк1u := L_тк1u/H_тк10 = 0.828557
# 10.34. Удельные потери в СА:
h_тк1с := (φ_1^-2 - 1)*c_тк11^2/2 = 20064 m^2/s^2
# 10.35. Удельные потери в СА с учетом их использования в РЛ:
h'_тк1с := h_тк1с*T'_тк12/T_тк11 = 19074.2 m^2/s^2
# 10.36. Относительные потери в СА:
ξ_тк1с := h_тк1с/H_тк10 = 0.0702
# 10.37. Относительные потери в СА с учетом их использования в РЛ:
ξ'_тк1с := ξ_тк1с*T'_тк12/T_тк11 = 0.0667369
# 10.38. Удельные потери в РЛ:
h_тк1л := (ψ_1^-2 - 1)*w_тк12^2/2 = 11888 m^2/s^2
# 10.39. Относительные потери в РЛ:
ξ_тк1л := h_тк1л/H_тк10 = 0.0415939
# 10.40. Удельные потери с выходной скоростью:
h_тк1в := c_тк12^2/2 = 18038.3 m^2/s^2
# 10.41. Относительные потери с выходной скоростью:
ξ_тк1в := h_тк1в/H_тк10 = 0.0631126
# 10.42. КПД  на окружности колеса:
η_тк1u := 1 - ξ'_тк1с - ξ_тк1л - ξ_тк1в = 0.828557
# 10.43. Радиальный зазор между корпусом и сопловыми лопатками:
δ_ткс := 0*m
# 10.44. Относительный радиальный зазор между корпусом и рабочими лопатками:
δ_Dтк := 0.001
# 10.45. Радиальный зазор между корпусом и рабочими лопатками:
δ_тк1л := δ_Dтк*D_тк1л = 0.000774659 m
# 10.46. Удельные потери в радиальном зазоре:
h_тк1з := 1.37*(1 + 1.6*ρ_тк1)*(1 + l_тк1л/D_тк1л)*δ_тк1л/l_тк1л*L_тк1u = 5032.66 m^2/s^2
# 10.47. Относительные потери в радиальном зазоре:
ξ_тк1з := h_тк1з/H_тк1 = 0.0176083
# 10.48. Удельная работа ступени с учетом потери в радиальном зазоре:
L_тк1uз := L_тк1u - h_тк1з = 231778 m^2/s^2
# 10.49. Мощностной КПД ступени:
η'_тк1 := η_тк1u - ξ_тк1з = 0.810948
# 10.50. Лопаточный КПД ступени:
η'_тк1л := η'_тк1 + ξ_тк1в = 0.874061
# 10.51. Затраты мощности на трение и вентиляцию:
# 10.51.1 Удельный объем за СА:
υ_тк11 := R_г*T_тк11/p_тк11 = 0.330096 m^3/kg
N_тк1тв := 1.07*D_тк1л^2*(u_тк1/100)^3*(1/υ_тк11 + 1/υ_тк12)/2 = 85.8005 W
# 10.52. Удельные потери на трение и вентиляцию:
h_тк1т.в := N_тк1тв/G_В = 0.98346 m^2/s^2
# 10.53. Относительные потери на трение и вентиляцию:
ξ_тк1т.в := h_тк1т.в/H_тк10 = 3.44094e-6
# 10.54. Мощностной КПД  с учетом потерь на трение и вентиляцию:
η_тк1 := η'_тк1 - ξ_тк1т.в = 0.810945
# 10.55. Лопаточный КПД  с учетом потерь на трение и вентиляцию:
η_тк1л := η'_тк1л - ξ_тк1т.в = 0.874057
# 10.56. Удельная работа ступени:
L_тк1 := H_тк10*η_тк1 = 231777 m^2/s^2
# 10.57. Температура за первой ступенью:
T_ткст1 := T_тк12 + h_тк1з/c_pг1 + h_тк1т.в/c_pг1 = 1271.7 K
# 10.58. Температура торможения за первой ступенью:
T*_ткст1 := T_ткст1 + h_тк1в/c_pг1 = 1286.23 K
# 10.59. Давление торможения за первой ступенью:
p*_ткст1 := p_тк12*(T*_ткст1/T_ткст1)^(k_г.1/(k_г.1 - 1)) = 981718 Pa
# 10.60. Располагаемый теплоперепад по параметрам торможения:
H*_тк10 := c_pг1*T*_г*(1 - (p*_ткст1/p*_г)^((k_г.1 - 1)/k_г.1)) = 268184 m^2/s^2
# 10.61. КПД турбины по параметрам торможения:
η*_тк1 := L_тк1/H*_тк10 = 0.864246
# 10.62 Лопаточный КПД турбины:
η_тк1л := η*_тк1*H*_тк10/H_тк10 + c_тк12^2/(2*H_тк10) = 0.874057
# 11. Расчет второй ступени турбины привода компрессора:
# 11.1. Температура торможения перед ступенью:
T*_тк20 := T*_ткст1 = 1286.23 K
# 11.2 Давление торможения перед ступенью:
p*_тк20 := p_тк12*(1 + (μ_тк*c_тк12)^2/(2*c_pг1*T_ткст1))^(k_г.1/(k_г.1 - 1)) = 972663 Pa
# 11.3. Располагаемый теплоперепад ступени:
# 11.3.1 Удельная работа турбины привода компрессора:
L_ткΣ := L_тк
# 11.3.2 Удельная работа ступени:
L_тк2 := L_ткΣ - L_тк1 = 240137 m^2/s^2
# 11.3.3 Мощностной КПД:
η_тк2 := 0.815
H_тк20 := L_тк2/η_тк2 = 294647 m^2/s^2
# 11.4 Степень реактивности:
ρ_тк2 = 0.32
# 11.5 Располагаемый теплоперепад в СА второй ступени:
H_тк2c := H_тк20*(1 - ρ_тк2) = 200360 m^2/s^2
# 11.6 Коэффициент скорости:
φ_2 := φ = 0.95
# 11.7 Скорость за СА:
c_тк21 := φ_2*sqrt(2*H_тк2c) = 601.373 m/s
# 11.8 Средняя условная температура второй ступени:
T_тк2у := T*_тк20 - H_тк20*φ_2^2/(2*c_pг1) = 1179.09 K
# 11.8.1 Средняя удельная теплоемкость и показатель адиабаты:
c_pг2 := 1.22*10^3*J/(kg*K)
k_г.2 := c_pг2/(c_pг2 - R_г) = 1.31183
# 11.9 Температура за СА:
T_тк21 := T*_тк20 - H_тк2c*φ_2^2/c_pг2 = 1138.02 K
# 11.10 Температура в конце адиабатного расширения в СА:
T'_тк21 := T*_тк20 - H_тк2c/c_pг2 = 1122 K
# 11.11 Давление перед рабочими лопатками:
p_тк21 := p*_тк20*(T'_тк21/T*_тк20)^(k_г.2/(k_г.2 - 1)) = 547503 Pa
# 11.12 Кольцевая площадь сечения перед рабочими лопатками:
A_тк21a := π*D_тк2с*l_тк2с = 0.263865 m^2
# 11.13 Удельный объем перед рабочими лопатками:
ν_тк21 := R_г*T_тк21/p_тк21 = 0.602782 m^3/kg
# 11.14 Средняя скорость перед рабочими лопатками:
c_тк21a := G_В*ν_тк21/A_тк21a = 199.302 m/s
# 11.15 Угол потока за СА:
α_тк21 := asin(c_тк21a/c_тк21)/deg = 19.3545
# 11.16 Окружная скорость при входе на рабочие лопатки:
u_тк2 := π*D_тк2с*n_тк = 368.44 m/s
# 11.17 Относительная скорость при входе в рабочие лопатки:
w_тк21 := sqrt(c_тк21^2 + u_тк2^2 - 2*c_тк21*u_тк2*cos(α_тк21*deg)) = 281.605 m/s
# 11.18 Угол входа потока на рабочие лопатки:
β_тк21 := atan(c_тк21a/(c_тк21*cos(α_тк21*deg) - u_тк2))/deg = 45.051
# 11.19 Располагаемый теплоперепад в РК:
H_тк2л := ρ_тк2*H_тк20*T_тк21/T'_тк21 = 95632.7 m^2/s^2
# 11.20 Окружная скорость при выходе из рабочих лопаток:
u_тк22 := π*D_тк2л*n_тк = 371.37 m/s
# 11.21 Коэффициент скорости в рабочих лопатках:
ψ_2 := 0.95
# 11.22 Относителньая скорость за рабочими лопатками:
w_тк22 := ψ_2*sqrt(w_тк21^2 + 2*H_тк2л + u_тк22^2 - u_тк2^2) = 496.129 m/s
# 11.23 Температура за рабочими лопатками:
T_тк22 := T_тк21 - (w_тк22^2 - w_тк21^2 - u_тк22^2 + u_тк2^2)/(2*c_pг2) = 1070.53 K
# 11.24 Температура в конце адиабатического расширения в рабочих лопатках:
T'_тк22 := T_тк21 - H_тк2л/c_pг2 = 1059.63 K
# 11.25 Давление за рабочими лопатками:
p_тк22 := p_тк21*(T'_тк22/T_тк21)^(k_г.2/(k_г.2 - 1)) = 405504 Pa
# 11.26 Удельный объем за рабочими лопатками:
υ_тк22 := R_г*T_тк22/p_тк22 = 0.765598 m^3/kg
# 11.27 Площадь кольцевого сечения за рабочими лопатками:
A_тк2рл := π*D_тк2л*l_тк2л = 0.325185 m^2
A_тк = 0.325185 m^2
# 11.28 Осевая скорость за рабочими лопатками:
c_тк22а := (G_В*υ_тк22/A_тк2рл) = 205.401 m/s
# 11.29 Угол выхода потока из рабочих лопаток:
β_тк22 := asin(c_тк22а/w_тк22)/deg = 24.4569
# 11.30 Скорость закрутки потока за рабочими лопатками:
c_тк22u := (w_тк22*cos(β_тк22*deg) - u_тк22) = 80.2421 m/s
# 11.31 Угол выхода потока из рабочих лопаток:
α_тк22 := acot(c_тк22u/c_тк22а)/deg = 68.6614
# 11.32 Скорость газа за РЛ:
c_тк22 := sqrt(c_тк22u^2 + c_тк22а^2) = 220.519 m/s
# 11.33 Работа на окружности рабочего колеса:
# 11.33.1 Окружная состовляющая скорости за СА:
c_тк21u := cos(α_тк21*deg)*c_тк21 = 567.388 m/s
L_тк2u := c_тк21u*u_тк2 + c_тк22u*u_тк22 = 238848 m^2/s^2
# 11.34 КПД на окружности рабочего колеса:
η_тк2u := L_тк2u/H_тк20 = 0.810622
# 11.35 Удельные потери в СА:
h_тк2с := (φ_2^-2 - 1)*c_тк21^2/2 = 19535.1 m^2/s^2
# 11.36 Удельные потери в СА с учетом их использования в РЛ:
h'_тк2с := h_тк2с*T'_тк22/T_тк21 = 18189.5 m^2/s^2
# 11.37 Относительные потери в СА:
ξ_тк2с := h_тк2с/H_тк20 = 0.0663
# 11.38 Относительные потери в СА с учетом их использования в РЛ:
ξ'_тк2с := ξ_тк2с*T'_тк22/T_тк21 = 0.0617332
# 11.39 Удельные потери в РЛ:
h_тк2л := (ψ_2^-2 - 1)*w_тк22^2/2 = 13295.8 m^2/s^2
# 11.40 Относительные потери в РЛ:
ξ_тк2л := h_тк2л/H_тк20 = 0.0451246
# 11.41 Удельные потери с выходной скоростью:
h_тк2в := c_тк22^2/2 = 24314.2 m^2/s^2
# 11.42 Относительные потери с выходной скоростью:
ξ_тк2в := h_тк2в/H_тк20 = 0.0825198
# 11.43 КПД  на окружности колеса:
η_тк2u := 1 - ξ'_тк2с - ξ_тк2л - ξ_тк2в = 0.810622
# 11.44 Радиальный зазор между корпусом и сопловыми лопатками:
δ_ткс := 0*m
# 11.45 Относительный радиальный зазор между корпусом и рабочими лопатками:
δ_Dтк := 0.001
# 11.46 Радиальный зазор между корпусом и рабочими лопатками:
δ_тк2л := δ_Dтк*D_тк2л = 0.000788073 m
# 11.47 Удельные потери в радиальном зазоре:
h_тк2з := 1.37*(1 + 1.6*ρ_тк2)*(1 + l_тк2л/D_тк2л)*δ_тк2л/l_тк2л*L_тк2u = 3463.31 m^2/s^2
# 11.48 Относительные потери в радиальном зазоре:
ξ_тк2з := h_тк2з/H_тк2 = 0.013508
# 11.49 Удельная работа ступени с учетом потери в радиальном зазоре:
L_тк2uз := L_тк2u - h_тк2з = 235384 m^2/s^2
# 11.50 Мощностной КПД ступени:
η'_тк2 := η_тк2u - ξ_тк2з = 0.797114
# 11.51 Лопаточный КПД ступени:
η'_тк2л := η'_тк2 + ξ_тк2в = 0.879634
# 11.52 Затраты мощности на трение и вентиляцию:
# 11.52.1 Удельный объем за СА:
υ_тк21 := R_г*T_тк21/p_тк21 = 0.602782 m^3/kg
N_тк2тв := 1.07*D_тк2л^2*(u_тк2/100)^3*(1/υ_тк21 + 1/υ_тк22)/2 = 49.2755 W
# 11.53 Удельные потери на трение и вентиляцию:
h_тк2т.в := N_тк2тв/G_В = 0.564804 m^2/s^2
# 11.54 Относительные потери на трение и вентиляцию:
ξ_тк2т.в := h_тк2т.в/H_тк20 = 1.91688e-6
# 11.55 Мощностной КПД  с учетом потерь на трение и вентиляцию:
η_тк2 := η'_тк2 - ξ_тк2т.в = 0.797112
# 11.56 Лопаточный КПД  с учетом потерь на трение и вентиляцию:
η_тк2л := η'_тк2л - ξ_тк2т.в = 0.879632
# 11.57 Удельная работа ступени:
L_тк2 := H_тк20*η_тк2 = 234867 m^2/s^2
# 11.58 Температура за второй ступенью:
T_ткст2 := T_тк22 + h_тк2з/c_pг2 + h_тк2т.в/c_pг2 = 1073.37 K
# 11.59 Температура торможения за второй ступенью:
T*_ткст2 := T_ткст2 + h_тк2в/c_pг2 = 1093.3 K
# 11.60 Давление торможения за второй ступенью:
p*_ткст2 := p_тк22*(T*_ткст2/T_ткст2)^(k_г.2/(k_г.2 - 1)) = 438134 Pa
# 11.61 Располагаемый теплоперепад по параметрам торможения:
H*_тк20 := c_pг2*T*_тк20*(1 - (p*_ткст2/p*_тк20)^((k_г.2 - 1)/k_г.2)) = 270982 m^2/s^2
# 11.62 КПД турбины по параметрам торможения:
η*_тк2 := L_тк2/H*_тк20 = 0.866726
# 11.63 Лопаточный КПД турбины:
η_тк2л := η*_тк2*H*_тк20/H_тк20 + c_тк22^2/(2*H_тк20) = 0.879632
# 12. Расчет параметров турбины привода компрессора
# 12.1. Удельная работа турбины:
L_ткΣ := L_тк1 + L_тк2 = 466644 m^2/s^2
# 12.2  Степень понижения давления в турбине:
π_тк := p*_г/p_тк22 = 4.79791
# 12.3. Располагаемый теплоперепад в турбине:
H_тк := c_pг*T*_г*(1 - π_тк^((1 - k_г)/k_г)) = 516632 m^2/s^2
# 12.4 Мощностной КПД турбины:
η_тк := L_ткΣ/H_тк = 0.903243
# 12.5 Лопаточный КПД турбины:
η_ткл := (L_ткΣ + h_тк2в)/H_тк = 0.950307
# 12.6 Располагаемый теплоперепад турбины по параметрам торможения:
H*_тк := c_pг*T*_г*(1 - (p*_тк/p*_г)^((k_г - 1)/k_г)) = 485094 m^2/s^2
# 12.7. КПД по параметрам торможения:
η*_тк := L_ткΣ/H*_тк = 0.961967
# 12.8 Мощность турбины:
N_тк := L_ткΣ*G_В*η_м = 40508125 W
# 13. Определение частоты вращения турбины привода компрессора.
# 13.1 Степернь понижения давления силовой турбины:
π_тс := p*_тк/p_т = 4.44418
# 13.2 Располагаемый теплоперепад силовой турбины:
H_тс := c_pг*T*_тк*(1 - π_тс^((1 - k_г)/k_г)) = 364485 m^2/s^2
# 13.3 Лопаточный КПД силовой турбины:
η_тсл := 0.89
# 13.4 Температура за  силовой турбиной:
T_тс := T*_тк - H_тс*η_тсл/c_pг = 793.557 K
# 13.5 Удельный обьем силовой турбины:
ν_тс := R_г*T_тс/p_т = 2.24906 m^3/kg
# 13.6 Осевая скорость:
c_тса := 200*m/s
# 13.7 Площадь кольцевого сечения силовой турбины:
A_тс := G_В*g_т*ν_тс/c_тса = 0.945138 m^2
# 13.8 Напряжение на растяжение в рабочих лопатках:
σ_л := 250*10^6*Pa
# 13.9 Максимальная частота вращения силовой турбины:
k_n := 6.8*10^-6*kg/m^3
n_тсmax := sqrt(σ_л/(k_n*A_тс)) = 6236889 1/s
# 13.10 Частота вращения силовой турбины:
n_тс := n_тсmax*1/(60*10^3) = 103.948 1/s
n_тс := 90*1/s
# 13.11 Относительная длина рабочей лопатки:
l_Dтс := 1/6
# 13.12 Средний диаметр:
D_тс := sqrt(A_тс/(π*l_Dтс)) = 1.34353 m
# 13.13 Окружная скорость на среднем диаметре:
u_тс := π*D_тс*n_тс = 379.875 m/s
# 13.14 Условная адиабатная скорость:
c_тсад0 := sqrt(2*H_тс) = 853.798 m/s
# 13.15 Степень реактивности:
ρ_сртс := 0.4
# 13.16 Оптимальное соотношение u/c_ад:
u_Cадтс := 0.55
# 13.17 Оптимальная окружная скорость:
u_тсη := u_Cадтс*c_тсад0 = 469.589 m/s
# 13.18 Средний диаметр при выходе рабочей лопатки из рабочих лопаток:
D_тсη := u_тсη/(π*n_тс) = 1.66083 m
# D_тсη>D_тс , следовательно одноступенчатую турбину проектировать нецелесообразно и для получения максимального КПД число ступеней необходимо увеличить!
n_тс*min = 5400
# 14. Основные размеры проточной части турбины привода компрессора:
# 14.1 Относительная длина рабочей лопатки последней ступени:
l_Dтс = 0.166667
# 14.2 Средний диаметр последней ступени:
D_тс = 1.34353 m
# 14.2.1 Длина лопатки последней ступени:
l_тс := l_Dтс*D_тс = 0.223922 m
# 14.2.2 Периферийный диаметр:
D_тс.пер := D_тс + l_тс = 1.56745 m
# 14.2.3. Втулочный диаметр:
D_тс.вт := D_тс - l_тс = 1.11961 m
# 14.3 Окружная скорость на среднем диаметре последней ступени:
u_тс = 379.875 m/s
# 14.4 Средний диаметр при выходе из СА первой ступени:
D_тс1с := 1.320*m
1.087
# 14.5 Окружна яскорость на среднем диаметре при выходе из СА первой ступени:
u_тс1 := π*D_тс1с*n_тс = 373.221 m/s
# 14.6 Средняя окружная скорость по турбине:
u_сртс := sqrt((u_тс1^2 + u_тс^2)/2) = 376.563 m/s
# 14.7 Оптимальное отношение y_0:
y_0тс := 0.5
# 14.8 Средняя скорость по ступеням:
c_тс2ср := 190*m/s
# 14.9 Коэффициент использования скорости:
μ_тс := 0.9
# 14.10 Число ступеней:
z := (c_тсад0^2/(μ_тс*c_тс2ср)^2 - 1)/(u_сртс^2/((μ_тс*c_тс2ср)^2*y_0тс^2) - 1) = 1.30072
# Принимаем число степеней:
z := 2
# 14.11 Распределение теплоперепадов поступеням:
# 14.11.1 Коэффициент возврата теплоты:
α := (z - 1)/(2*z)*(π_тс^((k_г - 1)/k_г) - 1)*(1 - η_тсл) = 0.0118104
# 14.11.2. Теплоперепад в первой ступени:
c_21 := 150*m/s
H_тс1 := H_тс*(1 + α)*u_тс1^2/(u_тс1^2 + u_тс^2) + 0.5*(μ_тс*c_21)^2 = 190249 m^2/s^2
# 14.11.3. Теплоперепад во второй ступени:
H_тс2 := H_тс*(1 + α)*u_тс^2/(u_тс1^2 + u_тс^2) = 187653 m^2/s^2
# 14.12 Распределение степени реактивности по ступеням:
ρ_тс1 := 0.38
ρ_тс2 := 0.42
# 14.13 Располагаемый теплоперепад в СА первой ступени:
H_тс1c := 1*H_тс1*(1 - ρ_тс1) = 117955 m^2/s^2
1
# 14.14 Угол потока за СА первой ступени:
α_тс11 := 17*deg
# 14.15 Скорость за СА первой ступени:
φ := 0.979
c_тс11 := φ*sqrt(2*H_тс1c) = 475.505 m/s
# 14.16 Температура за СА первой ступени:
T_тс1с := T*_тк - H_тс1c*φ^2/c_pг = 982.253 K
# 14.16.1 Средняя удельная теплоемкость и показатель адиабаты:
# По Рис. П3 для αг=3.186 и Т_у=982К:
c_pг1 := 1.18*10^3*J/(kg*K)
k_г.1 := 1.32
# 14.17 Давление за СА первой ступени:
p_тс1с := p*_тк*(1 - H_тс1c/(c_pг1*T*_тк))^(k_г.1/(k_г.1 - 1)) = 305006 Pa
# 14.18 Удельный объем за СА первой ступени:
ν_тс1с := R_г*T_тс1с/p_тс1с = 0.933925 m^3/kg
# 14.19 Длина СЛ первой ступени:
l_тс1с := G_В*ν_тс1с/(π*D_тс1с*sin(α_тс11)*c_тс11) = 0.141329 m
# 14.19.1 Периферийный диаметр первой ступени:
D_тс1с.пер := D_тс1с + l_тс1с = 1.46133 m
# 14.19.2. Втулочный диаметр первой ступени:
D_тс1с.вт := D_тс1с - l_тс1с = 1.17867 m
# 14.20 Геометрические параметры СЛ и РЛ первой ступени:
# 14.20.1 Ширина СЛ:
l_тс1сb := 1.7
b_тс1с := l_тс1с/l_тс1сb = 0.0831347 m
# 14.20.2 Ширина РЛ:
b_тс1л := b_тс1с/1.2 = 0.0692789 m
# 14.20.3 Осевой зазор:
δ_тс1.а.с := 0.23*b_тс1с = 0.019121 m
# 14.21 Геометрические параметры СЛ и РЛ второй ступени:
# 14.21.1 Ширина СЛ:
l_тс2сb := 2
b_тс2с := l_тс/l_тс2сb = 0.111961 m
# 14.21.2 Ширина РЛ:
b_тс2л := b_тс2с/1.2 = 0.0933009 m
# 14.21.3 Осевой зазор:
δ_тс2.а.с := 0.23*b_тс2с = 0.025751 m
# 14.22 Угол раскрытия меридионального сечения:
γ_тсн := atan((D_тс/2 + l_тс/2 - (D_тс1с/2 + l_тс1с/2))/(δ_тс1.а.с + b_тс1л + δ_тс2.а.с + b_тс2с + δ_тс2.а.с + b_тс2л))*1/deg = 8.7398
γ_тсв := atan(((D_тс1с/2 - l_тс1с/2) - (D_тс/2 - l_тс/2))/(δ_тс1.а.с + b_тс1л + δ_тс2.а.с + b_тс2с + δ_тс2.а.с + b_тс2л))*1/deg = 4.88999
γ_тс := γ_тсв + γ_тсн = 13.6298
l_тс1л := l_тс1с + (δ_тс1.а.с + b_тс1л)*tan(γ_тсн*deg) + (δ_тс1.а.с + b_тс1л)*tan(γ_тсв*deg) = 0.162482 m
# 14.23 Длины лопаток и их средние диаметры:
D_тс1л := (D_тс1с/2 + l_тс1с/2 + (δ_тс1.а.с + b_тс1л)*tan(γ_тсн*deg) - l_тс1л/2)*2 = 1.32603 m
l_тс1с = 0.141329 m
l_тс2с := l_тс1с + (δ_тс1.а.с + b_тс1л + δ_тс2.а.с + b_тс2с)*tan(γ_тсн*deg) + (δ_тс1.а.с + b_тс1л + δ_тс2.а.с + b_тс2с)*tan(γ_тсв*deg) = 0.195435 m
D_тс1с = 1.32 m
D_тс2с := (D_тс1с/2 + l_тс1с/2 + (δ_тс1.а.с + b_тс1л + δ_тс2.а.с + b_тс2с)*tan(γ_тсн*deg) - l_тс2с/2)*2 = 1.33542 m
l_тс1л = 0.162482 m
D_тс1л = 1.32603 m
l_тс2с = 0.195435 m
D_тс2с = 1.33542 m
D_тс2л := D_тс = 1.34353 m
l_тс2л := l_тс = 0.223922 m
# 15. Расчет первой ступени силовой турбины:
# 15.1 Располагаемый теплоперепад первой ступени:
H_тс10 := 1*H_тс1 = 190249 m^2/s^2
1
# 15.2 Степень реактивности:
ρ_тс1 = 0.38
# 15.3 Располагаемый теплоперепад в СА первой ступени:
H_тс1c := H_тс10*(1 - ρ_тс1) = 117955 m^2/s^2
# 15.4 Коэффициент скорости:
φ_1 := φ = 0.979
# 15.5 Скорость за СА:
c_тс11 := φ*sqrt(2*H_тс1c) = 475.505 m/s
# 15.6 Средняя условная температура первой ступени:
T_тс1у := T*_тк - H_тс10*φ_1^2/(2*c_pг1) = 1005.93 K
# 15.7 Средняя удельная теплоемкость и показатель адиабаты:
# По Рис. П3 для αг=3.186 и Т_у=1006К:
c_pг1 := 1.175*10^3*J/(kg*K)
k_г.1 := 1.325
# 15.8 Температура за СА:
T_тс11 := T*_тк - H_тс1c*φ_1^2/c_pг1 = 986.977 K
# 15.9 Температура в конце адиабатного расширения в СА:
T'_тс11 := T*_тк - H_тс1c/c_pг1 = 982.806 K
# 15.10 Давление перед рабочими лопатками:
p_тс11 := p*_тк*(T'_тс11/T*_тк)^(k_г.1/(k_г.1 - 1)) = 305889 Pa
# 15.11 Кольцевая площадь сечения перед рабочими лопатками:
A_тс11a := π*D_тс1с*l_тс1с = 0.586077 m^2
# 15.12 Удельный объем перед рабочими лопатками:
ν_тс11 := R_г*T_тс11/p_тс11 = 0.935709 m^3/kg
# 15.13 Средняя скорость перед рабочими лопатками:
c_тс11a := G_В*ν_тс11/A_тс11a = 139.29 m/s
# 15.14 Угол потока за СА:
α_тс11 := asin(c_тс11a/c_тс11)/deg = 17.0335
# 15.15 Относительная скорость при входе в рабочие лопатки:
w_тс11 := sqrt(c_тс11^2 + u_тс1^2 - 2*c_тс11*u_тс1*cos(α_тс11*deg)) = 161.343 m/s
# 15.16 Угол входа потока на рабочие лопатки:
β_тс11 := atan(c_тс11a/(c_тс11*cos(α_тс11*deg) - u_тс1))/deg = 59.6905
# 15.17 Располагаемый теплоперепад в РК:
H_тс1л := ρ_тс1*H_тс10*T_тс11/T'_тс11 = 72601.6 m^2/s^2
# 15.18 Окружная скорость при входе на рабочие лопатки:
u_тс1 = 373.221 m/s
# 15.19 Окружная скорость при выходе из рабочих лопаток:
u_тс12 := π*D_тс1л*n_тс = 374.925 m/s
# 15.20 Коэффициент скорости в рабочих лопатках:
ψ_1 := 0.977
# 15.21 Относителньая скорость за рабочими лопатками:
w_тс12 := ψ_1*sqrt(w_тс11^2 + 2*H_тс1л + u_тс12^2 - u_тс1^2) = 405.79 m/s
# 15.22 Температура за рабочими лопатками:
T_тс12 := T_тс11 - (w_тс12^2 - w_тс11^2 - u_тс12^2 + u_тс1^2)/(2*c_pг1) = 928.527 K
# 15.23 Температура в конце адиабатического расширения в рабочих лопатках:
T'_тс12 := T_тс11 - H_тс1л/c_pг1 = 925.189 K
# 15.24 Давление за рабочими лопатками:
p_тс12 := p_тс11*(T'_тс12/T_тс11)^(k_г.1/(k_г.1 - 1)) = 235016 Pa
# 15.25 Удельный объем за рабочими лопатками:
υ_тс12 := R_г*T_тс12/p_тс12 = 1.14576 m^3/kg
# 15.26 Площадь кольцевого сечения за рабочими лопатками:
A_тс1рл := π*D_тс1л*l_тс1л = 0.676873 m^2
# 15.27 Осевая скорость за рабочими лопатками:
c_тс12а := (G_В*υ_тс12/A_тс1рл) = 147.68 m/s
# 15.28 Угол выхода потока из рабочих лопаток:
β_тс12 := asin(c_тс12а/w_тс12)/deg = 21.3418
# 15.29 Скорость закрутки потока за рабочими лопатками:
c_тс12u := (w_тс12*cos(β_тс12*deg) - u_тс12) = 3.03816 m/s
# 15.30 Угол выхода потока из рабочих лопаток:
α_тс12 := atan(c_тс12а/c_тс12u)/deg = 88.8214
# 15.31 Скорость газа за РЛ:
c_тс12 := sqrt(c_тс12u^2 + c_тс12а^2) = 147.711 m/s
# 15.32. Работа на окружности рабочего колеса:
# 15.32.1 Окружная состовляющая скорости за СА:
c_тс11u := cos(α_тс11*deg)*c_тс11 = 454.647 m/s
L_тс1u := c_тс11u*u_тс1 + c_тс12u*u_тс12 = 170823 m^2/s^2
# 15.33. КПД на окружности рабочего колеса:
η_тс1u := L_тс1u/H_тс10 = 0.897889
# 15.34. Удельные потери в СА:
h_тс1с := (φ_1^-2 - 1)*c_тс11^2/2 = 4902.08 m^2/s^2
# 15.35. Удельные потери в СА с учетом их использования в РЛ:
h'_тс1с := h_тс1с*T'_тс12/T_тс11 = 4595.19 m^2/s^2
# 15.36. Относительные потери в СА:
ξ_тс1с := h_тс1с/H_тс10 = 0.0257666
# 15.37. Относительные потери в СА с учетом их использования в РЛ:
ξ'_тс1с := ξ_тс1с*T'_тс12/T_тс11 = 0.0241535
# 15.38. Удельные потери в РЛ:
h_тс1л := (ψ_1^-2 - 1)*w_тс12^2/2 = 3922.1 m^2/s^2
# 15.39. Относительные потери в РЛ:
ξ_тс1л := h_тс1л/H_тс10 = 0.0206156
# 15.40. Удельные потери с выходной скоростью:
h_тс1в := c_тс12^2/2 = 10909.3 m^2/s^2
# 15.41. Относительные потери с выходной скоростью:
ξ_тс1в := h_тс1в/H_тс10 = 0.057342
# 15.42. КПД  на окружности колеса:
η_тс1u := 1 - ξ'_тс1с - ξ_тс1л - ξ_тс1в = 0.897889
# 15.43. Радиальный зазор между корпусом и сопловыми лопатками:
δ_тсс := 0*m
# 15.44. Относительный радиальный зазор между корпусом и рабочими лопатками:
δ_Dтс := 0.001
# 15.45. Радиальный зазор между корпусом и рабочими лопатками:
δ_тс1л := δ_Dтс*D_тс1л = 0.00132603 m
# 15.46. Удельные потери в радиальном зазоре:
h_тс1з := 1.37*(1 + 1.6*ρ_тс1)*(1 + l_тс1л/D_тс1л)*δ_тс1л/l_тс1л*L_тс1u = 3447.46 m^2/s^2
# 15.47. Относительные потери в радиальном зазоре:
ξ_тс1з := h_тс1з/H_тс1 = 0.0181207
# 15.48. Удельная работа ступени с учетом потери в радиальном зазоре:
L_тс1uз := L_тс1u - h_тс1з = 167375 m^2/s^2
# 15.49. Мощностной КПД ступени:
η'_тс1 := η_тс1u - ξ_тс1з = 0.879768
# 15.50. Лопаточный КПД ступени:
η'_тс1л := η'_тс1 + ξ_тс1в = 0.93711
# 15.51. Затраты мощности на трение и вентиляцию:
# 15.51.1 Удельный объем за СА:
υ_тс11 := R_г*T_тс11/p_тс11 = 0.935709 m^3/kg
N_тс1тв := 1.07*D_тс1л^2*(u_тс1/100)^3*(1/υ_тс11 + 1/υ_тс12)/2 = 94.9494 W
# 15.52. Удельные потери на трение и вентиляцию:
h_тс1т.в := N_тс1тв/G_В = 1.08833 m^2/s^2
# 15.53. Относительные потери на трение и вентиляцию:
ξ_тс1т.в := h_тс1т.в/H_тс10 = 5.72052e-6
# 15.54. Мощностной КПД  с учетом потерь на трение и вентиляцию:
η_тс1 := η'_тс1 - ξ_тс1т.в = 0.879762
# 15.55. Лопаточный КПД  с учетом потерь на трение и вентиляцию:
η_тс1л := η'_тс1л - ξ_тс1т.в = 0.937104
# 15.56. Удельная работа ступени:
L_тс1 := H_тс10*η_тс1 = 167374 m^2/s^2
# 15.57. Температура за первой ступенью:
T_тсст1 := T_тс12 + h_тс1з/c_pг1 + h_тс1т.в/c_pг1 = 931.462 K
# 15.58. Температура торможения за первой ступенью:
T*_тсст1 := T_тсст1 + h_тс1в/c_pг1 = 940.746 K
# 15.59. Давление торможения за первой ступенью:
p*_тсст1 := p_тс12*(T*_тсст1/T_тсст1)^(k_г.1/(k_г.1 - 1)) = 244714 Pa
# 15.60. Располагаемый теплоперепад по параметрам торможения:
H*_тс10 := c_pг1*T*_тк*(1 - (p*_тсст1/p*_тк)^((k_г.1 - 1)/k_г.1)) = 179459 m^2/s^2
# 15.61. КПД турбины по параметрам торможения:
η*_тс1 := L_тс1/H*_тс10 = 0.932658
# 15.62 Лопаточный КПД турбины:
η_тс1л := η*_тс1*H*_тс10/H_тс10 + c_тс12^2/(2*H_тс10) = 0.937104
# 16. Расчет второй ступени силовой турбины:
# 16.1. Температура торможения перед ступенью:
T*_тс20 := T*_тсст1 = 940.746 K
# 16.2 Давление торможения перед ступенью:
p*_тс20 := p_тс12*(1 + (μ_тс*c_тс12)^2/(2*c_pг2*T_тсст1))^(k_г.2/(k_г.2 - 1)) = 242800 Pa
# 16.3. Располагаемый теплоперепад ступени:
# 16.3.1 Удельная работа силовой турбины:
L_тсΣ := L_тс
# 16.3.2 Удельная работа ступени:
p_тс22 := p_т = 102323 Pa
L_тс2 := L_тсΣ - L_тс1 = 187208 m^2/s^2
# 16.3.3 Мощностной КПД:
η_тс2 := 0.834
H_тс20 := L_тс2/η_тс2 = 224471 m^2/s^2
H_тс20 := c_pг2*T*_тс20*(1 - (p_тс22/p*_тс20)^((k_г.2 - 1)/k_г.2)) = 213107 m^2/s^2
# 16.4 Степень реактивности:
ρ_тс2 = 0.42
# 16.5 Располагаемый теплоперепад в СА второй ступени:
H_тс2c := H_тс20*(1 - ρ_тс2) = 123602 m^2/s^2
# 16.6 Коэффициент скорости:
φ_2 := φ = 0.979
# 16.7 Скорость за СА:
c_тс21 := φ_2*sqrt(2*H_тс2c) = 486.755 m/s
# 16.8 Средняя условная температура второй ступени:
T_тс2у := T*_тс20 - H_тс20*φ_2^2/(2*c_pг1) = 853.831 K
# 16.8.1 Средняя удельная теплоемкость и показатель адиабаты:
c_pг2 := 1.14*10^3*J/(kg*K)
k_г.2 := c_pг2/(c_pг2 - R_г) = 1.34118
# 16.9 Температура за СА:
T_тс21 := T*_тс20 - H_тс2c*φ_2^2/c_pг2 = 836.83 K
# 16.10 Температура в конце адиабатного расширения в СА:
T'_тс21 := T*_тс20 - H_тс2c/c_pг2 = 832.324 K
# 16.11 Давление перед рабочими лопатками:
p_тс21 := p*_тс20*(T'_тс21/T*_тс20)^(k_г.2/(k_г.2 - 1)) = 150036 Pa
# 16.12 Кольцевая площадь сечения перед рабочими лопатками:
A_тс21a := π*D_тс2с*l_тс2с = 0.819913 m^2
# 16.13 Удельный объем перед рабочими лопатками:
ν_тс21 := R_г*T_тс21/p_тс21 = 1.61748 m^3/kg
# 16.14 Средняя скорость перед рабочими лопатками:
c_тс21a := G_В*ν_тс21/A_тс21a = 172.109 m/s
# 16.15 Угол потока за СА:
α_тс21 := asin(c_тс21a/c_тс21)/deg = 20.7068
# 16.16 Окружная скорость при входе на рабочие лопатки:
u_тс2 := π*D_тс2с*n_тс = 377.58 m/s
# 16.17 Относительная скорость при входе в рабочие лопатки:
w_тс21 := sqrt(c_тс21^2 + u_тс2^2 - 2*c_тс21*u_тс2*cos(α_тс21*deg)) = 188.849 m/s
# 16.18 Угол входа потока на рабочие лопатки:
β_тс21 := atan(c_тс21a/(c_тс21*cos(α_тс21*deg) - u_тс2))/deg = 65.6942
# 16.19 Располагаемый теплоперепад в РК:
H_тс2л := ρ_тс2*H_тс20*T_тс21/T'_тс21 = 89989.3 m^2/s^2
# 16.20 Окружная скорость при выходе из рабочих лопаток:
u_тс22 := π*D_тс2л*n_тс = 379.875 m/s
# 16.21 Коэффициент скорости в рабочих лопатках:
ψ_2 := 0.97
# 16.22 Относителньая скорость за рабочими лопатками:
w_тс22 := ψ_2*sqrt(w_тс21^2 + 2*H_тс2л + u_тс22^2 - u_тс2^2) = 452.254 m/s
# 16.23 Температура за рабочими лопатками:
T_тс22 := T_тс21 - (w_тс22^2 - w_тс21^2 - u_тс22^2 + u_тс2^2)/(2*c_pг2) = 763.526 K
# 16.24 Температура в конце адиабатического расширения в рабочих лопатках:
T'_тс22 := T_тс21 - H_тс2л/c_pг2 = 757.892 K
# 16.25 Давление за рабочими лопатками:
p_тс22 := p_тс21*(T'_тс22/T_тс21)^(k_г.2/(k_г.2 - 1)) = 101635 Pa
# 16.26 Удельный объем за рабочими лопатками:
υ_тс22 := R_г*T_тс22/p_тс22 = 2.1786 m^3/kg
# 16.27 Площадь кольцевого сечения за рабочими лопатками:
A_тс2рл := π*D_тс2л*l_тс2л = 0.945138 m^2
A_тс = 0.945138 m^2
# 16.28 Осевая скорость за рабочими лопатками:
c_тс22а := (G_В*υ_тс22/A_тс2рл) = 201.102 m/s
# 16.29 Угол выхода потока из рабочих лопаток:
β_тс22 := asin(c_тс22а/w_тс22)/deg = 26.402
# 16.30 Скорость закрутки потока за рабочими лопатками:
c_тс22u := (w_тс22*cos(β_тс22*deg) - u_тс22) = 25.2072 m/s
# 16.31 Угол выхода потока из рабочих лопаток:
α_тс22 := acot(c_тс22u/c_тс22а)/deg = 82.8555
# 16.32 Скорость газа за РЛ:
c_тс22 := sqrt(c_тс22u^2 + c_тс22а^2) = 202.676 m/s
# 16.33 Работа на окружности рабочего колеса:
# 16.33.1 Окружная состовляющая скорости за СА:
c_тс21u := cos(α_тс21*deg)*c_тс21 = 455.311 m/s
L_тс2u := c_тс21u*u_тс2 + c_тс22u*u_тс22 = 181492 m^2/s^2
# 16.34 КПД на окружности рабочего колеса:
η_тс2u := L_тс2u/H_тс20 = 0.851649
# 16.35 Удельные потери в СА:
h_тс2с := (φ_2^-2 - 1)*c_тс21^2/2 = 5136.77 m^2/s^2
# 16.36 Удельные потери в СА с учетом их использования в РЛ:
h'_тс2с := h_тс2с*T'_тс22/T_тс21 = 4652.22 m^2/s^2
# 16.37 Относительные потери в СА:
ξ_тс2с := h_тс2с/H_тс20 = 0.0241042
# 16.38 Относительные потери в СА с учетом их использования в РЛ:
ξ'_тс2с := ξ_тс2с*T'_тс22/T_тс21 = 0.0218305
# 16.39 Удельные потери в РЛ:
h_тс2л := (ψ_2^-2 - 1)*w_тс22^2/2 = 6423.6 m^2/s^2
# 16.40 Относительные потери в РЛ:
ξ_тс2л := h_тс2л/H_тс20 = 0.0301427
# 16.41 Удельные потери с выходной скоростью:
h_тс2в := c_тс22^2/2 = 20538.7 m^2/s^2
# 16.42 Относительные потери с выходной скоростью:
ξ_тс2в := h_тс2в/H_тс20 = 0.0963777
# 16.43 КПД  на окружности колеса:
η_тс2u := 1 - ξ'_тс2с - ξ_тс2л - ξ_тс2в = 0.851649
# 16.44 Радиальный зазор между корпусом и сопловыми лопатками:
δ_тсс := 0*m
# 16.45 Относительный радиальный зазор между корпусом и рабочими лопатками:
0.45*(180/(180 - (90 + 20.7))*sin(deg*90)/sin(deg*20.7))^(1/3)*(1 - 0.13) = 0.76113
δ_Dтс := 0.001
# 16.46 Радиальный зазор между корпусом и рабочими лопатками:
0.761*112 = 85.232
δ_тс2л := δ_Dтс*D_тс2л = 0.00134353 m
# 16.47 Удельные потери в радиальном зазоре:
π*1335/104.851 = 39.9999
h_тс2з := 1.37*(1 + 1.6*ρ_тс2)*(1 + l_тс2л/D_тс2л)*δ_тс2л/l_тс2л*L_тс2u = 2910.13 m^2/s^2
# 16.48 Относительные потери в радиальном зазоре:
π*1335/40 = 104.851
π*1140/40 = 89.5354
π*1531/40 = 120.244
ξ_тс2з := h_тс2з/H_тс2 = 0.015508
# 16.49 Удельная работа ступени с учетом потери в радиальном зазоре:
L_тс2uз := L_тс2u - h_тс2з = 178582 m^2/s^2
# 16.50 Мощностной КПД ступени:
η'_тс2 := η_тс2u - ξ_тс2з = 0.836141
# 16.51 Лопаточный КПД ступени:
η'_тс2л := η'_тс2 + ξ_тс2в = 0.932519
# 16.52 Затраты мощности на трение и вентиляцию:
# 16.52.1 Удельный объем за СА:
υ_тс21 := R_г*T_тс21/p_тс21 = 1.61748 m^3/kg
N_тс2тв := 1.07*D_тс2л^2*(u_тс2/100)^3*(1/υ_тс21 + 1/υ_тс22)/2 = 56.001 W
# 16.53 Удельные потери на трение и вентиляцию:
h_тс2т.в := N_тс2тв/G_В = 0.641893 m^2/s^2
# 16.54 Относительные потери на трение и вентиляцию:
ξ_тс2т.в := h_тс2т.в/H_тс20 = 3.01207e-6
# 16.55 Мощностной КПД  с учетом потерь на трение и вентиляцию:
η_тс2 := η'_тс2 - ξ_тс2т.в = 0.836138
# 16.56 Лопаточный КПД  с учетом потерь на трение и вентиляцию:
η_тс2л := η'_тс2л - ξ_тс2т.в = 0.932516
# 16.57 Удельная работа ступени:
L_тс2 := H_тс20*η_тс2 = 178186 m^2/s^2
# 16.58 Температура за второй ступенью:
T_тсст2 := T_тс22 + h_тс2з/c_pг2 + h_тс2т.в/c_pг2 = 766.08 K
# 16.59 Температура торможения за второй ступенью:
T*_тсст2 := T_тсст2 + h_тс2в/c_pг2 = 784.096 K
# 16.60 Давление торможения за второй ступенью:
p*_тсст2 := p_тс22*(T*_тсст2/T_тсст2)^(k_г.2/(k_г.2 - 1)) = 111360 Pa
# 16.61 Располагаемый теплоперепад по параметрам торможения:
H*_тс20 := c_pг2*T*_тс20*(1 - (p*_тсст2/p*_тс20)^((k_г.2 - 1)/k_г.2)) = 192897 m^2/s^2
# 16.62 КПД турбины по параметрам торможения:
η*_тс2 := L_тс2/H*_тс20 = 0.92374
# 16.63 Лопаточный КПД турбины:
η_тс2л := η*_тс2*H*_тс20/H_тс20 + c_тс22^2/(2*H_тс20) = 0.932516
# 17. Расчет параметров силовой турбины:
# 17.1. Удельная работа турбины:
L_тсΣ := L_тс1 + L_тс2 = 345561 m^2/s^2
# 17.2  Степень понижения давления в турбине:
π_тс := p*_тк/p_тс22 = 4.47427
# 17.3. Располагаемый теплоперепад в турбине:
H_тс := c_pг2*T*_тк*(1 - π_тс^((1 - k_г.2)/k_г.2)) = 391357 m^2/s^2
# 17.4 Мощностной КПД турбины:
η_тс := L_тсΣ/H_тс = 0.882981
# 17.5 Лопаточный КПД турбины:
η_тсл := (L_тсΣ + h_тс2в)/H_тс = 0.935461
# 17.6 Располагаемый теплоперепад турбины по параметрам торможения:
H*_тс := c_pг2*T*_тк*(1 - (p*_тсст2/p*_тк)^((k_г.2 - 1)/k_г.2)) = 371520 m^2/s^2
# 17.7. КПД по параметрам торможения:
η*_тс := L_тсΣ/H*_тс = 0.930126
# 17.8 Мощность турбины:
N_тс := L_тсΣ*G_В*η_м = 29997199 W
# 18. Уточнение коэффициентов φ и ψ для силовой турбины:
# 18.1. Потери в сопловом аппарате первой ступени
# 18.1.1. Определим коэффициент потерь от трения в сопловом аппарате в зависимости от направления потока:
ξ_тр.с := 0.015
# 18.1.2. Определим кромочные потери:
b_c := b_тс1с = 0.0831347 m
t_bc := 0.75
s_c := 2.5*10^-3*m
t_c := t_bc*b_c explicit, ALL → 0.75*0.0831346775195*m = 0.062351 m
ξ_кр.с := 0.2*s_c/(t_c*sin(α_тс11*deg)) = 0.0273755
# 18.1.3. Определим коэффициент профильных потерь:
ξ_пр.с := ξ_тр.с + ξ_кр.с = 0.0423755
# 18.1.4. Определим число Маха на выходе из соплового аппарата:
M_1 := c_тс11/sqrt(k_г.1*R_г*T_тс11) = 0.772137
# Течение дозвуковое. Учет волновых потерь не требуется.
# 18.1.5. Определим учет концевых потерь.
ξ_к.с := 2*ξ_тр.с*t_c*sin(α_тс11*deg)/l_тс1с = 0.00387702
# 18.1.6. Определим коэффициент потерь в сопловом аппарате:
ξ_с := ξ_пр.с + ξ_к.с = 0.0462526
# 18.1.7. Определим коэффициент скорости в сопловом аппарате:
φ := sqrt(1 - ξ_с) = 0.9766
# 18.2. Потери в рабочей лопатке первой ступени
# 18.2.1. Определим коэффициент потерь от трения в рабочей лопатке в зависимости от направления потока:
ξ_тр.л := 0.020
# 18.2.2. Определим кромочные потери:
b_л := b_тс1л = 0.0692789 m
t_bл := 0.75
s_л := 2.5*10^-3*m
t_л := t_bл*b_л explicit, ALL → 0.75*0.0692788979329*m = 0.0519592 m
ξ_кр.л := 0.2*s_л/(t_л*sin(β_тс12*deg)) = 0.0264416
# 18.2.3. Определим коэффициент профильных потерь:
ξ_пр.л := ξ_тр.л + ξ_кр.л = 0.0464416
# 18.2.4. Определим число Маха на выходе из рабочей лопатки:
M_2 := w_тс12/sqrt(k_г.1*R_г*T_тс12) = 0.679356
# Течение дозвуковое. Учет волновых потерь не требуется.
# 18.2.5. Определим учет концевых потерь.
ξ_к.л := 2*ξ_тр.л*t_л*sin(β_тс12*deg)/l_тс1л = 0.00465519
# 18.2.6. Определим коэффициент потерь в сопловом аппарате:
ξ_л := ξ_пр.л + ξ_к.л → 0.0510968090158 = 0.0510968
# 18.2.7. Определим коэффициент скорости в сопловом аппарате:
ψ := sqrt(1 - ξ_л) explicit, ALL → sqrt(1 - 0.0510968090158) = 0.974117
# 19. Профилирование по радиусу второй ступени силовой турбины:
# Выберем закон профилирования лопатки по высоте  Г=const.
# 19.1. Для этого закона существуют следующие зависимости:
C_u*r == const
C_а == const
# 19.2 Основные геометрические параметры:
# 19.2.1 Средний радиус на выходе из СА:
r_са.ср := D_тс2с/2 = 0.667708 m
# 19.2.2. Периферийный радиус на выходе из СА:
D_са.пер := D_тс2с + l_тс2с = 1.53085 m
r_са.пер := D_са.пер/2 = 0.765425 m
# 19.2.3. Втулочный радиус на выходе из СА:
D_са.вт := D_тс2с - l_тс2с = 1.13998 m
r_са.вт := D_са.вт/2 = 0.569991 m
# 19.2.4 Средний радиус на выходе из РЛ:
r_рл.ср := D_тс2л/2 = 0.671766 m
# 19.2.5. Периферийный радиус на выходе из РЛ:
D_рл.пер := D_тс2л + l_тс2л = 1.56745 m
r_рл.пер := D_рл.пер/2 = 0.783727 m
# 19.2.6. Втулочный радиус на выходе из РЛ:
D_рл.вт := D_тс2л - l_тс2л = 1.11961 m
r_рл.вт := D_рл.вт/2 = 0.559805 m
# 19.3 Скорости на радиусах:
# 19.3.1.Cкорости на периферийном радиусе:
c_1а.пер := c_тс21a = 172.109 m/s
c_1u.пер := c_тс21u*r_са.ср/r_са.пер = 397.184 m/s
c_1.пер := sqrt(c_1а.пер^2 + c_1u.пер^2) = 432.871 m/s
c_2а.пер := c_тс22а = 201.102 m/s
c_2u.пер := c_тс22u*r_рл.ср/r_рл.пер = 21.6061 m/s
c_2.пер := sqrt(c_2а.пер^2 + c_2u.пер^2) = 202.259 m/s
# 19.3.1.Cкорости на втулочном радиусе:
c_1а.вт := c_тс21a = 172.109 m/s
c_1u.вт := c_тс21u*r_са.ср/r_са.вт = 533.368 m/s
c_1.вт := sqrt(c_1а.вт^2 + c_1u.вт^2) = 560.449 m/s
c_2а.вт := c_тс22а = 201.102 m/s
c_2u.вт := c_тс22u*r_рл.ср/r_рл.вт = 30.2486 m/s
c_2.вт := sqrt(c_2а.вт^2 + c_2u.вт^2) = 203.364 m/s
# 19.4. Располагаемый теплоперепад в СА:
H_са.пер := (c_1.пер/φ)^2/2 = 98232 m^2/s^2
H_са.вт := (c_1.вт/φ)^2/2 = 164668 m^2/s^2
# 19.5. Располагаемый теплоперепад в РЛ:
H_рл.пер := H_тс20 - H_са.пер = 114874 m^2/s^2
H_рл.вт := H_тс20 - H_са.вт = 48438.5 m^2/s^2
# 19.6. Степени реактивности последней ступени:
ρ_2.пер := H_рл.пер/H_тс20 = 0.539047
ρ_2.вт := H_рл.вт/H_тс20 = 0.227297
# 19.7. Температура конца адиабатического расширения в сопловом аппарате:
T'_1.пер := T*_тс20 - H_са.пер/c_pг2 = 854.578 K
T'_1.вт := T*_тс20 - H_са.вт/c_pг2 = 796.301 K
# 19.8. Температура после СА:
T_1.пер := T*_тс20 - c_1.пер^2/(2*c_pг2) = 858.563 K
T_1.вт := T*_тс20 - c_1.вт^2/(2*c_pг2) = 802.982 K
# 19.9. Составляющие треугольника скоростей на периферии
# 19.9.1. Окружная скорость:
u_1.ср := π*n_тс*D_тс = 379.875 m/s
u_2.ср := π*n_тс*D_тс = 379.875 m/s
u_1.пер := u_1.ср*r_са.пер/r_са.ср = 435.469 m/s
u_2.пер := u_2.ср*r_рл.пер/r_рл.ср = 443.187 m/s
# 19.9.2. Направление абсолютной скорости на выходе из СА:
α_1.пер := asin(c_1а.пер/c_1.пер)/deg = 23.4282
# 19.9.3. Относительная скорость за СА:
w_1.пер := sqrt(c_1.пер^2 + u_1.пер^2 - 2*c_1.пер*u_1.пер*cos(α_1.пер*deg)) = 176.316 m/s
# 19.9.4. Угол входа потока в относительном движении:
β_1.пер := acot((c_1.пер*cos(α_1.пер*deg) - u_1.пер)/c_1а.пер)/deg = 102.541
# 19.9.5. Относительная скорость за РЛ:
w_2.пер := ψ_2*sqrt(w_1.пер^2 + 2*H_рл.пер + u_2.пер^2 - u_1.пер^2) = 501.799 m/s
# 19.9.6. Угол выхода потока в относительном движении:
β_2.пер := asin(c_2а.пер/w_2.пер)/deg = 23.6258
# 19.9.7. Угол выхода потока за РЛ:
α_2.пер := acot(c_2u.пер/c_2а.пер)/deg = 83.8677
# 19.9.8. Действительная температура за РЛ:
T_2.пер := T_1.пер - (w_2.пер^2 - w_1.пер^2 - u_2.пер^2 + u_1.пер^2)/(2*c_pг) = 763.058 K
# 19.9.9. Число Маха по относительной скорости на входе в РК:
M_1w.пер := w_1.пер/sqrt(k_г.2*R_г*T_1.пер) = 0.305115
# 19.9.10. Число Маха по относительной скорости на выходе из РК:
M_2w.пер := w_2.пер/sqrt(k_г.2*R_г*T_2.пер) = 0.921105
# 19.9.11. Число Маха по абсолютной скорости на входе в РК
M_1c.пер := c_1.пер/sqrt(k_г.2*R_г*T_1.пер) = 0.749083
# 19.10. Составляющие треугольника скоростей на периферии
# 19.10.1. Окружная скорость:
u_1.ср := π*n_тс*D_тс = 379.875 m/s
u_2.ср := π*n_тс*D_тс = 379.875 m/s
u_1.вт := u_1.ср*r_са.вт/r_са.ср = 324.281 m/s
u_2.вт := u_2.ср*r_рл.вт/r_рл.ср = 316.562 m/s
# 19.10.2. Направление абсолютной скорости на выходе из СА:
α_1.вт := asin(c_1а.вт/c_1.вт)/deg = 17.8841
# 19.10.3. Относительная скорость за СА:
w_1.вт := sqrt(c_1.вт^2 + u_1.вт^2 - 2*c_1.вт*u_1.вт*cos(α_1.вт*deg)) = 270.812 m/s
# 19.10.4. Угол входа потока в относительном движении:
β_1.вт := acot((c_1.вт*cos(α_1.вт*deg) - u_1.вт)/c_1а.вт)/deg = 39.4594
# 19.10.5. Относительная скорость за РЛ:
w_2.вт := ψ_2*sqrt(w_1.вт^2 + 2*H_рл.вт + u_2.вт^2 - u_1.вт^2) = 394.337 m/s
# 19.10.6. Угол выхода потока в относительном движении:
β_2.вт := asin(c_2а.вт/w_2.вт)/deg = 30.6621
# 19.10.7. Угол выхода потока за РЛ:
α_2.вт := acot(c_2u.вт/c_2а.вт)/deg = 81.446
# 19.10.8. Действительная температура за РЛ:
T_2.вт := T_1.вт - (w_2.вт^2 - w_1.вт^2 - u_2.вт^2 + u_1.вт^2)/(2*c_pг) = 764.093 K
# 19.10.9. Число Маха по относительной скорости на входе в РК:
M_1w.вт := w_1.вт/sqrt(k_г.2*R_г*T_1.вт) = 0.484588
# 19.10.10. Число Маха по относительной скорости на выходе из РК:
M_2w.вт := w_2.вт/sqrt(k_г.2*R_г*T_2.вт) = 0.723357
# 19.10.11. Число Маха по абсолютной скорости на входе в РК
M_1c.вт := c_1.вт/sqrt(k_г.2*R_г*T_1.вт) = 1.00286
