N_e := 32*10^6
T*_а := 288
T*_г := 1773
p*_а := 101300
p_а := p*_а
# Выбор исходных значений КПД и коэффициентов, характеризующих потери по тракту установки:
# Коэффициент полного давления при входе:
σ_вх := 0.99
# Коэффициент полноты горения:
η_г := 0.99
# Коэффициент полного давления в камере сгорания:
σ_г := 0.99
# КПД турбин по параметрам торможения:
η*_т1 := 0.90
# Механический КПД:
η_м := 0.99
# Коэффициент полного давления:
σ_вых := 0.99
# Низшая рабочая теплота сгорания топлива (Ставропольский природный газ):
Q_н := 48800*10^3
# Политропный КПД компрессора:
η*_к.п := 0.91
# Политроный КПД турбины:
η*_т.п := 0.9
# Лопаточный КПД турбины:
η_л := 0.9
# Параметры газа по тракту ГТУ:
# Параметры на входе в компрессор:
R_в := 287.4
k_в := 1.4
T*_в := T*_а = 288
p*_в := p*_а*σ_вх = 100287  # Па
# Давление за компрессором:
p*_к(π*_к) := p*_а*σ_вх*π*_к
# КПД компрессора через политропический КПД:
η*_к(π*_к) := (π*_к^((k_в - 1)/k_в) - 1)/(π*_к^((k_в - 1)/(k_в*η*_к.п)) - 1)
# Температура за компрессором:
C_pви(T) :=
    (0.2407 + 0.0193*(2.5*10^-3*T - 0.875) + 2.0*10^-3*(2.5*10^-5*T^2 - 0.0275*T + 6.5625))*4187 if T < 750
    (0.26 + 0.032*(1.176*10^-3*T - 0.88235) - 0.374*10^-2*(5.5556*10^-6*T^2 - 1.3056*10^-2*T + 6.67))*4187 if T ≥ 750
T*_к(π*_к) := T*_а*(1 + (π*_к^((k_в - 1)/k_в) - 1)/η*_к(π*_к))
# Значения истинной теплоёмкости по средней температуре:
C_pв(π*_к) := C_pви((T*_к(π*_к) + T*_а)/2)
k_в(π*_к) := C_pв(π*_к)/(C_pв(π*_к) - R_в)
# КПД компрессора через политропический КПД:
η*_к(π*_к) := (π*_к^((k_в(π*_к) - 1)/k_в(π*_к)) - 1)/(π*_к^((k_в(π*_к) - 1)/(k_в(π*_к)*η*_к.п)) - 1)
# Температура за компрессором:
T*_к(π*_к) := T*_а*(1 + (π*_к^((k_в(π*_к) - 1)/k_в(π*_к)) - 1)/η*_к(π*_к))
# Удельная работа компрессора:
L_к(π*_к) := R_в*k_в(π*_к)/(k_в(π*_к) - 1)*T*_а*(π*_к^((k_в(π*_к) - 1)/k_в(π*_к)) - 1)/η*_к(π*_к)
# Степень понижения давления турбин:
# Давление газа перед турбиной:
p*_г(π*_к) := p*_к(π*_к)*σ_г
# Статическое давление за силовой турбиной:
p_т := p_а/σ_вых = 102323
# Степень понижения давления обоих турбин:
C_pги(T, α) :=
    ((0.0174/α + 0.2407) + (0.0093/α + 0.0193)*(2.5*10^-3*T - 0.875) + (2.0*10^-3 - 1.056*10^-3/(α - 0.2))*(2.5*10^-5*T^2 - 0.0275*T + 6.5625))*4187 if T < 750
    ((0.0267/α + 0.26) + (0.0133/α + 0.032)*(1.176*10^-3*T - 0.88235) - (0.94*10^-2/(α^2 + 10) + 0.374*10^-2)*(5.5556*10^-6*T^2 - 1.3056*10^-2*T + 6.67))*4187 if T ≥ 750
π_т(π*_к) := p*_г(π*_к)/p_т
# Коэффициент избытка воздуха, параметры расхода, истинный показатель адиабаты:
C_pсчп(T) :=
    (3.45/10^5*(T - 70) + 0.236)*4187 if T < 700
    (3.45/10^5*(T + 450) + 0.218)*4187 if T ≥ 700
C_pсв(T) :=
    (1.2/10^5*(T - 70) + 0.236)*4187 if T < 700
    (2.2/10^5*(T + 450) + 0.218)*4187 if T ≥ 700
# В первом приближении примем | Теплоемкость, Дж/кг*К:
l_0 := 16.85
k_г := 1.33
R_г := 289.3  # Дж/(кг*К)
C_pг := k_г*R_г/(k_г - 1) = 1165.97
# Относительный расход топлива:
c_pgm(T, α) := C_pсв(T) + (1 + l_0)/(1 + α*l_0)*(C_pсчп(T) - C_pсв(T))
g_m(π*_к) := (C_pсв(T*_г)*T*_г - C_pсв(T*_к(π*_к))*T*_к(π*_к))/(Q_н*η_г - (1 + l_0)*(C_pсчп(T*_г)*T*_г - C_pсчп(288)*288) + l_0*(C_pсв(T*_г)*T*_г - C_pсв(288)*288))
# Коэффициент избытка воздуха:
α_Σ(π*_к) := 1/(g_m(π*_к)*l_0)
# Относительный расход газа:
# Утечки:
g_ут := 0.007
# Относительный расход воздуха на охлаждение:
g_охл := 0.05
g_т(π*_к) := (1 + g_m(π*_к))*(1 - g_ут - g_охл)
# Статическая температура за турбинами , К
T_т(π*_к) := T*_г*(1 - (1 - π_т(π*_к)^((1 - k_г)/k_г))*η_л)
# Истинный показатель адиабаты:
# Средняя температура процесса расширения:
T_ср(π*_к) := (T_т(π*_к) + T*_г)/2
C_pг(π*_к) := C_pги(T_ср(π*_к), α_Σ(π*_к))
k_г(π*_к) := C_pг(π*_к)/(C_pг(π*_к) - R_г)
# Параметры газа по тракту ГТУ для оптимальной степени повышения давления:
# Оптимальная степень повышения давления:
π*_к := 20
k_в1 := 1.386
# Параметры компрессора:
# Давление за компрессором:
p*_к := p*_а*σ_вх*π*_к = 2005740  # Па
# КПД компрессора через политропический КПД:
η*_к := (π*_к^((k_в1 - 1)/k_в1) - 1)/(π*_к^((k_в1 - 1)/(k_в1*η*_к.п)) - 1) explicit, ALL → (20^((1.386 - 1)/1.386) - 1)/(20^((1.386 - 1)/(1.386*0.91)) - 1) = 0.868044
# Температура за компрессором:
T*_к := T*_а*(1 + (π*_к^((k_в1 - 1)/k_в1) - 1)/η*_к) explicit, ALL → 288*(1 + (20^((1.386 - 1)/1.386) - 1)/0.868) = 720.384  # К
# Удельная работа компрессора:
L_к := R_в*k_в1/(k_в1 - 1)*T*_а*(π*_к^((k_в1 - 1)/k_в1) - 1)/η*_к explicit, ALL → 287.4*1.386/(1.386 - 1)*288*(20^((1.386 - 1)/1.386) - 1)/0.868 = 446202  # Дж/кг
# Степень понижения давления турбин:
# Давление газа перед турбиной:
p*_г := p*_к*σ_г = 1985683  # Па
# Статическое давление за силовой турбиной:
p_т := p_а/σ_вых = 102323  # Па
# Степень понижения давления обоих турбин:
π_т := p*_г/p_т = 19.406
# Коэффициент избытка воздуха:
α_г := 2.997
# Средняя удельная теплоемкость чистых продуктов сгорания керосина:
# При температуре за камерой сгорания
c_pгс1 := 1.191*10^3  # Дж/(кг*К)
# При температура калориметрирования
c_pгс2 := 1.02*10^3  # Дж/(кг*К)
# Средняя удельная теплоемкость воздуха:
# При температуре за камерой сгорания
c_pвс1 := 1.09*10^3  # Дж/(кг*К)
# При температуре за компрессором
c_pвс2 := 1.021*10^3  # Дж/(кг*К)
# При температура калориметрирования
c_pвс3 := 999.085  # Дж/(кг*К)
# Коэффициент удельного расхода топлива:
g_m := (c_pвс1*T*_г - c_pвс2*T*_к)/(Q_н*η_г - (1 + l_0)*(c_pгс1*T*_г - c_pгс2*288) + l_0*(c_pвс1*T*_г - c_pвс3*288)) = 0.0274692
# Относительный расход газа:
# Утечки:
g_ут := 0.007
# Относительный расход воздуха на охлаждение:
g_охл := 0.05
g_т := (1 + g_m)*(1 - g_ут - g_охл) = 0.968903
# Истинная удельная теплоёмкость продуктов сгорания:
C_pг := C_pг(20) = 1273.28  # Дж/(кг*К)
# Истинный показатель адиабаты:
k_г := k_г(20) = 1.29401
# Статическая температура за турбинами
T_т := T*_г*(1 - (1 - π_т^((1 - k_г)/k_г))*η_л) explicit, ALL → 1.773*10^3*(1 - (1 - 19.406^((1 - 1.294)/1.294))*0.9) = 990.732  # К
# Удельная работа турбин:
L_т := C_pг*T*_г*(1 - π_т^((1 - k_г)/k_г))*η_л explicit, ALL → 1.273*10^3*1.773*10^3*(1 - 19.406^((1 - 1.294)/1.294))*0.9 = 996046  # Дж/кг
# Удельная мощность установки:
g_воз := 0.04
N_е.уд := (L_т*((1 + g_m)*(1 - g_ут - g_охл) + g_воз)*η_м - L_к) = 548662  # Вт/кг
# Расход воздуха
G_в := N_e/N_е.уд explicit, ALL → 32*10^6/(5.487*10^5) = 58.3237  # кг/с
# Расход газа при входе в турбину
G_г := (1 + g_m)*(1 - g_ут - g_охл)*G_в explicit, ALL → (1 + 0.027)*(1 - 7*10^-3 - 0.05)*58.324 = 56.51  # кг/с
# Удельный расход топлива
C_e := g_m*(1 - g_ут - g_охл)*3600*1000/N_е.уд explicit, ALL → 0.027*(1 - 7*10^-3 - 0.05)*3.6*10^3*1*10^3/(5.487*10^5) = 0.169963  # кг/(кВт*ч)
# Давление торможения за турбиной привода компрессора:
p*_тк := p*_г*(1 - L_к/(C_pг*T*_г*η*_т1*η_м*g_т))^(k_г/(k_г - 1)) explicit, ALL → 1.986*10^6*(1 - 4.462*10^5/(1.273*10^3*1.773*10^3*0.9*0.99*0.969))^(1.294/(1.294 - 1)) = 632313
# Степень понижения давления турбины привода компрессора:
π*_тк := p*_г/p*_тк explicit, ALL → 1.986*10^6/(6.323*10^5) = 3.14035
# Температура за турбиной привода компрессора:
T*_тк := T*_г*(1 - (1 - π*_тк^((1 - k_г)/k_г))*η*_т1) explicit, ALL → 1.773*10^3*(1 - (1 - 3.14^((1 - 1.294)/1.294))*0.9) = 1407.66  # К
# Работа турбины привода компрессора:
L_тк := C_pг*T*_г*(1 - π*_тк^((1 - k_г)/k_г))*η*_т1 explicit, ALL → 1.273*10^3*1.773*10^3*(1 - 3.14^((1 - 1.294)/1.294))*0.9 = 465175  # Дж/кг
# Параметры силовой турбины:
# Степень понижения давления силовой турбины:
π_тс := p*_тк/p_т explicit, ALL → 6.323*10^5/(1.023*10^5) = 6.17956
# Работа силовой турбины:
L_тс := C_pг*T*_тк*(1 - π_тс^((1 - k_г)/k_г))*η*_т1 explicit, ALL → 1.273*10^3*1.408*10^3*(1 - 6.18^((1 - 1.294)/1.294))*0.9 = 546634
с_т.а := 180
# Располагаемый теплоперепад:
Н_т := (L_тк + с_т.а^2/2)/η_л explicit, ALL → (4.652*10^5 + 180^2/2)/0.9 = 534861
# Температура за турбиной:
Т_т := T*_г - Н_т*η_л/C_pг = 1394.94  # К
# Статическое давление за турбиной:
p_т := p*_г*(1 - Н_т/(C_pг*T*_г))^(k_г/(k_г - 1)) = 604036  # Па
# Степень понижения давления:
π_т := p*_г/p_т = 3.28736
# Удельный обьем:
v_t := R_г*Т_т/p_т = 0.668099
# Площадь кольцевого сечения:
А_т := G_г*v_t/с_т.а = 0.209746
# Допустимые напряжения растяжения в рабочих лопатках:
σ_л := 250  # МПа
к_з := 1.3
# Коэффициент пропорциональности k_n :
k_n := 6.8*10^-6
# Максимальная частота вращения:
# Частота вращения
n_т.max := sqrt(σ_л/(к_з*k_n*А_т)) = 11611.7  # об/мин
n_т := 0.95*n_т.max
# Основные размеры многоступенчатой турбины
l_отн := 1/11
# Средний диаметр последней ступени
D_т := sqrt(А_т/(π*l_отн)) = 0.856975  # м
# Длина лопатки на диаметре
l_л := А_т/(π*D_т) = 0.0779069  # м
# Окружная скорость на диаметре D_т
U_т := π*D_т*n_т/60 = 494.98  # м/c^2
# Средний диаметр при выходе из СА первой ступени:
n_тк := n_т/60
D_1 := D_т = 0.856975  # м
# Окружная скорость на диаметре D_1:
U_1 := π*D_1*n_тк explicit, ALL → π*0.857*0.95*1.161*10^4/60 = 494.98  # м/c^2
# Средняя окружная скорость по турбине:
U_ср := U_т = 494.98  # м/c^2
# Оптимальное отношения для выбранной степени реактивности:
y_0 := 0.55
# Условная адиабатная скорость:
С_0 := sqrt(2*Н_т) = 1034.27
# Средняя скорость за ступенями:
C_2ср := 250
# Коэффициент использования скорости:
μ := 1
# Число ступеней:
z := 1
# Коэффициент возврата теплоты;
C_21 := 175
α := (z - 1)/(2*z)*(π_т^((k_г - 1)/k_г) - 1)*(1 - η_л) = 0
# Теплоперепад на первой  ступени:
H_01 := Н_т*(1 + α)*2*0.5/2 + ((μ*C_21)^2)/2 explicit, ALL → 5.349*10^5*(1 + 0)*2*0.5/2 + 175^2/2 = 282743
# Распределение степеней пеактивности по ступеням:
ρ_1 := 0.35
# Располагаемый теплоперепад в СА первой ступени
H_с1 := H_01*(1 - ρ_1) explicit, ALL → 2.827*10^5*(1 - 0.35) = 183783
# Угол потока за СА 1-й ступени:
α_11 := 14.43 deg
# Скорость за СА 1-ой ступени:
φ_1 := 0.967
c_11 := φ_1*sqrt(2*H_с1) explicit, ALL → 0.967*sqrt(2*1.838*10^5) = 586.265  # м/с
c_1а := c_11*sin(α_11) explicit, ALL → 586.265*sin(14.43*deg) = 146.096  # м/с
# Температура за CA 1-ой ступени:
T_c1 := T*_г - H_с1*φ_1^2/C_pг explicit, ALL → 1.773*10^3 - 1.838*10^5*0.967^2/(1.273*10^3) = 1638.03  # К
# Давление за СА 1-ой ступенью:
p_c1 := p*_г*(1 - H_с1/(C_pг*T*_г))^(k_г/(k_г - 1)) explicit, ALL → 1.986*10^6*(1 - 1.838*10^5/(1.273*10^3*1.773*10^3))^(1.294/(1.294 - 1)) = 1366474  # Па
# Удельный объём газа за турбиной:
ν_c1 := R_г*T_c1/p_c1 explicit, ALL → 289.3*1.638*10^3/(1.366*10^6) = 0.346792  # м^3/кг
# Длина на выходе сопловой лопатки 1-ой ступени:
l_c1 := G_г*ν_c1/(sin(α_11)*D_т*π*c_11) explicit, ALL → 56.51*0.347/(sin(14.43*deg)*0.857*π*586.265) = 0.0498241  # м
# Длины рабочих и сопловых лопаток по ступеням:
l_л1 := 0.065  # м
l_c1 = 0.0498241  # м
l_л2 := l_л = 0.0779069  # м
l_c2 := 0.08  # м
# Ширина рабочей лопатки по ступеням:
b_л1 := l_л1/1.8 explicit, ALL → 0.065/1.8 = 0.0361111  # м
b_л2 := l_л2/2 explicit, ALL → 0.078/2 = 0.0389534  # м
# Ширина сопловой лопатки:
b_с1 := 1.2*b_л1 = 0.0433333  # м
b_с2 := 1.2*b_л2 = 0.0467441  # м
# Осевой зазор за сопловыми  лопатками по ступеням:
δ_ас1 := 0.25*b_с1 = 0.0108333  # м
δ_ас2 := 0.2*b_с2 = 0.00934882  # м
# Осевой зазор за рабочими  лопатками по ступеням:
δ_ал1 := 0.25*b_л1 = 0.00902778  # м
δ_ал2 := 0.2*b_л2 = 0.00779069  # м
# Поступенчатый расчет турбины
# Располагаемый теплоперепад в СА:
H_11 := H_01*(1 - ρ_1) explicit, ALL → 2.827*10^5*(1 - 0.35) = 183783
# Приведённая скорость:
λ_СА1 := c_11/sqrt(2*k_г/(k_г + 1)*R_г*T*_г) explicit, ALL → 586.265/sqrt(2*1.294/(1.294 + 1)*289.3*1.773*10^3) = 0.770689
# Окружная составляющая скорости за СА первой ступени:
c_11u := c_11*cos(α_11) explicit, ALL → 586.265*cos(14.43*deg) = 567.77
# Температура за СА:
T_11 := T*_г - H_11*φ_1^2/C_pг explicit, ALL → 1.773*10^3 - 1.838*10^5*0.967^2/(1.273*10^3) = 1638.03  # К
# Температура в конце адиабатного расширения в СА:
T'_11 := T*_г - H_11/C_pг explicit, ALL → 1.773*10^3 - 1.838*10^5/(1.273*10^3) = 1628.66
# Давление перед рабочими лопатками:
p_11 := p*_г*(T'_11/T*_г)^(k_г/(k_г - 1)) explicit, ALL → 1.986*10^6*(1.629*10^3/(1.773*10^3))^(1.294/(1.294 - 1)) = 1366474
# Кольцевая площадь сечения перед рабочими лопатками:
А_11 := π*D_1*l_c1 explicit, ALL → π*0.857*0.05 = 0.13414
# Удельный объем перед рабочими лопатками:
ν_11 := R_г*T_11/p_11 explicit, ALL → 289.3*1.638*10^3/(1.366*10^6) = 0.346792
# Осевая скорость перед рабочими лопатками:
с_11а := c_1а = 146.096
# Относительная скорость при входе в рабочие лопатки:
w_11 := sqrt(c_11^2 + U_т^2 - 2*c_11*U_т*cos(α_11)) explicit, ALL → sqrt(586.265^2 + 494.98^2 - 2*586.265*494.98*cos(14.43*deg)) = 163.225  # м/с
# Угол входа потока на рабочие лопатки:
β_11 := atan(с_11а/(c_11*cos(α_11) - U_т))/deg explicit, ALL → atan(146.096/(586.265*cos(14.43*deg) - 494.98))/deg = 63.5158
# Располагаемый теплоперепад в РК:
Н_12 := ρ_1*H_01*T_11/T'_11 explicit, ALL → 0.35*2.827*10^5*1.638*10^3/(1.629*10^3) = 99529.3
# Окружная скорость при входе на рабочие лопатки:
u_1 := U_т = 494.98  # м/с
# Диаметр на входе из рабочих лопаток
D_2 := D_1 - 0 = 0.856975  # м
# Окружная скорость на выходе из рабочих лопаток:
u_2 := π*D_2*n_т/60 explicit, ALL → π*0.857*0.95*1.161*10^4/60 = 494.98
# Коэффициент скорости в рабочих лопатках:
ψ_1 := 0.955
# Относиельная скорость за рабочими лопатками:
w_12 := ψ_1*sqrt(w_11^2 + 2*Н_12 + u_2^2 - u_1^2) explicit, ALL → 0.955*sqrt(163.225^2 + 2*9.953*10^4 + 494.98^2 - 494.98^2) = 453.701
# Температура за рабочими лопатками:
T_12 := T_11 - (w_12^2 - w_11^2 - u_2^2 + u_1^2)/(2*C_pг) explicit, ALL → 1.638*10^3 - (453.701^2 - 163.225^2 - 494.98^2 + 494.98^2)/(2*1.273*10^3) = 1567.66
# Температура к конце адиабатного расширения в рабочих лопатках:
T'_12 := T_11 - Н_12/C_pг explicit, ALL → 1.638*10^3 - 9.953*10^4/(1.273*10^3) = 1559.86  # К
# Давление за рабочими лопатками:
p_12 := p_11*(T'_12/T_11)^(k_г/(k_г - 1)) explicit, ALL → 1.366*10^6*(1.56*10^3/(1.638*10^3))^(1.294/(1.294 - 1)) = 1101891
# Удельный объем за рабочими лопатками:
ν_12 := R_г*T_12/p_12 explicit, ALL → 289.3*1.568*10^3/(1.102*10^6) = 0.411587
# Площадь кольцевого сечения за рабочими лопатками:
А_12 := π*D_2*l_л1 explicit, ALL → π*0.857*0.065 = 0.174997
# Осевая скорость за рабочими лопатками:
с_12а := G_г*ν_12/А_12 explicit, ALL → 56.51*0.412/0.175 = 132.909
# Угол выхода потока из рабочих лопаток:
β_12 := asin(с_12а/w_12)/deg explicit, ALL → asin(132.909/453.701)/deg = 17.0343
# Скорость закрутки потока за рабочими лопатками:
с_12u := w_12*cos(β_12*deg) - u_2 explicit, ALL → 453.701*cos(17.034*deg) - 494.98 = -61.1826
# Угол выхода потока из рабочих лопаток:
α_12 := atan(с_12а/с_12u)/deg explicit, ALL → atan(132.909/(-61.183))/deg = -65.2818
# Скорость газа за рабочими лопатками:
с_12 := sqrt(с_12а^2 + с_12u^2) explicit, ALL → sqrt(132.909^2 + (-61.183)^2) = 146.315
# Работа на окружности РК:
L_1u := u_1*с_12u + c_11u*u_2 explicit, ALL → 494.98*(-61.183) + 567.77*494.98 = 250751
# Параметры треугольника скоростей первой ступени
с_11а = 146.096
с_12а = 132.909
c_11u = 567.77
с_12u = -61.1826
c_11 = 586.265
с_12 = 146.315
α_11 = 14.43 deg
α_12 = -65.2818
β_11 = 63.5158
β_12 = 17.0343
# КПД на окружности РК:
η_1u := L_1u/H_01 explicit, ALL → 2.508*10^5/(2.827*10^5) = 0.88685
# Удельные параметры за СА:
h_1c := (φ_1^-2 - 1)*c_11^2/2 explicit, ALL → (0.967^-2 - 1)*586.265^2/2 = 11929.5
# То же, с учетом их использования в РК:
h'_1c := h_1c*T'_12/T_11 explicit, ALL → 1.193*10^4*1.56*10^3/(1.638*10^3) = 11360.2
# Относительные потери в СА:
ξ_1с := h_1c/H_01 explicit, ALL → 1.193*10^4/(2.827*10^5) = 0.0421922
# То же, с учетом их использования в рабочих лопатках:
ξ'_1c := ξ_1с*T'_12/T_11 explicit, ALL → 0.042*1.56*10^3/(1.638*10^3) = 0.0401787
# Удельные потери в рабочих лопатках:
h_1л := (ψ_1^-2 - 1)*w_12^2/2 explicit, ALL → (0.955^-2 - 1)*453.701^2/2 = 9928.02  # Дж/кг
# Относительные потери в рабочих лопатках:
ξ_1л := h_1л/H_01 explicit, ALL → 9.928*10^3/(2.827*10^5) = 0.0351132
# Удельные потери с выходной скоростью:
h_1в := с_12^2/2 explicit, ALL → 146.315^2/2 = 10704.1  # Дж/кг
# Относительные потери с выходной скоростью:
ξ_1в := h_1в/H_01 explicit, ALL → 1.07*10^4/(2.827*10^5) = 0.0378581
# КПД на окружности РК:
η_1u := 1 - ξ'_1c - ξ_1л - ξ_1в explicit, ALL → 1 - 0.04 - 0.035 - 0.038 = 0.88685
# Радиальный зазор между корпусом и сопловыми лопатками:
δ_1с := 0.8*10^-3 = 0.0008  # м
# Радиальный зазор между корпусом и рабочими лопатками:
δ_1л := 0.8*10^-3 = 0.0008  # м
# Удельные потери в радиальном зазоре:
h_1з := 1.37*(1 + 1.6*ρ_1)*(1 + l_л1/D_т)*δ_1л/l_л1*L_1u = 7096.02  # Дж/кг
# Относительные потери в радиальном зазоре:
ξ_1з := h_1з/H_01 explicit, ALL → 7.096*10^3/(2.827*10^5) = 0.0250971
# Удельная работа ступени с учетом потери в радиальном зазоре:
L_uз := L_1u - h_1з explicit, ALL → 2.508*10^5 - 7.096*10^3 = 243655  # Дж/кг
# Мощностной КПД ступени:
η'_1т := η_1u - ξ_1з explicit, ALL → 0.887 - 0.025 = 0.861753
# Лопаточный КПД ступени:
η'_1л := η'_1т + ξ_1в explicit, ALL → 0.862 + 0.038 = 0.899611
# Площадь открытой части соплового аппарата
ε := 1
# Средняя плотность газа  с обеих сторон диска
ρ_1cp := (ν_11^-1 + ν_12^-1)/2 explicit, ALL → (0.347^-1 + 0.412^-1)/2 = 2.6566  # кг/м^3
# Затраты мощности на трение и вентиляцию:
N_1т.в := (1.07*D_т^2 + 61*(1 - ε)*D_т*l_л1)*(u_1/100)^3*ρ_1cp = 253.168
# Удельные потери на трение и вентиляцию:
h_1т.в := N_1т.в*1000/G_г explicit, ALL → 253.168*1*10^3/56.51 = 4480.05  # Дж/кг
# Относительные потери на трение и вентиляцию:
ξ_1т.в := h_1т.в/H_01 explicit, ALL → 4.48*10^3/(2.827*10^5) = 0.015845
# Мощностной КПД ступени с учетом потери на трение и вентиляцию:
η_1т := η'_1т - ξ_1т.в explicit, ALL → 0.862 - 0.016 = 0.845908
# Лопаточный КПД ступени с учетом потери на трение и вентиляцию:
η_1л := η'_1л - ξ_1т.в explicit, ALL → 0.9 - 0.016 = 0.883766
# Удельная работа ступени:
L_1т := H_01*η_1т explicit, ALL → 2.827*10^5*0.846 = 239175  # Дж/кг
# Температура за первой ступенью:
T'_ст1 := T_12 + h_1з/C_pг + h_1т.в/C_pг explicit, ALL → 1.568*10^3 + 7.096*10^3/(1.273*10^3) + 4.48*10^3/(1.273*10^3) = 1576.75  # К
# Температура торможения за первой ступенью:
T*_ст1 := T'_ст1 + h_1в/C_pг explicit, ALL → 1.577*10^3 + 1.07*10^4/(1.273*10^3) = 1585.16  # К
# Давление торможения за первой ступенью:
p*_ст1 := p_12*(T*_ст1/T'_ст1)^(k_г/(k_г - 1)) explicit, ALL → 1.102*10^6*(1.585*10^3/(1.577*10^3))^(1.294/(1.294 - 1)) = 1127983  # Па
# Располагаемый теплоперепад по параметрам торможения:
H*_01 := C_pг*T*_г*(1 - (p*_ст1/p*_г)^((k_г - 1)/k_г)) explicit, ALL → 1.273*10^3*1.773*10^3*(1 - (1.128*10^6/(1.986*10^6))^((1.294 - 1)/1.294)) = 272214  # Дж/кг
# КПД ступени по параметрам торможения:
η*_1т := L_1т/H*_01 explicit, ALL → 2.392*10^5/(2.722*10^5) = 0.878627
# Уточнение коэффициентов скорости φ и ψ.
# Коэффициент скорости в сопловом аппарате первой ступени:
# Потери на трения
# Вход в турбину - осевой
α_0 := 90*deg
x := (α_11 + α_0)/deg explicit, ALL → (14.43*deg + 90*deg)/deg = 104.43
x_с :=
    x
    110 if x > 110
    = 104.43
y := sin(α_0)/sin(α_11) = 4.01289
y_с :=
    y
    1.7 if y > 1.7
    = 1.7
ζ_с.тр.1 := 0.02185*(0.01065*x_с^2 - 2.295*x_с + 160.5)*(0.1055*y_с^2 - 0.3427*y_с + 0.295) = 0.0139819
# Кромочные потери
# Угол установки профиля в СА
γ_11 := (70 - 0.127*(α_0 - α_11)/deg - 0.0041*((α_0 - α_11)/deg)^2) = 36.9882
# Хорда лопатки:
b_с11 := b_с1/sin(γ_11*deg) explicit, ALL → 0.043/sin(36.988*deg) = 0.072024  # м
# Оптимальный относительный шаг
K := 0.45
c'_max1 := 0.179
C_maxc1 := c'_max1*b_с11 = 0.0128923
t/b_2.опт := K*(180/(180 - (α_0 + α_11)/deg)*sin(α_0)/sin(α_11))^(1/3)*(1 - c'_max1) = 0.78406
(t/b)_с.опт1 := 0.783
# Найдем шаг решетки
t_c1 := (t/b)_с.опт1*b_с11 explicit, ALL → 0.783*0.072 = 0.0563948  # м
# Диаметр кромки соплового аппарата
s_с1 := 2*10^-3  # м
# Относительные кромочные потери в сопловом аппарате
ζ_с.кр1 := 0.2*s_с1/(t_c1*sin(α_11)) explicit, ALL → 0.2*2*10^-3/(0.056*sin(14.43*deg)) = 0.0284628
# Профильные потери в сопловом аппарате
ζ_с.пр1 := ζ_с.тр.1 + ζ_с.кр1 explicit, ALL → 0.014 + 0.028 = 0.0424447
# Концевые потери
ζ_с.к1 := 2*ζ_с.тр.1*t_c1*sin(α_11)/l_c1 explicit, ALL → 2*0.014*0.056*sin(14.43*deg)/0.05 = 0.00788751
# Суммарные потери в сопловом аппарате первой ступени
ζ_с1 := ζ_с.пр1 + ζ_с.к1 explicit, ALL → 0.042 + 7.888*10^-3 = 0.0503323
# Коэффициент скорости
φ_1У := sqrt(1 - ζ_с1) explicit, ALL → sqrt(1 - 0.05) = 0.974509
# Коэффициент скорости в рабочем колесе первой ступени
# Потери на трение
x := β_12 + β_11 = 80.5501
x :=
    x
    110 if x > 110
    = 80.5501
y := sin(β_11*deg)/sin(β_12*deg) = 3.05538
y :=
    y
    1.7 if y > 1.7
    = 1.7
ζ_тр.1 := 0.02185*(0.01065*x^2 - 2.295*x + 160.5)*(0.1055*y^2 - 0.3427*y + 0.295) = 0.0169161
# Угол установки профиля в РК:
γ_1рк := (70 - 0.127*(β_11 - β_12) - 0.0041*(β_11 - β_12)^2) = 55.2387
# Хорда лопатки:
b_л11 := b_л1/sin(γ_1рк*deg) explicit, ALL → 0.0361/sin(55.2387*deg) = 0.0439557  # м
# Оптимальный относительный шаг
K := 0.6
c'_max2 := 0.3 = 0.3
t/b_1.опт := K*(180/(180 - (β_11 + β_12))*sin(β_11*deg)/sin(β_12*deg))^(1/3)*(1 - c'_max2) = 0.742723
(t/b)_опт1 := 0.7
# Найдем шаг решетки
t_1 := (t/b)_опт1*b_л11 explicit, ALL → 0.7*0.044 = 0.030769  # м
# Диаметр кромки рабочего колеса
s_1 := 2*10^-3  # м
# Относительные кромочные потери в рабочем колесе
ζ_кр1 := 0.2*s_1/(t_1*sin(β_12*deg)) explicit, ALL → 0.2*2*10^-3/(0.031*sin(17.034*deg)) = 0.0443774
# Профильные потери в рабочем колесе
ζ_пр1 := ζ_тр.1 + ζ_кр1 explicit, ALL → 0.017 + 0.044 = 0.0612935
# Концевые потери
ζ_к1 := 2*ζ_тр.1*t_1*sin(β_12*deg)/l_л1 explicit, ALL → 2*0.017*0.031*sin(17.034*deg)/0.065 = 0.00469154
# Суммарные потери в рабочем колесе первой ступени
ζ_1 := ζ_пр1 + ζ_к1 explicit, ALL → 0.061 + 4.692*10^-3 = 0.065985
# Коэффициент скорости
ψ_1У := sqrt(1 - ζ_1) explicit, ALL → sqrt(1 - 0.066) = 0.966445
# Температура за первой ступенью с учётом охлаждения в первом приближении:
T*_ст1 := (c_pgm(T*_ст1, α_г)*T*_ст1*g_т + C_pсв(T*_к + 200)*(T*_к + 200)*(g_охл - 0.02)*0.6)/(c_pgm(T*_ст1, α_г)*g_т + C_pсв(T*_к + 200)*(g_охл - 0.02)*0.6) = 1574.06
К
# Расход за первой ступенью:
G_г.вд2 := G_в*(1 + g_m)*(1 - g_ут - 0.4*(g_охл - 0.02) - 0.02) = 57.5887  # кг/с
# Расчет параметров турбины:
# Суммарная работа турбины
L_тΣ := L_1т explicit, ALL → 2.392*10^5 = 239175
# Располагаемый теплоперепад по параметрам торможения:
H*_т := C_pг*T*_г*(1 - (p*_ст1/p*_г)^((k_г - 1)/k_г)) explicit, ALL → 1.273*10^3*1.773*10^3*(1 - (1.128*10^6/(1.986*10^6))^((1.294 - 1)/1.294)) = 272214  # Дж/кг
# Мощностной КПД турбины
η_т := L_тΣ/Н_т explicit, ALL → 2.39*10^5/(5.35*10^5) = 0.447171
# Лопаточный КПД турбины
η_л := (L_тΣ + h_1в)/Н_т explicit, ALL → (2.392*10^5 + 1.07*10^4)/(5.349*10^5) = 0.467184
# КПД турбины по параметрам торможения:
η*_т := L_тΣ/H*_т explicit, ALL → 2.39*10^5/(2.72*10^5) = 0.878627
# Профилирование лопаток по радиусу
# Закон профилирования:
α_1 == const
# Угол выхода из СА 1 ступени:
α_11 = 14.43 deg
# Средний радиус СА и РК:
r_ср := D_т/2 explicit, ALL → 0.857/2 = 0.428488  # м
D_т = 0.856975  # м
# Корневой радиус | Периферийный радиус СА:
r_к := D_т/2 - l_c1/2 explicit, ALL → 0.857/2 - 0.05/2 = 0.403576  # м
r_п := D_т/2 + l_c1/2 explicit, ALL → 0.857/2 + 0.05/2 = 0.4534  # м
r_п := D_т/2 + (l_c1 - 0.002)/2 = 0.4524  # м
# Окружная скорость на выходе из СА на среднем радиусе:
c_11u = 567.77  # м/c
# Абсолютная скорость на выходе из СА на среднем радиусе:
c_11 = 586.265  # м/c
# Распределение давления по радиусу
P_ст(r) := p_11*(1 + (k_г - 1)*c_11^2/(2*(k_г*R_г*T'_11))*(1 - (r_ср/r)^(2*cos(α_11)^2)))^(k_г/(k_г - 1))
P_ст(r_ср) = 1366474  # Па
# Степень понижения давления в РК
π_рк(r) := P_ст(r)/p_11
# Осевая скорость за СА: | Окружная скорость за СА: | Полная скорость за СА:
c_1a(r) := с_11а*(r_ср/r)^(cos(α_11)^2)
c_1u(r) := c_11u*(r_ср/r)^(cos(α_11)^2)
c_1(r) := c_11*(r_ср/r)^(cos(α_11)^2)
c_1a(r_к) = 154.538  # м/c
c_1u(r_к) = 600.579  # м/c
c_1(r_к) = 620.143  # м/c
c_1a(r_ср) = 146.096  # м/c
c_1u(r_ср) = 567.77
c_1(r_ср) = 586.265  # м/c
c_1a(r_п) = 138.841  # м/c
c_1u(r_п) = 539.577  # м/c
c_1(r_п) = 557.153  # м/c
# Адиабатическая скорость за СА:
c_1ад(r) := c_1(r)/φ_1
c_1ад(r_к) = 641.306  # м/c
c_1ад(r_ср) = 606.272  # м/c
c_1ад(r_п) = 576.167  # м/c
# Перепад на СА:
H_с11(r) := c_1ад(r)^2/2
H_с11(r_к) = 205637  # Дж/кг
H_с11(r_ср) = 183783  # Дж/кг
H_с11(r_п) = 165984  # Дж/кг
# Перепад на РК:
H_рк(r) := (H_01 - H_с11(r))*T_11/T'_11
H_рк(r_к) = 77549.6  # Дж/кг
H_рк(r_ср) = 99529.3  # Дж/кг
H_рк(r_п) = 117431  # Дж/кг
# Степень реактивности
ρ_r(r) := 1 - (1 - ρ_1)*(r_ср/r)^(2*cos(α_11)^2)
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ρ_r(r_к) = 0.272707
ρ_r(r_ср) = 0.35
ρ_r(r_п) = 0.412951
# Окружная скорость:
u(r) := U_т*r/r_ср
u(r_к) = 466.202  # м/c
u(r_ср) = 494.98  # м/c
u(r_п) = 522.603  # м/c
# Угол выхода потока из СА в относительном движении
β_1(r) := atan(c_1a(r)/(c_1(r)*cos(α_11) - u(r)))
β_1(r_к) = 48.9916 deg
β_1(r_ср) = 63.5158 deg
β_1(r_п) = 83.0299 deg
# Окружная скорость на выходе из РК
c_2u(r) := L_1u/u(r) - c_1u(r)
c_2u(r_к) = -62.7212  # м/c
c_2u(r_ср) = -61.1826  # м/c
c_2u(r_п) = -59.7653  # м/c
# Относительная скорость за СА:
w_1(r) := sqrt(c_1(r)^2 + u(r)^2 - 2*c_1(r)*u(r)*cos(α_11))
w_1(r_к) = 204.791  # м/с
w_1(r_ср) = 163.225  # м/с
w_1(r_п) = 139.875  # м/с
# Относительная скорость за РК:
w_2(r) := ψ_1*sqrt(w_1(r)^2 + 2*H_рк(r))
w_2(r_к) = 423.915  # м/с
w_2(r_ср) = 453.701  # м/с
w_2(r_п) = 481.708  # м/с
# Окружная составляющая относительной скорости за РК:
w_2u(r) := c_2u(r) + u(r)
w_2u(r_к) = 403.481  # м/с
w_2u(r_ср) = 433.797  # м/с
w_2u(r_п) = 462.837  # м/с
# Осевая составляющая относительной скорости за РК:
w_2a(r) := sqrt(w_2(r)^2 - w_2u(r)^2)
w_2a(r_к) = 130.028  # м/с
w_2a(r_ср) = 132.909  # м/с
w_2a(r_п) = 133.509  # м/с
# Осевая составляющая абсолютной скорости за РК:
c_2a(r) := w_2a(r)
# Полная абсолютная скорость за РК:
c_2(r) := sqrt(c_2a(r)^2 + c_2u(r)^2)
c_2(r_к) = 144.365  # м/с
c_2(r_ср) = 146.315  # м/с
c_2(r_п) = 146.276  # м/с
# Угол выхода потока из РК в относительном движении:
β_2(r) := atan(w_2a(r)/w_2u(r))
β_2(r_к) = 17.8623 deg
β_2(r_ср) = 17.0343 deg
β_2(r_п) = 16.0906 deg
# Угол выхода потока из РК в абсолютном движении:
α_2(r) := atan(c_2a(r)/c_2u(r))
α_2(r_к) = -64.2489 deg
α_2(r_ср) = -65.2818 deg
α_2(r_п) = -65.8844 deg
# Число лопаток в СА:
z_с := π*D_т/t_c1 = 47.7396
z_с := 46
# Число лопаток в РК:
z_рк := π*D_т/t_1 = 87.4994
z_рк := 89
# Пересчитаю шаг решетки СА и РК:
t_ск := π*2*r_к/z_с = 0.0551248  # м
t_с := π*2*r_ср/z_с = 0.0585276  # м
t_сп := π*2*r_п/z_с = 0.0617937  # м
t_ркк := π*2*r_к/z_рк = 0.0284915  # м
t_рк := π*2*r_ср/z_рк = 0.0302502  # м
t_ркп := π*2*r_п/z_рк = 0.0319383  # м
# Средний диаметр
# Ширина лопаток:, м: | Горло
b_с1 = 0.0433333
a_рк.ср := t_рк*sin(β_2(r_ср)) = 0.00886163
b_л1 = 0.0361111
# Хорда, м:
a_c.ср := t_с*sin(α_11) = 0.0145849
b_с11 = 0.072024  # CA
b_л11 = 0.0439557
r_1CA := 0.0355*b_с1 = 0.00153833
# Газовые углы:
d_1CA := 2*r_1CA = 0.00307667
α_0 := 90 deg
RK
α_11 = 0.251851
r_1RK := 0.03*b_л1 = 0.00108333
β_1(r_ср) = 63.5158 deg
d_1CA := 2*r_1RK = 0.00216667
β_2(r_ср) = 17.0343 deg
# Шаг, м:
C_maxc1 := c'_max1*46.9 = 8.3951
# Втулочный диаметр.
# Газовые углы: | CA
r_1CA := 0.045*b_с1 = 0.00195
α_0к := 90 deg
α_1к := α_11 = 0.251851
d_1CA := 2*r_1CA = 0.0039
β_1(r_к) = 48.9916 deg
RK
β_2(r_к) = 17.8623 deg
# Ширина лопаток, м:
r_1RK := 0.06*b_л1 = 0.00216667
b_a.с.к := b_с1 = 0.0433333
d_1CA := 2*r_1RK = 0.00433333
# Шаг профилей, м:
t_с.к := π*r_к*2/z_с = 0.0551248  # Горло
t_рк.к := π*r_к*2/z_рк = 0.0284915
a_рк.к := t_рк.к*sin(β_2(r_к)) = 0.00873922
a_c.к := t_с.к*sin(α_11) = 0.0137369
# Периферийный диаметр.
# Газовые углы: | Шаг профилей, м:
α_0п := 90 deg
t_с.п := π*r_п*2/z_с = 0.0617937
α_1п := α_11 = 0.251851
β_1(r_п) = 83.0299 deg
t_рк.п := π*r_п*2/z_рк = 0.0319383
β_2(r_п) = 16.0906 deg
# Горло
a_рк.п := t_рк.п*sin(β_2(r_п)) = 0.00885195
a_c.п := t_с.п*sin(α_11) = 0.0153988
# Толщина профиля:
C_maxc1 := c'_max1*49.5 = 8.8605
c_1(r_к) = 620.143  # м/c
c_1a(r_к) = 154.538  # м/c
c_1u(r_к) = 600.579  # м/c
c_1(r_ср) = 586.265  # м/c
c_1a(r_ср) = 146.096  # м/c
c_1u(r_ср) = 567.77
c_1(r_п) = 557.153  # м/c
c_1a(r_п) = 138.841  # м/c
c_1u(r_п) = 539.577  # м/c
c_2u(r_к) = -62.7212  # м/c
c_2(r_к) = 144.365  # м/с
w_2a(r_к) = 130.028  # м/с
c_2u(r_ср) = -61.1826  # м/c
c_2(r_ср) = 146.315  # м/с
w_2a(r_ср) = 132.909  # м/с
c_2u(r_п) = -59.7653  # м/c
c_2(r_п) = 146.276  # м/с
w_2a(r_п) = 133.509  # м/с
u(r_к) = 466.202  # м/с
β_1(r_к) = 48.9916 deg  # м/с
w_1(r_к) = 204.791
β_1(r_ср) = 63.5158 deg
w_1(r_ср) = 163.225  # м/с
u(r_ср) = 494.98  # м/с
α_11 = 14.43 deg
β_1(r_п) = 83.0299 deg
w_1(r_п) = 139.875
м/с
u(r_п) = 522.603  # м/с
β_2(r_к) = 17.8623 deg
α_2(r_к) = -64.2489 deg
w_2u(r_к) = 403.481  # м/с
β_2(r_ср) = 17.0343 deg
α_2(r_ср) = -65.2818 deg
w_2u(r_ср) = 433.797  # м/с
β_2(r_п) = 16.0906 deg
α_2(r_п) = -65.8844 deg
w_2u(r_п) = 462.837  # м/с
w_2(r_к) = 423.915  # м/с
w_2(r_ср) = 453.701  # м/с
w_2(r_п) = 481.708  # м/с
# Изгибающие моменты от аэродинамических сил:
# Давление перед рабочим колесом:
P_1(r) := P_ст(r)
# Давление за рабочим колесом:
P_2 := p_11 = 1366474  # Па
# Температура перед РК:
T_1 := T_11 = 1638.03  # К
# Температура за РК:
T_2 := T'_ст1 = 1576.75  # К
# Плотность газа перед рабочей лопаткой
ρ_1(r) := P_1(r)/(R_г*T_1)  # кг/м^3
# Плотность газа за рабочей лопаткой:
ρ_2 := P_2/(R_г*T_2) = 2.99564  # кг/м^3
# Оценка нагрузки на подшипник по окружной скорости на среднем диаметре:
# Подшипник радиально упорный
D_ср := 0.068  # м
# Окружная скорость:
u := π*D_ср*n_т/60 explicit, ALL → π*0.068*0.95*1.161*10^4/60 = 39.2761  # м/с
# Подшипник радиальный опоры твд
D_ср := 0.085  # м
# Окружная скорость:
u := π*D_ср*n_т/60 explicit, ALL → π*0.085*0.95*1.161*10^4/60 = 49.0951  # м/с
# Оценка расхода масла через один подшипник
# Теплоёмкость масла
С_м := 2200  # Дж/(кг*К)
# Плотность масла
ρ_м := 900  # кг/м^3
# Доля потерь в подшипниках
η_п := 0.0005
# Суммарный подвод масла
G_м := N_e*η_м*η_п*60*1000/(С_м*100*ρ_м) explicit, ALL → 32*10^6*0.99*5*10^-4*60*1*10^3/(2.2*10^3*100*900) = 4.8  # л/мин
