# Определение частоты вращения турбины на привод компрессора
# 1. Зададим лопаточный КПД.
η_л := 0.902
# 2. Выбираем осевую скорость:
c_та := 160*m/s
# 3. Располагаемый теплоперепад:
L_тк := 4.724*10^5*m^2/s^2  # работа турбины на привод компрессора из расчета цикла
H_тк := (L_тк + c_та^2/2)/η_л = 537916 m^2/s^2
# 4. Показатель адиабаты:
k_г := 1.315
# 5. Средняя удельная теплоемкость:
R_г := 290*J/(kg*K)
c_рг := R_г*k_г/(k_г - 1) = 1210.63 m^2/(K*s^2)
# 6. Температура за турбиной:
T*_г := 1573*K
T_тк := T*_г - H_тк*η_л/c_рг = 1172.22 K
# 7. Давление за турбиной:
P*_г := 1.906*10^6*Pa
P_тк := P*_г*(1 - H_тк/(c_рг*T*_г))^(k_г/(k_г - 1)) = 476774 kg/(m*s^2)
# 8. Степень понижения давления:
π_тк := P*_г/P_тк = 3.9977
# 9. Удельный объем:
υ_т := R_г*T_тк/P_тк = 0.713008 m^3/kg
# 10. Площадь кольцевого сечения:
g_т := 0.966
G := 119.351*g_т*kg/s = 115.293 kg/s
A_т := G*υ_т/c_та = 0.51378 m^2
# 11. Напряжение на растяжение:
σ_л := 200 MPa
# 12. Максимальная частота вращения:
k_n := 6.8*10^-6
n_max := sqrt(σ_л*1/MPa/(k_n*A_т*1/m^2)) explicit, ALL → sqrt(200*MPa*1/MPa/(6.8*10^-6*0.514*m^2*1/m^2)) = 7566.1
n_max := n_max*1/min = 126.102 1/s
# 13. Выбираем относительную длину лопаток:
l_d := 1/6
# 14. Средний диаметр турбины:
D_т := sqrt(A_т/(π*l_d)) explicit, ALL → sqrt(0.514*m^2/(π*1/6)) = 0.99058 m
l_т := l_d*D_т = 0.165097 m
# 15. Окружная скорость на среднем радиусе:
u_т := π*D_т*n_max explicit, ALL → π*0.991*m*126.102*s^-1 = 392.428 m/s
# 16. Зададим степень реактивности:
ρ_ср := 0.3
# 16. Условная адиабатная скорость:
c_ад := sqrt(2*H_тк) explicit, ALL → sqrt(2*5.379*10^5*m^2*s^-2) = 1037.22 m/s
# 17. Зададим соотношение u/c_ад:
u_c.ад := 0.55
# 18. Найдем оптимальную окружную скорость:
u_тη := u_c.ад*c_ад explicit, ALL → 0.55*1.037*10^3*m*s^-1 = 570.473 m/s
# 19. Средний диаметр турбины, соответствующий максимальному КПД:
D_тη := u_тη/(π*n_max) explicit, ALL → 570.473*m*s^-1/(π*126.102*s^-1) = 1.44001 m
# D_тη>D_т , следовательно одноступенчатую турбину проектировать нецелесообразно и для получения максимального КПД число ступеней необходимо увеличитью
# Частота вращения турбины привода компрессора:
n_тк := n_max*min = 7566.1  # об/мин
# Основные размеры проточной части турбины привода компрессора
# 1. Относительная длина РЛ последней ступени:
l_d = 0.166667
# 2. Средний диаметр последней ступени:
D_т = 0.99058 m
# Длина лопатки последней ступени:
l_т := l_d*D_т = 0.165097 m
# Периферийный диаметр (из условия равных кольцевых площадей):
D_т.пер := D_т + l_т = 1.15568 m
D_т.вт := D_т - l_т = 0.825483 m
# 3. Окружная скорость на среднем диаметре D_т:
u_т = 392.428 m/s
# 4. Средний диаметр при выходе из СА первой ступени:
D_1 := 0.970*m
# 5. Окружная скорость на диаметре D_1:
n_тк := n_max = 126.102 1/s
u_1 := π*D_1*n_тк = 384.275 m/s
# 6. Средняя окружная скорость по турбине привода компрессора:
u_ср := sqrt(0.5*(u_1^2 + u_т^2)) = 388.373 m/s
# 7. Оптимальное соотношение y_0:
y_0 := 0.55
# 8. Средняя скорость за ступенями:
c_2ср := 153*m/s
# 9. Коэффициент использования скорости:
μ := 0.9
# 10. Число ступеней:
# Теплоперепад:
H_тк := R_г*k_г/(k_г - 1)*T*_г*(1 - π_тк^((1 - k_г)/k_г)) = 537916 m^2/s^2
# Условная адиабатная скорость:
c_0 := sqrt(2*H_тк) = 1037.22 m/s
# Число ступеней:
z := (c_0^2/(μ*c_2ср)^2 - 1)/(u_ср^2/((μ*c_2ср)^2*y_0^2) - 1) = 2.20337
# Принимаем число ступеней равным двум
z := round(z) = 2
# 11. Распределение теплоперепада по ступеням:
# Коэффициент возврата теплоты:
α := (z - 1)/(2*z)*(π_тк^((k_г - 1)/k_г) - 1)*(1 - η_л) = 0.00964491
c_2z := 160*m/s
c_21 := sqrt(c_2ср^2*2 - c_2z^2) = 145.664 m/s
# Теплоперепад в первой ступени:
H_1тк := H_тк*(1 + α)*u_1^2/(u_1^2 + u_т^2) + 0.5*μ*c_21^2 = 275400 m^2/s^2
# Теплоперепад во второй ступени:
H_2тк := H_тк*(1 + α)*u_т^2/(u_1^2 + u_т^2) = 277252 m^2/s^2
# 12. Распределение степени реактивности:
ρ_1 := 0.22
ρ_2 := 0.3
# 13. Располагаемый теплоперепад в СА первой ступени:
H_с1 := 1.15*H_1тк*(1 - ρ_1) = 247034 m^2/s^2
# 14. Угол потока за СА первой ступени:
α_11 := 15*deg
# 15. Скорость за СА первой ступени:
φ := 0.96
c_11 := φ*sqrt(2*H_с1) = 674.783 m/s
T_у := T*_г - H_1тк*φ^2/(2*c_рг) explicit, ALL → 1.573*10^3*K - 2.754*10^5*m^2*s^-2*0.96^2/(2*1.211*10^3*m^2*K^-1*s^-2) = 1468.18 K
# 7. Средняя удельная теплоемкость:
# По Рис. П4 для α=3.2 и Т_у=1471К:
c_рг.1 := 1.26*10^3*J/(kg*K)
k_г.1 := c_рг.1/(c_рг.1 - R_г) = 1.29897
# 16. Температура за СА первой ступени:
T_с1 := T*_г - H_с1*φ^2/c_рг.1 = 1392.31 K
# 17. Давление за СА первой ступени:
P*_г := 1.906*10^6*Pa
P_с1 := P*_г*(1 - H_с1/(c_рг.1*T*_г))^(k_г.1/(k_г.1 - 1)) = 1068893 kg/(m*s^2)
# 18. Удельный объем за СА первой ступени:
υ_с1 := R_г*T_с1/P_с1 = 0.377746 m^3/kg
# 19. Длина СЛ первой ступени:
l_с1 := G*υ_с1/(π*D_1*sin(α_11)*c_11) = 0.0818317 m
D_1.пер := D_1 + l_с1 = 1.05183 m
D_1.вт := D_1 - l_с1 = 0.888168 m
# 20. Длина и ширина СЛ и РЛ:
# Ширина CЛ 1 ступени:
l_с1.b1 := 1.7
b_c1 := l_с1/l_с1.b1 explicit, ALL → 0.082*m/1.7 = 0.0481363 m
# Осевой зазор:
δ_а.с1 := 0.23*b_c1 = 0.0110713 m
# Ширина РЛ 1 ступени:
b_л1 := b_c1/1.2 = 0.0401136 m
# Ширина CЛ 2 ступени:
l_с2.b2 := 1.8
b_c2 := 80/l_с2.b2 explicit, ALL → 80/1.8 = 44.4444
# Ширина РЛ 2 ступени:
b_л2 := b_c2/1.2 = 37.037  # Осевой зазор:
δ_а.с2 := 0.23*b_c2 = 10.2222
# Данные из чертежа:
D_с2 := 0.479*2*m = 0.958 m
l_с2 := 0.133*m
D_л1 := 0.476*2*m = 0.952 m
l_л1 := 0.104*m
D_л2 := D_т = 0.99058 m
l_л2 := 0.164*m
# Расчет первой ступени турбины
# 1. Располагаемый теплоперепад первой ступени:
H_01 := H_1тк*1.15 = 316710 m^2/s^2
# 2. Степень реактивности:
ρ_1 = 0.22
# 3. Располагаемый теплоперепад в СА:
H_с1 := H_01*(1 - ρ_1) explicit, ALL → 3.167*10^5*m^2*s^-2*(1 - 0.22) = 247034 m^2/s^2
# 4. Коэффициент скорости:
φ_1 := φ = 0.96
# 5. Скорость за СА:
c_11 := φ_1*sqrt(2*H_с1) explicit, ALL → 0.96*sqrt(2*2.47*10^5*m^2*s^-2) = 674.783 m/s
# 6. Средняя условная температура первой ступени:
T_у1 := T*_г - H_1тк*φ_1^2/(2*c_рг) explicit, ALL → 1.573*10^3*K - 2.754*10^5*m^2*s^-2*0.96^2/(2*1.211*10^3*m^2*K^-1*s^-2) = 1468.18 K
# 7. Средняя удельная теплоемкость:
# По Рис. П4 для α=3.2 и Т_у=1471К:
c_рг.1 := 1.26*10^3*J/(kg*K)
k_г.1 := c_рг.1/(c_рг.1 - R_г) = 1.29897
# 8. Температура за СА:
T_11 := T*_г - H_с1*φ_1^2/c_рг.1 explicit, ALL → 1.573*10^3*K - 2.47*10^5*m^2*s^-2*0.96^2/(1.26*10^3*J/(kg*K)) = 1392.31 K
# 9. Температура в конце адиабатного расширения в СА:
T'_11 := T*_г - H_с1/c_рг.1 explicit, ALL → 1.573*10^3*K - 2.47*10^5*m^2*s^-2/(1.26*10^3*J/(kg*K)) = 1376.94 K
# 10. Давление перед РЛ:
P_11 := P*_г*(T'_11/T*_г)^(k_г.1/(k_г.1 - 1)) explicit, ALL → 1.906*10^6*Pa*(1.377*10^3*K/(1.573*10^3*K))^(1.299/(1.299 - 1)) = 1068893 kg/(m*s^2)
# 11. Кольцевая площадь сечения перед РЛ:
A_1са := π*D_1*l_с1 explicit, ALL → π*0.97*m*0.082*m = 0.249369 m^2
# 12. Удельный объем:
υ_11 := R_г*T_11/P_11 explicit, ALL → 290*J/(kg*K)*1.392*10^3*K/(1.069*10^6*Pa) = 0.377746 m^3/kg
# 13. Средняя скорость перед РЛ:
c_11а := G*υ_11/A_1са explicit, ALL → 115.293*kg*s^-1*0.378*m^3*kg^-1/(0.249*m^2) = 174.647 m/s
# 14. Угол потока за СА:
α_11 := asin(c_11а/c_11)/deg explicit, ALL → asin(174.647*m*s^-1/(674.783*m*s^-1))/deg = 15
# 15. Относительная скорость при входе в РЛ:
w_11 := sqrt(c_11^2 + u_1^2 - 2*c_11*u_1*cos(α_11*deg)) = 319.478 m/s
# 16. Угол входа потока на РЛ:
β_11 := acot((c_11*cos(α_11*deg) - u_1)/c_11а)/deg = 33.1384
# 17. Располагаемый теплоперепад в РК:
H_л1 := ρ_1*H_01*T_11/T'_11 explicit, ALL → 0.22*3.167*10^5*m^2*s^-2*1.392*10^3*K/(1.377*10^3*K) = 70454 m^2/s^2
# 18. Окружная скорость при входе в РЛ:
u_1 = 384.275 m/s
# 19. Окружная скорость на выходе из РЛ:
u_21 := π*D_л1*n_тк = 377.144 m/s
# 20. Коэффициент скорости в РЛ:
ψ_1 := 0.96
# 21. Относительная скорость за РЛ:
w_21 := ψ_1*sqrt(w_11^2 + 2*H_л1 + u_21^2 - u_1^2) = 467.89 m/s
# 22. Температура за РЛ:
T_21 := T_11 - (w_21^2 - w_11^2 - u_21^2 + u_1^2)/(2*c_рг.1) = 1343.79 K
# 23. Температура в конце адиабатного расширения в РЛ:
T'_21 := T_11 - H_л1/c_рг.1 explicit, ALL → 1.392*10^3*K - 7.045*10^4*m^2*s^-2/(1.26*10^3*J/(kg*K)) = 1336.4 K
# 24. Давление за РЛ:
P_21 := P_11*(T'_21/T_11)^(k_г.1/(k_г.1 - 1)) explicit, ALL → 1.069*10^6*Pa*(1.336*10^3*K/(1.392*10^3*K))^(1.299/(1.299 - 1)) = 894521 kg/(m*s^2)
# 25. Удельный объем за РЛ:
υ_21 := R_г*T_21/P_21 explicit, ALL → 290*J/(kg*K)*1.344*10^3*K/(8.945*10^5*Pa) = 0.43565 m^3/kg
# 26. Площадь кольцевого сечения за РЛ:
A_1рл := π*D_л1*l_л1 = 0.311043 m^2
# 27. Осевая скорость за РЛ:
c_21а := G*υ_21/A_1рл explicit, ALL → 115.293*kg*s^-1*0.436*m^3*kg^-1/(0.311*m^2) = 161.481 m/s
# 28. Угол выхода потока из РЛ:
β_21 := asin(c_21а/w_21)/deg explicit, ALL → asin(161.481*m*s^-1/(467.89*m*s^-1))/deg = 20.1895
# 29. Скорость закрутки потока за РЛ:
c_21u := w_21*cos(β_21*deg) - u_21 explicit, ALL → 467.89*m*s^-1*cos(20.189*deg) - 377.144*m*s^-1 = 61.9969 m/s
# 30. Угол выхода потока из РЛ:
α_21 := acot(c_21u/c_21а)/deg = 68.9968
# 31. Скорость газа за РЛ:
c_21 := sqrt(c_21u^2 + c_21а^2) explicit, ALL → sqrt((61.997*m*s^-1)^2 + (161.481*m*s^-1)^2) = 172.973 m/s
# 32. Работа на окружности колеса:
c_11u := cos(α_11*deg)*c_11 explicit, ALL → cos(15*deg)*674.783*m*s^-1 = 651.791 m/s
W_1u := c_11u*u_1 + c_21u*u_21 = 273849 m^2/s^2
# 33. КПД на окружности колеса:
η_u1 := W_1u/H_01 explicit, ALL → 2.738*10^5*m^2*s^-2/(3.167*10^5*m^2*s^-2) = 0.864667
# 34. Удельные потери в СА:
h_с1 := (φ_1^-2 - 1)*c_11^2/2 explicit, ALL → (0.96^-2 - 1)*(674.783*m*s^-1)^2/2 = 19367.4 m^2/s^2
# 35. Удельные потери в СА с учетом их использования в РЛ:
h'_с1 := h_с1*T'_21/T_11 explicit, ALL → 1.937*10^4*m^2*s^-2*1.336*10^3*K/(1.392*10^3*K) = 18589.6 m^2/s^2
# 36. Относительные потери в СА:
ξ_с1 := h_с1/H_01 = 0.061152
# 37. Удельные потери в СА с учетом их использования в РЛ:
ξ'_с1 := ξ_с1*T'_21/T_11 explicit, ALL → 0.061*1.336*10^3*K/(1.392*10^3*K) = 0.0586961
# 38. Удельные потери в РЛ:
h_л1 := (ψ_1^-2 - 1)*w_21^2/2 explicit, ALL → (0.96^-2 - 1)*(467.89*m*s^-1)^2/2 = 9311.74 m^2/s^2
# 39. Относительные потери в РЛ:
ξ_л1 := h_л1/H_01 = 0.0294015
# 40. Удельные потери с выходной скоростью:
h_в1 := c_21^2/2 = 14959.8 m^2/s^2
# 41. Относительные потери с выходной скоростью:
ξ_в1 := h_в1/H_01 = 0.0472351
# 42. КПД  на окружности колеса:
η_u1 := 1 - ξ'_с1 - ξ_л1 - ξ_в1 explicit, ALL → 1 - 0.059 - 0.029 - 0.047 = 0.864667
# 43. Радиальный зазор между корпусом и сопловыми лопатками принимаем равным нулю:
δ_с := 0*m
# 44. Относительный радиальный зазор между корпусом и рабочими лопатками:
δ_D := 0.001
# 45. Радиальный зазор между корпусом и рабочими лопатками:
δ_л1 := δ_D*D_л1 explicit, ALL → 1*10^-3*0.952*m = 0.000952 m
# 46. Удельные потери в радиальном зазоре:
h_з1 := 1.37*(1 + 1.6*ρ_1)*(1 + l_л1/D_л1)*δ_л1/l_л1*W_1u → 5.15*10^3*m^2/s^2 = 5150.37 m^2/s^2
# 47. Относительные потери в радиальном зазоре:
ξ_з1 := h_з1/H_1тк = 0.0187014
# 48. Удельная работа ступени с учетом потери в радиальном зазоре:
W_uз1 := W_1u - h_з1 = 268698 m^2/s^2
# 49. Мощностной КПД ступени:
η'_т1 := η_u1 - ξ_з1 = 0.845966
# 50. Лопаточный КПД ступени:
η'_л1 := η'_т1 + ξ_в1 = 0.893201
# 51. Затраты мощности на трение и вентиляцию:
υ_11 := R_г*T_11/P_11 = 0.377746 m^3/kg
N_тв1 := 1.07*D_л1^2*(u_1/100)^3*(1/υ_11 + 1/υ_21)/2 = 135.994 kg*m^2/s^3
# 52. Удельные потери на трение и вентиляцию:
h_т.в1 := N_тв1/G = 1.17955 m^2/s^2
# 53. Относительные потери на трение и вентиляцию:
ξ_т.в1 := h_т.в1/H_01 = 3.72438e-6
# 54. Мощностной КПД  с учетом потерь на трение и вентиляцию:
η_т1 := η'_т1 - ξ_т.в1 explicit, ALL → 0.846 - 3.724*10^-6 = 0.845962
# 55. Лопаточный КПД  с учетом потерь на трение и вентиляцию:
η_л1 := η'_л1 - ξ_т.в1 explicit, ALL → 0.893 - 3.724*10^-6 = 0.893197
# 56. Удельная работа ступени:
L_т1 := H_01*η_т1 explicit, ALL → 3.167*10^5*m^2*s^-2*0.846 = 267925 m^2/s^2
# 57. Температура за ступенью:
T_ст1 := T_21 + h_з1/c_рг.1 + h_т.в1/c_рг.1 explicit, ALL → 1.344*10^3*K + 5.15*10^3*m^2*s^-2/(1.26*10^3*J/(kg*K)) + 1.18*m^2*s^-2/(1.26*10^3*J/(kg*K)) = 1347.88 K
# 58. Темпеартура торможения за ступенью:
T*_ст1 := T_ст1 + h_в1/c_рг.1 explicit, ALL → 1.348*10^3*K + 1.496*10^4*m^2*s^-2/(1.26*10^3*J/(kg*K)) = 1359.75 K
# 59. Давление торможения за ступенью:
P*_ст1 := P_21*(T*_ст1/T_ст1)^(k_г.1/(k_г.1 - 1)) explicit, ALL → 8.945*10^5*Pa*(1.36*10^3*K/(1.348*10^3*K))^(1.299/(1.299 - 1)) = 929264 kg/(m*s^2)
# 60. Располагаемый теплоперепад по параметрам торможения:
H*_т1 := c_рг.1*T*_г*(1 - (P*_ст1/P*_г)^((k_г.1 - 1)/k_г.1)) = 302041 m^2/s^2
# 61. КПД турбины по параметрам торможения:
η*_т1 := L_т1/H*_т1 explicit, ALL → 2.679*10^5*m^2*s^-2/(3.02*10^5*m^2*s^-2) = 0.887046
η_л1 := η*_т1*H*_т1/H_01 + c_21^2/(2*H_01) explicit, ALL → 0.887*3.02*10^5*m^2*s^-2/(3.167*10^5*m^2*s^-2) + (172.973*m*s^-1)^2/(2*3.167*10^5*m^2*s^-2) = 0.893197
# Расчет второй ступени турбины привода компрессора
# 1. Удельная работа последней ступени:
L_тΣ := L_тк
L_т2 := L_тΣ - L_т1 explicit, ALL → 4.724*10^5*m^2/s^2 - 2.679*10^5*m^2*s^-2 = 204475 m^2/s^2
# 2. Мощностной КПД:
η_т2 := 0.846
# 3. Располагаемый теплоперепад второй ступени:
H_02 := L_т2/η_т2 = 241697 m^2/s^2
# 4. Температура торможения перед ступенью:
T*_02 := T*_ст1 = 1359.75 K
# 5. Давление торможения перед ступенью:
P*_02 := P_21*(1 + (μ*c_21)^2/(2*c_рг.1*T_ст1))^(k_г.1/(k_г.1 - 1)) = 922584 kg/(m*s^2)
# 6. Степень реактивности:
ρ_2 = 0.3
# 7. Располагаемый теплоперепад в СА:
H_с2 := H_02*(1 - ρ_2) explicit, ALL → 2.417*10^5*m^2*s^-2*(1 - 0.3) = 169188 m^2/s^2
# 8. Коэффициент скорости:
φ_2 := φ = 0.96
# 9. Скорость за СА:
c_12 := φ_2*sqrt(2*H_с2) explicit, ALL → 0.96*sqrt(2*1.692*10^5*m^2*s^-2) = 558.432 m/s
# 10. Средняя условная температура первой ступени:
T_у2 := T*_02 - H_02*φ_2^2/(2*c_рг.1) explicit, ALL → 1.36*10^3*K - 2.417*10^5*m^2*s^-2*0.96^2/(2*1.26*10^3*J/(kg*K)) = 1271.36 K
# 11. Средняя удельная теплоемкость:
# По Рис. П4 для α=3.2 и Т_у=1293К:
c_рг.2 := 1.24*10^3*J/(kg*K)
k_г.2 := c_рг.2/(c_рг.2 - R_г) = 1.30526
# 12. Температура за СА:
T_12 := T*_02 - H_с2*φ_2^2/c_рг.2 explicit, ALL → 1.36*10^3*K - 1.692*10^5*m^2*s^-2*0.96^2/(1.24*10^3*J/(kg*K)) = 1234 K
# 13. Температура в конце адиабатного расширения в СА:
T'_12 := T*_02 - H_с2/c_рг.2 explicit, ALL → 1.36*10^3*K - 1.692*10^5*m^2*s^-2/(1.24*10^3*J/(kg*K)) = 1223.31 K
# 14. Давление перед РЛ:
P_12 := P*_02*(T'_12/T*_02)^(k_г.2/(k_г.2 - 1)) = 587009 kg/(m*s^2)
# 15. Давление за ступенью:
P_22 := 5.144*10^5*Pa
P_22 := root(H_02 - c_рг.2*T*_02*(1 - (P_22/P*_02)^((k_г.2 - 1)/k_г.2)), P_22) = 476089 kg/(m*s^2)
# 16. Кольцевая площадь сечения перед РЛ:
A_2са := π*D_с2*l_с2 explicit, ALL → π*0.958*m*0.133*m = 0.400283 m^2
# 17. Удельный объем:
υ_12 := R_г*T_12/P_12 explicit, ALL → 290*J/(kg*K)*1.234*10^3*K/(5.87*10^5*Pa) = 0.609635 m^3/kg
# 18. Средняя скорость перед РЛ:
c_12а := G*υ_12/A_2са explicit, ALL → 115.293*kg*s^-1*0.61*m^3*kg^-1/(0.4*m^2) = 175.592 m/s
# 19. Угол потока за СА:
α_12 := asin(c_12а/c_12)/deg explicit, ALL → asin(175.592*m*s^-1/(558.432*m*s^-1))/deg = 18.3269
# 20. Относительная скорость при входе в РЛ:
u_1 := π*D_с2*n_тк = 379.521 m/s
w_12 := sqrt(c_12^2 + u_1^2 - 2*c_12*u_1*cos(α_12*deg)) = 231.32 m/s
# 21. Угол входа потока на РЛ:
β_12 := acot((c_12*cos(α_12*deg) - u_1)/c_12а)/deg = 49.3839
# 22. Располагаемый теплоперепад в РК:
H_л2 := ρ_2*H_02*T_12/T'_12 explicit, ALL → 0.3*2.417*10^5*m^2*s^-2*1.234*10^3*K/(1.223*10^3*K) = 73143.1 m^2/s^2
# 23. Окружная скорость при входе в РЛ:
u_1 = 379.521 m/s
# 24. Окружная скорость на выходе из РЛ:
u_21 := π*D_л2*n_тк = 392.428 m/s
# 25. Коэффициент скорости в РЛ:
ψ_2 := ψ_1 = 0.96
# 26. Относительная скорость за РЛ:
w_22 := ψ_2*sqrt(w_12^2 + 2*H_л2 + u_21^2 - u_1^2) = 439.674 m/s
# 27. Температура за РЛ:
T_22 := T_12 - (w_22^2 - w_12^2 - u_21^2 + u_1^2)/(2*c_рг.2) = 1181.65 K
# 28. Температура в конце адиабатного расширения в РЛ:
T'_22 := T_12 - H_л2/c_рг.2 explicit, ALL → 1.234*10^3*K - 7.314*10^4*m^2*s^-2/(1.24*10^3*J/(kg*K)) = 1175.02 K
# 29. Давление за РЛ:
P_22 := P_12*(T'_22/T_12)^(k_г.2/(k_г.2 - 1)) explicit, ALL → 5.87*10^5*Pa*(1.175*10^3*K/(1.234*10^3*K))^(1.305/(1.305 - 1)) = 476089 kg/(m*s^2)
# 30. Удельный объем за РЛ:
υ_22 := R_г*T_22/P_22 explicit, ALL → 290*J/(kg*K)*1.182*10^3*K/(4.761*10^5*Pa) = 0.719778 m^3/kg
# 31. Площадь кольцевого сечения за РЛ:
A_2рл := π*D_л2*l_л2 = 0.510368 m^2
# 32. Осевая скорость за РЛ:
c_22а := G*υ_22/A_2рл explicit, ALL → 115.293*kg*s^-1*0.72*m^3*kg^-1/(0.51*m^2) = 162.599 m/s
# 33. Угол выхода потока из РЛ:
β_22 := asin(c_22а/w_22)/deg explicit, ALL → asin(162.599*m*s^-1/(439.674*m*s^-1))/deg = 21.7044
# 34. Скорость закрутки потока за РЛ:
c_22u := w_22*cos(β_22*deg) - u_21 explicit, ALL → 439.674*m*s^-1*cos(21.704*deg) - 392.428*m*s^-1 = 16.0754 m/s
# 35. Угол выхода потока из РЛ:
α_22 := acot(c_22u/c_22а)/deg = 84.3538
# 36. Скорость газа за РЛ:
c_22 := sqrt(c_22u^2 + c_22а^2) explicit, ALL → sqrt((16.075*m*s^-1)^2 + (162.599*m*s^-1)^2) = 163.392 m/s
# 37. Работа на окружности колеса:
c_12u := cos(α_12*deg)*c_12 explicit, ALL → cos(18.327*deg)*558.432*m*s^-1 = 530.108 m/s
W_2u := c_12u*u_1 + c_22u*u_21 = 207495 m^2/s^2
# 38. КПД на окружности колеса:
η_u2 := W_2u/H_02 explicit, ALL → 2.075*10^5*m^2*s^-2/(2.417*10^5*m^2*s^-2) = 0.858495
# 39. Удельные потери в СА:
h_с2 := (φ_2^-2 - 1)*c_12^2/2 explicit, ALL → (0.96^-2 - 1)*(558.432*m*s^-1)^2/2 = 13264.3 m^2/s^2
# 40. Удельные потери в СА с учетом их использования в РЛ:
h'_с2 := h_с2*T'_22/T_12 explicit, ALL → 1.326*10^4*m^2*s^-2*1.175*10^3*K/(1.234*10^3*K) = 12630.3 m^2/s^2
# 41. Относительные потери в СА:
ξ_с2 := h_с2/H_02 = 0.05488
# 42. Удельные потери в СА с учетом их использования в РЛ:
ξ'_с2 := ξ_с2*T'_22/T_12 explicit, ALL → 0.055*1.175*10^3*K/(1.234*10^3*K) = 0.0522567
# 43. Удельные потери в РЛ:
h_л2 := (ψ_2^-2 - 1)*w_22^2/2 explicit, ALL → (0.96^-2 - 1)*(439.674*m*s^-1)^2/2 = 8222.53 m^2/s^2
# 44. Относительные потери в РЛ:
ξ_л2 := h_л2/H_02 = 0.03402
# 45. Удельные потери с выходной скоростью:
h_в2 := c_22^2/2 = 13348.5 m^2/s^2
# 46. Относительные потери с выходной скоростью:
ξ_в2 := h_в2/H_02 = 0.0552282
# 47. КПД  на окружности колеса:
η_u2 := 1 - ξ'_с2 - ξ_л2 - ξ_в2 explicit, ALL → 1 - 0.052 - 0.034 - 0.055 = 0.858495
# 48. Радиальный зазор между корпусом и рабочими лопатками:
δ_л2 := δ_D*D_л2 explicit, ALL → 1*10^-3*0.991*m = 0.00099058 m
# 49. Удельные потери в радиальном зазоре:
h_з2 := 1.37*(1 + 1.6*ρ_2)*(1 + l_л2/D_л2)*δ_л2/l_л2*W_2u → 2.962*10^3*m^2/s^2 = 2961.9 m^2/s^2
# 50. Относительные потери в радиальном зазоре:
ξ_з2 := h_з2/H_02 = 0.0122546
# 51. Удельная работа ступени с учетом потери в радиальном зазоре:
W_uз2 := W_2u - h_з2 = 204534 m^2/s^2
# 52. Мощностной КПД ступени:
η'_т2 := η_u2 - ξ_з2 = 0.84624
# 53. Лопаточный КПД ступени:
η'_л2 := η'_т2 + ξ_в2 = 0.901469
# 54. Затраты мощности на трение и вентиляцию:
υ_12 := R_г*T_12/P_12 = 0.609635 m^3/kg
N_тв2 := 1.07*D_л2^2*(u_1/100)^3*(1/υ_12 + 1/υ_22)/2 = 86.9425 kg*m^2/s^3
# 55. Удельные потери на трение и вентиляцию:
h_т.в2 := N_тв2/G = 0.7541 m^2/s^2
# 56. Относительные потери на трение и вентиляцию:
ξ_т.в2 := h_т.в2/H_02 = 3.12002e-6
# 57. Мощностной КПД  с учетом потерь на трение и вентиляцию:
η_т2 := η'_т2 - ξ_т.в2 explicit, ALL → 0.846 - 3.12*10^-6 = 0.846237
# 58. Лопаточный КПД  с учетом потерь на трение и вентиляцию:
η_л2 := η'_л2 - ξ_т.в2 explicit, ALL → 0.901 - 3.12*10^-6 = 0.901466
# 59. Удельная работа ступени:
L_т2 := H_02*η_т2 explicit, ALL → 2.417*10^5*m^2*s^-2*0.846 = 204533 m^2/s^2
# 60. Температура за ступенью:
T_ст2 := T_22 + h_з2/c_рг.2 + h_т.в2/c_рг.2 explicit, ALL → 1.182*10^3*K + 2.962*10^3*m^2*s^-2/(1.24*10^3*J/(kg*K)) + 0.754*m^2*s^-2/(1.24*10^3*J/(kg*K)) = 1184.04 K
# 61. Темпеартура торможения за ступенью:
T*_ст2 := T_ст2 + h_в2/c_рг.2 explicit, ALL → 1.184*10^3*K + 1.335*10^4*m^2*s^-2/(1.24*10^3*J/(kg*K)) = 1194.8 K
# 62. Давление торможения за ступенью:
P*_ст2 := P_22*(T*_ст2/T_ст2)^(k_г.2/(k_г.2 - 1)) explicit, ALL → 4.761*10^5*Pa*(1.195*10^3*K/(1.184*10^3*K))^(1.305/(1.305 - 1)) = 494874 kg/(m*s^2)
# 63. Располагаемый теплоперепад по параметрам торможения:
H*_т2 := c_рг.2*T*_02*(1 - (P*_ст2/P*_02)^((k_г.2 - 1)/k_г.2)) = 228565 m^2/s^2
# 64. КПД турбины по параметрам торможения:
η*_т2 := L_т2/H*_т2 explicit, ALL → 2.045*10^5*m^2*s^-2/(2.286*10^5*m^2*s^-2) = 0.894857
η_л2 := η*_т2*H*_т2/H_02 + c_22^2/(2*H_02) explicit, ALL → 0.895*2.286*10^5*m^2*s^-2/(2.417*10^5*m^2*s^-2) + (163.392*m*s^-1)^2/(2*2.417*10^5*m^2*s^-2) = 0.901466
# Расчет параметров турбины
# 1. Удельная работа турбины:
L_тΣ := L_т1 + L_т2 = 472457 m^2/s^2
# 2.  Располагаемый теплоперепад в турбине:
π_тк := P*_г/P_22 = 4.00346
# 3. Располагаемый теплоперепад в турбине:
H_т := c_рг*T*_г*(1 - π_тк^((1 - k_г)/k_г)) = 538386 m^2/s^2
# 4. Мощностной КПД турбины:
η_т := L_тΣ/H_т = 0.877543
# 5. Лопаточный КПД турбины:
η_л := (L_тΣ + h_в2)/H_т = 0.902337
# 6. Теплоперепад по параметрам торможения:
H*_т := c_рг*T*_г*(1 - (P*_ст2/P*_г)^((k_г - 1)/k_г)) = 525665 m^2/s^2
# 7. КПД по параметрам торможения:
L_тΣ/H*_т = 0.89878
# Профилирование по радиусу второй ступени
# Выберем закон профилирования лопатки по высоте  Г=const.
# Для этого закона существуют следующие зависимости:
C_u*r == const
C_а == const
# Основные геометрические параметры:
r_са.ср := D_с2/2 = 0.479 m  # средний радиус на выходе из СА
D_са.пер := D_с2 = 0.958 m
D_са.пер := root(D_са.пер^2 + (D_са.пер - 2*l_с2)^2 - 2*D_с2^2, D_са.пер) = 1.08172 m
r_са.пер := D_са.пер/2 = 0.540861 m  # периферийный радиус на выходе из СА
D_са.вт := D_са.пер - 2*l_с2 = 0.815723 m
r_са.вт := D_са.вт/2 = 0.407861 m  # периферийный радиус на выходе из СА
r_рл.ср := D_л2/2 = 0.49529 m  # средний радиус на выходе из РЛ
D_рл.пер := D_л2 = 0.99058 m
D_рл.пер := root(D_рл.пер^2 + (D_рл.пер - 2*l_л2)^2 - 2*D_л2^2, D_рл.пер) = 1.14091 m
r_рл.пер := D_рл.пер/2 = 0.570455 m  # периферийный радиус на выходе из РЛ
D_рл.вт := D_рл.пер - 2*l_л2 = 0.812909 m
r_рл.вт := D_рл.вт/2 = 0.406455 m  # периферийный радиус на выходе из РЛ
# Cкорости на периферийном радиусе:
c_1а.пер := c_12а = 175.592 m/s
c_1u.пер := c_12u*r_са.ср/r_са.пер explicit, ALL → 530.108*m*s^-1*0.479*m/(0.541*m) = 469.476 m/s
c_1.пер := sqrt(c_1а.пер^2 + c_1u.пер^2) = 501.239 m/s
c_2а.пер := c_22а = 162.599 m/s
c_2u.пер := c_22u*r_рл.ср/r_рл.пер explicit, ALL → 16.075*m*s^-1*0.495*m/(0.57*m) = 13.9573 m/s
c_2.пер := sqrt(c_2а.пер^2 + c_2u.пер^2) = 163.197 m/s
# Cкорости на втулочном радиусе:
c_1а.вт := c_12а = 175.592 m/s
c_1u.вт := c_12u*r_са.ср/r_са.вт explicit, ALL → 530.108*m*s^-1*0.479*m/(0.408*m) = 622.568 m/s
c_1.вт := sqrt(c_1а.вт^2 + c_1u.вт^2) = 646.857 m/s
c_2а.вт := c_22а = 162.599 m/s
c_2u.вт := c_22u*r_рл.ср/r_рл.вт explicit, ALL → 16.075*m*s^-1*0.495*m/(0.406*m) = 19.5889 m/s
c_2.вт := sqrt(c_2а.вт^2 + c_2u.вт^2) = 163.775 m/s
# Располагаемый теплоперепад в СА:
H_са.пер := (c_1.пер/φ)^2/2 explicit, ALL → (501.239*m*s^-1/0.96)^2/2 = 136307 m^2/s^2
H_са.вт := (c_1.вт/φ)^2/2 explicit, ALL → (646.857*m*s^-1/0.96)^2/2 = 227010 m^2/s^2
# Располагаемый теплоперепад в РЛ:
H_рл.пер := H_02 - H_са.пер explicit, ALL → 2.417*10^5*m^2*s^-2 - 1.363*10^5*m^2*s^-2 = 105390 m^2/s^2
H_рл.вт := H_02 - H_са.вт explicit, ALL → 2.417*10^5*m^2*s^-2 - 2.27*10^5*m^2*s^-2 = 14687.3 m^2/s^2
# Степени реактивности последней ступени:
ρ_2.пер := H_рл.пер/H_02 explicit, ALL → 1.054*10^5*m^2*s^-2/(2.417*10^5*m^2*s^-2) = 0.436042
ρ_2.вт := H_рл.вт/H_02 explicit, ALL → 1.469*10^4*m^2*s^-2/(2.417*10^5*m^2*s^-2) = 0.0607673
# Температура конца адиабатического расширения в сопловом аппарате:
T'_1.пер := T*_02 - H_са.пер/c_рг.2 explicit, ALL → 1.36*10^3*K - 1.363*10^5*m^2*s^-2/(1.24*10^3*J/(kg*K)) = 1249.82 K
T'_1.вт := T*_02 - H_са.вт/c_рг.2 explicit, ALL → 1.36*10^3*K - 2.27*10^5*m^2*s^-2/(1.24*10^3*J/(kg*K)) = 1176.68 K
# Температура после СА:
T_1.пер := T*_02 - c_1.пер^2/(2*c_рг.2) explicit, ALL → 1.36*10^3*K - (501.239*m*s^-1)^2/(2*1.24*10^3*J/(kg*K)) = 1258.44 K
T_1.вт := T*_02 - c_1.вт^2/(2*c_рг.2) explicit, ALL → 1.36*10^3*K - (646.857*m*s^-1)^2/(2*1.24*10^3*J/(kg*K)) = 1191.03 K
# Составляющие треугольника скоростей на периферии
# Окружная скорость:
u_1.ср := π*n_тк*D_с2 = 379.521 m/s
u_2.ср := π*n_тк*D_л2 = 392.428 m/s
u_1.пер := u_1.ср*r_са.пер/r_са.ср explicit, ALL → 379.521*m*s^-1*0.541*m/(0.479*m) = 428.535 m/s
u_2.пер := u_2.ср*r_рл.пер/r_рл.ср explicit, ALL → 392.428*m*s^-1*0.57*m/(0.495*m) = 451.983 m/s
α_12 = 18.3269
# Направление абсолютной скорости на выходе из СА:
α_1.пер := asin(c_1а.пер/c_1.пер)/deg explicit, ALL → asin(175.592*m*s^-1/(501.239*m*s^-1))/deg = 20.5067
c_1.пер*cos(α_1.пер*deg) - u_1.пер = 40.9411 m/s
# Относительная скорость за СА:
w_1.пер := sqrt(c_1.пер^2 + u_1.пер^2 - 2*c_1.пер*u_1.пер*cos(α_1.пер*deg)) = 180.302 m/s
atan(c_1а.пер/(c_1.пер*cos(α_1.пер*deg) - u_1.пер))/deg = 76.8754
# Угол входа потока в относительном движении:
w_12 = 231.32 m/s
β_1.пер := acot((c_1.пер*cos(α_1.пер*deg) - u_1.пер)/c_1а.пер)/deg = 76.8754
β_12 = 49.3839
# Относительная скорость за РЛ:
w_2.пер := ψ_2*sqrt(w_1.пер^2 + 2*H_рл.пер + u_2.пер^2 - u_1.пер^2) = 493.196 m/s
# Угол выхода потока в относительном движении:
β_2.пер := asin(c_2а.пер/w_2.пер)/deg explicit, ALL → asin(162.599*m*s^-1/(493.196*m*s^-1))/deg = 19.2497
# Угол выхода потока за РЛ:
α_22 = 84.3538
α_2.пер := acot(c_2u.пер/c_2а.пер)/deg = 85.0938
c_2u.пер = 13.9573 m/s
# Действительная температура за РЛ:
w_2.пер*cos(β_2.пер*deg) - u_2.пер = 13.6394 m/s
T_2.пер := T_1.пер - (w_2.пер^2 - w_1.пер^2 - u_2.пер^2 + u_1.пер^2)/(2*c_рг.2) = 1181.79 K
# Число Маха по относительной скорости на входе в РК:
M_1w.пер := w_1.пер/sqrt(k_г.2*R_г*T_1.пер) explicit, ALL → 180.302*m*s^-1/sqrt(1.305*290*J/(kg*K)*1.258*10^3*K) = 0.261238
# Число Маха по относительной скорости на выходе из РК:
M_2w.пер := w_2.пер/sqrt(k_г.2*R_г*T_2.пер) explicit, ALL → 493.196*m*s^-1/sqrt(1.305*290*J/(kg*K)*1.182*10^3*K) = 0.737396
# Число Маха по абсолютной скорости на входе в РК
M_1c.пер := c_1.пер/sqrt(k_г.2*R_г*T_1.пер) explicit, ALL → 501.239*m*s^-1/sqrt(1.305*290*J/(kg*K)*1.258*10^3*K) = 0.72624
# Составляющие треугольника скоростей на периферии
# Окружная скорость:
u_1.ср := π*n_тк*D_с2 = 379.521 m/s
u_2.ср := π*n_тк*D_л2 = 392.428 m/s
u_1.вт := u_1.ср*r_са.вт/r_са.ср explicit, ALL → 379.521*m*s^-1*0.408*m/(0.479*m) = 323.157 m/s
u_2.вт := u_2.ср*r_рл.вт/r_рл.ср explicit, ALL → 392.428*m*s^-1*0.406*m/(0.495*m) = 322.042 m/s
# Направление абсолютной скорости на выходе из СА:
α_1.вт := asin(c_1а.вт/c_1.вт)/deg explicit, ALL → asin(175.592*m*s^-1/(646.857*m*s^-1))/deg = 15.7509
# Относительная скорость за СА:
w_1.вт := sqrt(c_1.вт^2 + u_1.вт^2 - 2*c_1.вт*u_1.вт*cos(α_1.вт*deg)) = 347.102 m/s
# Угол входа потока в относительном движении:
β_1.вт := acot((c_1.вт*cos(α_1.вт*deg) - u_1.вт)/c_1а.вт)/deg = 30.3899
# Относительная скорость за РЛ:
w_2.вт := ψ_2*sqrt(w_1.вт^2 + 2*H_рл.вт + u_2.вт^2 - u_1.вт^2) = 370.733 m/s
# Угол выхода потока в относительном движении:
β_2.вт := asin(c_2а.вт/w_2.вт)/deg explicit, ALL → asin(162.599*m*s^-1/(370.733*m*s^-1))/deg = 26.0138
# Угол выхода потока за РЛ:
α_2.вт := acot(c_2u.вт/c_2а.вт)/deg = 83.1305
# Действительная температура за РЛ:
T_2.вт := T_1.вт - (w_2.вт^2 - w_1.вт^2 - u_2.вт^2 + u_1.вт^2)/(2*c_рг.2) = 1183.9 K
# Число Маха по относительной скорости на входе в РК:
M_1w.вт := w_1.вт/sqrt(k_г.2*R_г*T_1.вт) explicit, ALL → 347.102*m*s^-1/sqrt(1.305*290*J/(kg*K)*1.191*10^3*K) = 0.51695
# Число Маха по относительной скорости на выходе из РК:
M_2w.вт := w_2.вт/sqrt(k_г.2*R_г*T_2.вт) explicit, ALL → 370.733*m*s^-1/sqrt(1.305*290*J/(kg*K)*1.184*10^3*K) = 0.553804
# Число Маха по абсолютной скорости на входе в РК
M_1c.вт := c_1.вт/sqrt(k_г.2*R_г*T_1.вт) explicit, ALL → 646.857*m*s^-1/sqrt(1.305*290*J/(kg*K)*1.191*10^3*K) = 0.963383
# Уточнение коэффициентов φ и ψ
# Потери в сопловом аппарате первой ступени
# 1. Определим коэффициент потерь от трения в сопловом аппарате в зависимости от направления потока.
# Примем
α_0 := 90
k := sin(α_0*deg)/sin(α_11*deg) explicit, ALL → sin(90*deg)/sin(15*deg) = 3.8637
# Принимаем
ξ_тр.с := 0.01
# 2. Проверим необходимость учета влияния шероховатости:
# Зададим удлинение сопловых лопаток:
# Длина хорды сопловой лопатки:
b_c := 0.045*m explicit, ALL → 0.045*m = 0.045 m
μ := 13.2*10^-6*Pa*s
Re_c := c_11*b_c*P_11/(R_г*T_11)/μ explicit, ALL → 674.783*m*s^-1*0.045*m*1.069*10^6*Pa/(290*J/(kg*K)*1.392*10^3*K)/(13.2*10^-6*Pa*s) = 6089794
# Учет шероховатости не требуется.
# 3. Определим кромочные потери:
t_bc := 0.75
s_c := 1*10^-3*m
t_c := t_bc*b_c explicit, ALL → 0.75*0.045*m = 0.03375 m
ξ_кр.с := 0.2*s_c/(t_c*sin(α_11*deg)) explicit, ALL → 0.2*10^-3*m/(0.034*m*sin(15*deg)) = 0.022896
# 4. Определим коэффициент профильных потерь:
ξ_пр.с := ξ_тр.с + ξ_кр.с explicit, ALL → 0.01 + 0.023 = 0.032896
# 5. Определим число Маха на выходе из соплового аппарата:
M_1 := c_11/sqrt(k_г*R_г*T_11) explicit, ALL → 674.783*m*s^-1/sqrt(1.315*290*J/(kg*K)*1.392*10^3*K) = 0.926049
# Течение дозвуковое. Учетволновых потерь не требуется.
# 6. Определим учет концевых потерь.
ξ_к.с := 2*ξ_тр.с*t_c*sin(α_11*deg)/l_с1 explicit, ALL → 2*0.01*0.034*m*sin(15*deg)/(0.082*m) = 0.00213491
# 7. Определим коэффициент потерь в сопловом аппарате:
ξ_с := ξ_пр.с + ξ_к.с explicit, ALL → 0.033 + 2.135*10^-3 = 0.0350309
# 8. Определим коэффициент скорости в сопловом аппарате:
φ := sqrt(1 - ξ_с) explicit, ALL → sqrt(1 - 0.035) = 0.982328
# Потери в рабочих лопатках первой ступени
# 1. Определим коэффициент потерь от трения в рабочих в зависимости от направления потока.
k := sin(β_11*deg)/sin(β_21*deg) explicit, ALL → sin(33.138*deg)/sin(20.189*deg) = 1.58395
# Принимаем
ξ_тр.л := 0.025
# 2. Проверим необходимость учета влияния шероховатости:
# Длина хорды рабочей лопатки:
b_л := 0.04*m explicit, ALL → 0.04*m = 0.04 m
μ := 13.2*10^-6*Pa*s
Re_л := w_21*b_л*P_21/(R_г*T_21)/μ explicit, ALL → 467.89*m*s^-1*0.04*m*8.945*10^5*Pa/(290*J/(kg*K)*1.344*10^3*K)/(13.2*10^-6*Pa*s) = 3254557
# Учет шероховатости не требуется.
# 3. Определим коэффициент профильных потерь:
t_b := 0.75
s_c := 1*10^-3*m
t_л := t_b*b_л explicit, ALL → 0.75*0.04*m = 0.03 m
ξ_кр.л := 0.2*s_c/(t_л*sin(β_21*deg)) explicit, ALL → 0.2*10^-3*m/(0.03*m*sin(20.189*deg)) = 0.0193166
# 4. Определим кромочные потери:
ξ_пр.л := ξ_тр.л + ξ_кр.л explicit, ALL → 0.025 + 0.019 = 0.0443166
# 5. Определим число Маха на выходе из рабочей лопатки:
M_2 := w_21/sqrt(k_г*R_г*T_21) explicit, ALL → 467.89*m*s^-1/sqrt(1.315*290*J/(kg*K)*1.344*10^3*K) = 0.653607
# Течение дозвуковое. Учетволновых потерь не требуется.
# 6. Определим учет концевых потерь.
ξ_к.л := 2*ξ_тр.л*t_л*sin(β_21*deg)/l_л1 explicit, ALL → 2*0.025*0.03*m*sin(20.189*deg)/(0.104*m) = 0.00497777
# 7. Определим коэффициент потерь в рабочей лопатке:
ξ_л := ξ_пр.л + ξ_к.л explicit, ALL → 0.044 + 4.978*10^-3 = 0.0492944
# 8. Определим коэффициент скорости в рабочей лопатке:
ψ := sqrt(1 - ξ_л) explicit, ALL → sqrt(1 - 0.049) = 0.975041
# Уточнение коэффициентов φ и ψ
# Потери в сопловом аппарате второй ступени
# 1. Определим коэффициент потерь от трения в сопловом аппарате в зависимости от направления потока.
# Примем
α_0 := 90
k := sin(α_0*deg)/sin(α_12*deg) explicit, ALL → sin(90*deg)/sin(18.327*deg) = 3.18028
# Принимаем
ξ_тр.с := 0.01
# 2. Проверим необходимость учета влияния шероховатости:
# Зададим удлинение сопловых лопаток:
# Длина хорды сопловой лопатки:
b_c := 0.05*m explicit, ALL → 0.05*m = 0.05 m
μ := 13.2*10^-6*Pa*s
Re_c := c_11*b_c*P_11/(R_г*T_11)/μ explicit, ALL → 674.783*m*s^-1*0.05*m*1.069*10^6*Pa/(290*J/(kg*K)*1.392*10^3*K)/(13.2*10^-6*Pa*s) = 6766437
# Учет шероховатости не требуется.
# 3. Определим кромочные потери:
t_bc := 0.75
s_c := 1*10^-3*m
t_c := t_bc*b_c explicit, ALL → 0.75*0.05*m = 0.0375 m
ξ_кр.с := 0.2*s_c/(t_c*sin(α_12*deg)) explicit, ALL → 0.2*10^-3*m/(0.038*m*sin(18.327*deg)) = 0.0169615
# 4. Определим коэффициент профильных потерь:
ξ_пр.с := ξ_тр.с + ξ_кр.с explicit, ALL → 0.01 + 0.017 = 0.0269615
# 5. Определим число Маха на выходе из соплового аппарата:
M_1 := c_12/sqrt(k_г*R_г*T_12) explicit, ALL → 558.432*m*s^-1/sqrt(1.315*290*J/(kg*K)*1.234*10^3*K) = 0.814049
# Течение дозвуковое. Учетволновых потерь не требуется.
# 6. Определим учет концевых потерь.
ξ_к.с := 2*ξ_тр.с*t_c*sin(α_12*deg)/l_с2 explicit, ALL → 2*0.01*0.038*m*sin(18.327*deg)/(0.133*m) = 0.00177315
# 7. Определим коэффициент потерь в сопловом аппарате:
ξ_с := ξ_пр.с + ξ_к.с explicit, ALL → 0.027 + 1.773*10^-3 = 0.0287346
# 8. Определим коэффициент скорости в сопловом аппарате:
φ := sqrt(1 - ξ_с) explicit, ALL → sqrt(1 - 0.029) = 0.985528
# Потери в рабочих лопатках
# 1. Определим коэффициент потерь от трения в рабочих в зависимости от направления потока.
k := sin(β_12*deg)/sin(β_22*deg) explicit, ALL → sin(49.384*deg)/sin(21.704*deg) = 2.0526
# Принимаем
ξ_тр.л := 0.02
# 2. Проверим необходимость учета влияния шероховатости:
# Длина хорды рабочей лопатки:
b_л := 0.045*m explicit, ALL → 0.045*m = 0.045 m
μ := 13.2*10^-6*Pa*s
Re_л := w_21*b_л*P_21/(R_г*T_21)/μ explicit, ALL → 467.89*m*s^-1*0.045*m*8.945*10^5*Pa/(290*J/(kg*K)*1.344*10^3*K)/(13.2*10^-6*Pa*s) = 3661377
# Учет шероховатости не требуется.
# 3. Определим коэффициент профильных потерь:
t_b := 0.75
s_c := 1*10^-3*m
t_л := t_b*b_л explicit, ALL → 0.75*0.045*m = 0.03375 m
ξ_кр.л := 0.2*s_c/(t_л*sin(β_22*deg)) explicit, ALL → 0.2*10^-3*m/(0.034*m*sin(21.704*deg)) = 0.0160239
# 4. Определим кромочные потери:
ξ_пр.л := ξ_тр.л + ξ_кр.л explicit, ALL → 0.02 + 0.016 = 0.0360239
# 5. Определим число Маха на выходе из рабочей лопатки:
M_2 := w_22/sqrt(k_г*R_г*T_22) explicit, ALL → 439.674*m*s^-1/sqrt(1.315*290*J/(kg*K)*1.182*10^3*K) = 0.654975
# Течение дозвуковое. Учетволновых потерь не требуется.
# 6. Определим учет концевых потерь.
ξ_к.л := 2*ξ_тр.л*t_л*sin(β_22*deg)/l_л2 explicit, ALL → 2*0.02*0.034*m*sin(21.704*deg)/(0.164*m) = 0.00304423
# 7. Определим коэффициент потерь в рабочей лопатке:
ξ_л := ξ_пр.л + ξ_к.л explicit, ALL → 0.036 + 3.044*10^-3 = 0.0390681
# 8. Определим коэффициент скорости в рабочей лопатке:
ψ := sqrt(1 - ξ_л) explicit, ALL → sqrt(1 - 0.039) = 0.980271
