# Задание
# Рассчитать цикл газотурбинной установки, выбрать оптимальную степень повышения давления в цикле. Для полученных значений рассчитать и спроектировать турбину высокого давления.
# Исходные данные:
N_e := 32*10^6  # Вт
T*_а := 288  # К
T*_г := 1473  # К
p*_а := 101300  # Па
p_а := p*_а
# Выбор исходных значений КПД и коэффициентов, характеризующих потери по тракту установки:
# Коэффициент полного давления при входе:
σ_вх := 0.99
# Коэффициент полноты горения:
η_г := 0.99
# Коэффициент полного давления в камере сгорания:
σ_г := 0.99
# КПД турбин по параметрам торможения:
η*_т1 := 0.90
η_т2 := 0.87
# Механический КПД:
η_м := 0.99
# Коэффициент полного давления:
σ_вых := 0.99
# Низшая рабочая теплота сгорания топлива (Ставропольский природный газ):
Q_н := 48800*10^3  # Дж/кг
# Политропный КПД компрессора:
η*_к.п := 0.91
# Политроный КПД турбины:
η*_т.п := 0.9
# Лопаточный КПД турбины:
η_л := 0.9
# Параметры газа по тракту ГТУ:
# Параметры на входе в компрессор:
R_в := 287.4  # Дж/(кг*К)
k_в := 1.4
T*_в := T*_а = 288  # К
p*_в := p*_а*σ_вх = 100287  # Па
# Параметры компрессора:
# Отношение температур:
ν := T*_г/T*_а explicit, ALL → 1.473*10^3/288 = 5.11458
# Ряд возможных диапозонов изменений степени повышения давления компрессора:
π*_к := 6, 9 .. 45
# Давление за компрессором:
p*_к(π*_к) := p*_а*σ_вх*π*_к
# КПД компрессора через политропический КПД:
η*_к(π*_к) := (π*_к^((k_в - 1)/k_в) - 1)/(π*_к^((k_в - 1)/(k_в*η*_к.п)) - 1)
# Температура за компрессором:
C_pви(T) :=
    (0.2407 + 0.0193*(2.5*10^-3*T - 0.875) + 2.0*10^-3*(2.5*10^-5*T^2 - 0.0275*T + 6.5625))*4187 if T < 750
    (0.26 + 0.032*(1.176*10^-3*T - 0.88235) - 0.374*10^-2*(5.5556*10^-6*T^2 - 1.3056*10^-2*T + 6.67))*4187 if T ≥ 750
T*_к(π*_к) := T*_а*(1 + (π*_к^((k_в - 1)/k_в) - 1)/η*_к(π*_к))
# Значения истинной теплоёмкости по средней температуре:
C_pв(π*_к) := C_pви((T*_к(π*_к) + T*_а)/2)
k_в(π*_к) := C_pв(π*_к)/(C_pв(π*_к) - R_в)
# КПД компрессора через политропический КПД:
η*_к(π*_к) := (π*_к^((k_в(π*_к) - 1)/k_в(π*_к)) - 1)/(π*_к^((k_в(π*_к) - 1)/(k_в(π*_к)*η*_к.п)) - 1)
# Температура за компрессором:
T*_к(π*_к) := T*_а*(1 + (π*_к^((k_в(π*_к) - 1)/k_в(π*_к)) - 1)/η*_к(π*_к))
# Удельная работа компрессора:
L_к(π*_к) := R_в*k_в(π*_к)/(k_в(π*_к) - 1)*T*_а*(π*_к^((k_в(π*_к) - 1)/k_в(π*_к)) - 1)/η*_к(π*_к)
# Степень понижения давления турбин:
# Давление газа перед турбиной:
p*_г(π*_к) := p*_к(π*_к)*σ_г
# Статическое давление за силовой турбиной:
p_т := p_а/σ_вых = 102323
# Степень понижения давления обоих турбин:
C_pги(T, α) :=
    ((0.0174/α + 0.2407) + (0.0093/α + 0.0193)*(2.5*10^-3*T - 0.875) + (2.0*10^-3 - 1.056*10^-3/(α - 0.2))*(2.5*10^-5*T^2 - 0.0275*T + 6.5625))*4187 if T < 750
    ((0.0267/α + 0.26) + (0.0133/α + 0.032)*(1.176*10^-3*T - 0.88235) - (0.94*10^-2/(α^2 + 10) + 0.374*10^-2)*(5.5556*10^-6*T^2 - 1.3056*10^-2*T + 6.67))*4187 if T ≥ 750
π_т(π*_к) := p*_г(π*_к)/p_т
# Коэффициент избытка воздуха, параметры расхода, истинный показатель адиабаты:
l_0 := 16.85
C_pсчп(T) :=
    (3.45/10^5*(T - 70) + 0.236)*4187 if T < 700
    (3.45/10^5*(T + 450) + 0.218)*4187 if T ≥ 700
C_pсв(T) :=
    (1.2/10^5*(T - 70) + 0.236)*4187 if T < 700
    (2.2/10^5*(T + 450) + 0.218)*4187 if T ≥ 700
# В первом приближении примем | Теплоемкость, Дж/кг*К:
k_г := 1.33
R_г := 289.3  # Дж/(кг*К)
C_pг := k_г*R_г/(k_г - 1) = 1165.97
# Относительный расход топлива:
C_pсчп(650) = 1071.91
1165.97
g_m(π*_к) := (C_pсв(T*_г)*T*_г - C_pсв(T*_к(π*_к))*T*_к(π*_к))/(Q_н*η_г - (1 + l_0)*(C_pсчп(T*_г)*T*_г - C_pсчп(288)*288) + l_0*(C_pсв(T*_г)*T*_г - C_pсв(288)*288))
# Коэффициент избытка воздуха:
c_pgm(T, α) := C_pсв(T) + (1 + l_0)/(1 + α*l_0)*(C_pсчп(T) - C_pсв(T))
α_Σ(π*_к) := 1/(g_m(π*_к)*l_0)
# Относительный расход газа:
# Утечки:
g_ут := 0.007
# Относительный расход воздуха на охлаждение:
g_охл := 0.05
g_т(π*_к) := (1 + g_m(π*_к))*(1 - g_ут - g_охл)
# Статическая температура за турбинами , К
T_т(π*_к) := T*_г*(1 - (1 - π_т(π*_к)^((1 - k_г)/k_г))*η_л)
# Истинный показатель адиабаты:
# Средняя температура процесса расширения:
T_ср(π*_к) := (T_т(π*_к) + T*_г)/2
C_pг(π*_к) := C_pги(T_ср(π*_к), α_Σ(π*_к))
k_г(π*_к) := C_pг(π*_к)/(C_pг(π*_к) - R_г)
# Статическая температура за турбинами , К
T_т(π*_к) := T*_г*(1 - (1 - π_т(π*_к)^((1 - k_г(π*_к))/k_г(π*_к)))*η_л)
# КПД турбины
η*_т(π*_к) := (1 - π_т(π*_к)^((1 - k_г(π*_к))/k_г(π*_к)*η*_т.п))/(1 - π_т(π*_к)^((1 - k_г(π*_к))/k_г(π*_к)))
C_pг(π*_к)
k_г(π*_к)
# Удельная работа турбин, Дж/кг:
L_т(π*_к) := C_pг(π*_к)*T*_г*(1 - π_т(π*_к)^((1 - k_г(π*_к))/k_г(π*_к)))*η*_т(π*_к)
# Удельная мощность установки:
g_воз := 0.04
N_е.уд(π*_к) := (L_т(π*_к)*((1 + g_m(π*_к))*(1 - g_ут - g_охл) + g_воз)*η_м - L_к(π*_к))
# Расход воздуха, кг/с
G_в(π*_к) := N_e/N_е.уд(π*_к)
# Расход газа при входе в турбину
G_г(π*_к) := (1 + g_m(π*_к))*(1 - g_ут - g_охл)*G_в(π*_к)
# Удельный расход топлива, кг/(кВт*ч)
C_e(π*_к) := g_m(π*_к)*(1 - g_ут - g_охл)*3600*1000/N_е.уд(π*_к)
# КПД установки
η_e(π*_к) := 3600*1000/(C_e(π*_к)*Q_н)
# Результаты расчёта для ряда значений степени повышения давления в компрессоре
π*_к = [6; 9; 12; 15; 18; 21; 24; 27; 30; 33; 36; 39; 42; 45]
p*_к(π*_к) = [601722; 902583; 1203444; 1504305; 1805166; 2106027; 2406888; 2707749; 3008610; 3309471; 3610332; 3911193; 4212054; 4512915]
η*_к(π*_к) = [0.885458; 0.879623; 0.875458; 0.872226; 0.869592; 0.867373; 0.86546; 0.863782; 0.86229; 0.86095; 0.859734; 0.858623; 0.857602; 0.856659]
T*_к(π*_к) = [503.277; 569.13; 620.215; 662.371; 698.45; 730.079; 758.288; 783.774; 807.031; 828.425; 848.236; 866.683; 883.941; 900.15]
L_к(π*_к) = [218247; 286408; 339875; 384441; 422934; 456974; 487584; 515455; 541083; 564831; 586979; 607745; 627303; 645795]
p*_г(π*_к) = [595705; 893557; 1191410; 1489262; 1787114; 2084967; 2382819; 2680672; 2978524; 3276376; 3574229; 3872081; 4169933; 4467786]
π_т(π*_к) = [5.82179; 8.73269; 11.6436; 14.5545; 17.4654; 20.3763; 23.2872; 26.1981; 29.109; 32.0199; 34.9308; 37.8417; 40.7526; 43.6635]
g_m(π*_к) = [0.0246811; 0.0231427; 0.0219425; 0.0209477; 0.0200931; 0.0193386; 0.0186461; 0.0180176; 0.0174417; 0.01691; 0.0164159; 0.0159544; 0.0155213; 0.0151135]
α_Σ(π*_к) = [2.40456; 2.5644; 2.70467; 2.83312; 2.95361; 3.06884; 3.18282; 3.29384; 3.4026; 3.50959; 3.61523; 3.71981; 3.82359; 3.92677]
g_т(π*_к) = [0.966274; 0.964824; 0.963692; 0.962754; 0.961948; 0.961236; 0.960583; 0.959991; 0.959448; 0.958946; 0.95848; 0.958045; 0.957637; 0.957252]
T_т(π*_к) = [1027.11; 944.292; 889.518; 849.21; 817.639; 791.873; 770.208; 751.603; 735.354; 720.97; 708.096; 696.467; 685.882; 676.181]
L_т(π*_к) = [564989; 666822; 733435; 782033; 819823; 850467; 876062; 897928; 916934; 933685; 948618; 962055; 974244; 985378]
η*_т(π*_к) = [0.917421; 0.921309; 0.924032; 0.926123; 0.927817; 0.929239; 0.930463; 0.931536; 0.93249; 0.93335; 0.934131; 0.934846; 0.935505; 0.936116]
N_е.уд(π*_к) = [344601; 376930; 388906; 391903; 390271; 386029; 380224; 373485; 366180; 358543; 350725; 342828; 334920; 327048]
G_в(π*_к) = [92.861; 84.8964; 82.2822; 81.6528; 81.9943; 82.8952; 84.1609; 85.6795; 87.3886; 89.2501; 91.2396; 93.3414; 95.5453; 97.8449]
G_г(π*_к) = [89.7292; 81.91; 79.2946; 78.6115; 78.8743; 79.6819; 80.8436; 82.2515; 83.8448; 85.586; 87.4513; 89.4252; 91.4977; 93.6622]
C_e(π*_к) = [0.243143; 0.208433; 0.191539; 0.181456; 0.174781; 0.170067; 0.16648; 0.163772; 0.1617; 0.160109; 0.158896; 0.157986; 0.157327; 0.15688]
η_e(π*_к) = [0.303404; 0.353929; 0.385147; 0.406548; 0.422074; 0.433774; 0.443118; 0.450447; 0.456219; 0.460751; 0.46427; 0.466944; 0.4689; 0.470236]
# Зависимости расхода воздуха, эффективного КПД ГТУ и удельного расхода топлива от степени повышения давления.
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кг/с
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# кг/(кВт*ч) | Вт/кг
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# Параметры турбины привода компрессора:
# Давление торможения за турбиной привода компрессора:
p*_тк(π*_к) := p*_г(π*_к)*(1 - L_к(π*_к)/(R_г*k_г(π*_к)/(k_г(π*_к) - 1)*T*_г*η*_т1*η_м*g_т(π*_к)))^(k_г(π*_к)/(k_г(π*_к) - 1))
# Степень понижения давления турбины привода компрессора:
π*_тк(π*_к) := p*_г(π*_к)/p*_тк(π*_к)
# Температура за турбиной привода компрессора:
T*_тк(π*_к) := T*_г*(1 - (1 - π*_тк(π*_к)^((1 - k_г(π*_к))/k_г(π*_к)))*η*_т1)
# Работа турбины привода компрессора:
L_тк(π*_к) := R_г*k_г(π*_к)/(k_г(π*_к) - 1)*T*_г*(1 - π*_тк(π*_к)^((1 - k_г(π*_к))/k_г(π*_к)))*η*_т1
# Параметры силовой турбины:
# Степень понижения давления силовой турбины:
π_тс(π*_к) := p*_тк(π*_к)/p_т
# Работа силовой турбины:
L_тс(π*_к) := R_г*k_г(π*_к)/(k_г(π*_к) - 1)*T*_тк(π*_к)*(1 - π_тс(π*_к)^((1 - k_г(π*_к))/k_г(π*_к)))*η*_т1
# Параметры газа по тракту ГТУ для оптимальной степени повышения давления:
# Оптимальная степень повышения давления:
π*_к := 20
k_в1 := 1.386
# Параметры компрессора:
# Давление за компрессором:
p*_к := p*_а*σ_вх*π*_к = 2005740  # Па
# КПД компрессора через политропический КПД:
η*_к := (π*_к^((k_в1 - 1)/k_в1) - 1)/(π*_к^((k_в1 - 1)/(k_в1*η*_к.п)) - 1) explicit, ALL → (20^((1.386 - 1)/1.386) - 1)/(20^((1.386 - 1)/(1.386*0.91)) - 1) = 0.868044
# Температура за компрессором:
T*_к := T*_а*(1 + (π*_к^((k_в1 - 1)/k_в1) - 1)/η*_к) explicit, ALL → 288*(1 + (20^((1.386 - 1)/1.386) - 1)/0.868) = 720.384  # К
# Удельная работа компрессора:
L_к := R_в*k_в1/(k_в1 - 1)*T*_а*(π*_к^((k_в1 - 1)/k_в1) - 1)/η*_к explicit, ALL → 287.4*1.386/(1.386 - 1)*288*(20^((1.386 - 1)/1.386) - 1)/0.868 = 446202  # Дж/кг
# Степень понижения давления турбин:
# Давление газа перед турбиной:
p*_г := p*_к*σ_г = 1985683  # Па
# Статическое давление за силовой турбиной:
p_т := p_а/σ_вых = 102323  # Па
# Степень понижения давления обоих турбин:
π_т := p*_г/p_т = 19.406
# Коэффициент избытка воздуха:
α_г := 2.997
# Средняя удельная теплоемкость чистых продуктов сгорания керосина:
# При температуре за камерой сгорания
c_pгс1 := 1.191*10^3  # Дж/(кг*К)
C_pсчп(288) = 1019.62
# При температура калориметрирования
c_pгс2 := 1.02*10^3  # Дж/(кг*К)
# Средняя удельная теплоемкость воздуха:
C_pсв(T*_г) = 1089.9
# При температуре за камерой сгорания
C_pсв(T*_к) = 1020.57
c_pвс1 := 1.09*10^3  # Дж/(кг*К)
C_pсв(288) = 999.085
# При температуре за компрессором
c_pвс2 := 1.021*10^3  # Дж/(кг*К)
# При температура калориметрирования
c_pвс3 := 999.085  # Дж/(кг*К)
# Коэффициент удельного расхода топлива:
g_m := (c_pвс1*T*_г - c_pвс2*T*_к)/(Q_н*η_г - (1 + l_0)*(c_pгс1*T*_г - c_pгс2*288) + l_0*(c_pвс1*T*_г - c_pвс3*288)) = 0.0195756
# Относительный расход газа:
# Утечки:
g_ут := 0.007
# Относительный расход воздуха на охлаждение:
g_охл := 0.05
g_т := (1 + g_m)*(1 - g_ут - g_охл) = 0.96146
# Истинная удельная теплоёмкость продуктов сгорания:
C_pг := C_pг(20) = 1210.64  # Дж/(кг*К)
# Истинный показатель адиабаты:
k_г := k_г(20) = 1.314
# Статическая температура за турбинами
T_т := T*_г*(1 - (1 - π_т^((1 - k_г)/k_г))*η_л) explicit, ALL → 1.473*10^3*(1 - (1 - 19.406^((1 - 1.314)/1.314))*0.9) = 799.943  # К
# Удельная работа турбин:
L_т := C_pг*T*_г*(1 - π_т^((1 - k_г)/k_г))*η_л explicit, ALL → 1.211*10^3*1.473*10^3*(1 - 19.406^((1 - 1.314)/1.314))*0.9 = 814833  # Дж/кг
# Удельная мощность установки:
g_воз := 0.04
N_е.уд := (L_т*((1 + g_m)*(1 - g_ут - g_охл) + g_воз)*η_м - L_к) = 361660  # Вт/кг
# Расход воздуха
G_в := N_e/N_е.уд explicit, ALL → 32*10^6/(3.617*10^5) = 88.4809  # кг/с
# Расход газа при входе в турбину
G_г := (1 + g_m)*(1 - g_ут - g_охл)*G_в explicit, ALL → (1 + 0.02)*(1 - 7*10^-3 - 0.05)*88.481 = 85.0709  # кг/с
# Удельный расход топлива
C_e := g_m*(1 - g_ут - g_охл)*3600*1000/N_е.уд explicit, ALL → 0.02*(1 - 7*10^-3 - 0.05)*3.6*10^3*1*10^3/(3.617*10^5) = 0.183751  # кг/(кВт*ч)
# КПД установки
η_e := 3600*1000/(C_e*Q_н) explicit, ALL → 3.6*10^3*1*10^3/(0.184*4.88*10^4*10^3) = 0.401471
# Параметры турбины привода компрессора:
# Давление торможения за турбиной привода компрессора:
p*_тк := p*_г*(1 - L_к/(C_pг*T*_г*η*_т1*η_м*g_т))^(k_г/(k_г - 1)) explicit, ALL → 1.986*10^6*(1 - 4.462*10^5/(1.211*10^3*1.473*10^3*0.9*0.99*0.961))^(1.314/(1.314 - 1)) = 467875
p*_тк = 467875  # Па
# Степень понижения давления турбины привода компрессора:
π*_тк := p*_г/p*_тк explicit, ALL → 1.986*10^6/(4.679*10^5) = 4.24405
# Температура за турбиной привода компрессора:
T*_тк := T*_г*(1 - (1 - π*_тк^((1 - k_г)/k_г))*η*_т1) explicit, ALL → 1.473*10^3*(1 - (1 - 4.244^((1 - 1.314)/1.314))*0.9) = 1085.79  # К
# Работа турбины привода компрессора:
L_тк := C_pг*T*_г*(1 - π*_тк^((1 - k_г)/k_г))*η*_т1 explicit, ALL → 1.211*10^3*1.473*10^3*(1 - 4.244^((1 - 1.314)/1.314))*0.9 = 468776  # Дж/кг
# Параметры силовой турбины:
# Степень понижения давления силовой турбины:
π_тс := p*_тк/p_т explicit, ALL → 4.679*10^5/(1.023*10^5) = 4.57252
# Работа силовой турбины:
L_тс := C_pг*T*_тк*(1 - π_тс^((1 - k_г)/k_г))*η*_т1 explicit, ALL → 1.211*10^3*1.086*10^3*(1 - 4.573^((1 - 1.314)/1.314))*0.9 = 360335  # Дж/кг
# Определение частоты вращения при заданной необходимой удельной работе турбины:
# Зададимся осевой скоростью:
с_т.а := 250  # м/c
# Располагаемый теплоперепад:
Н_т := (L_тк + с_т.а^2/2)/η_л explicit, ALL → (4.688*10^5 + 250^2/2)/0.9 = 555585  # Дж/кг
# Показатель аддиабаты:
k_г = 1.314
# Средняя удельная теплоемкость:
C_pг = 1210.64  # Дж/(кг*К)
# Температура за турбиной:
Т_т := T*_г - Н_т*η_л/C_pг = 1059.98  # К
# Статическое давление за турбиной:
p_т := p*_г*(1 - Н_т/(C_pг*T*_г))^(k_г/(k_г - 1)) = 416335  # Па
# Степень понижения давления:
π_т := p*_г/p_т = 4.76944
# Удельный обьем:
v_t := R_г*Т_т/p_т = 0.736549
# Площадь кольцевого сечения:
А_т := G_г*v_t/с_т.а = 0.250635  # м^2
# Допустимые напряжения растяжения в рабочих лопатках:
σ_л := 350  # МПа
к_з := 1.25
σ_л := σ_л/к_з = 280  # МПа
# Коэффициент пропорциональности k_n :
k_n := 6.8*10^-6
# Максимальная частота вращения:
# Частота вращения
n_т.max := sqrt(σ_л/(k_n*А_т)) = 12817.5  # об/мин
n_т := 9800  # об/мин
# Основные размеры многоступенчатой турбины
# Профиль меридионального сечения турбины D_т=const
# Относительная длина рабочей лопатки последней ступени
l_отн := 1/8
# Средний диаметр последней ступени
D_т := sqrt(А_т/(π*l_отн)) = 0.798898  # м
# Длина лопатки на диаметре
l_л := А_т/(π*D_т) = 0.0998622  # м
# Окружная скорость на диаметре D_т
U_т := π*D_т*n_т/60 = 409.936  # м/c^2
# Средний диаметр при выходе из СА первой ступени:
n_тк := n_т/60
D_1 := D_т = 0.798898  # м
# Окружная скорость на диаметре D_1:
U_1 := π*D_1*n_тк explicit, ALL → π*0.799*9.8*10^3/60 = 409.936  # м/c^2
# Средняя окружная скорость по турбине:
U_ср := U_т = 409.936  # м/c^2
# Оптимальное отношения для выбранной степени реактивности:
y_0 := 0.55
# Условная адиабатная скорость:
С_0 := sqrt(2*Н_т) = 1054.12
# Средняя скорость за ступенями:
C_2ср := 250  # м/с
# Коэффициент использования скорости:
μ := 1
# Число ступеней:
z := (С_0^2/(μ*C_2ср)^2 - 1)/(U_ср^2/((μ*C_2ср)^2*y_0^2) - 1) explicit, ALL → ((1.054*10^3)^2/250^2 - 1)/(409.936^2/(250^2*0.55^2) - 1) = 2.12699
z := 2
# Выбираем число ступеней турбины - 2
# Коэффициент возврата теплоты;
α := (z - 1)/(2*z)*(π_т^((k_г - 1)/k_г) - 1)*(1 - η_л) = 0.0113136
C_21 := 175
# Теплоперепад на первой  ступени:
H_01 := Н_т*(1 + α)*2*0.5/2 + ((μ*C_21)^2)/2 explicit, ALL → 5.556*10^5*(1 + 0.011)*2*0.5/2 + 175^2/2 = 296248
H_01 = 296248  # Дж/кг
# Распределение степеней пеактивности по ступеням:
ρ_1 := 0.35
# Располагаемый теплоперепад в СА первой ступени
H_с1 := H_01*(1 - ρ_1) explicit, ALL → 2.962*10^5*(1 - 0.35) = 192561  # Дж/кг
# Угол потока за СА 1-й ступени:
α_11 := 17 deg
# Скорость за СА 1-ой ступени:
φ_1 := 0.967
c_11 := φ_1*sqrt(2*H_с1) explicit, ALL → 0.967*sqrt(2*1.926*10^5) = 600.103  # м/с
c_1а := c_11*sin(α_11) explicit, ALL → 600.103*sin(17*deg) = 175.453  # м/с
# Температура за CA 1-ой ступени:
T_c1 := T*_г - H_с1*φ_1^2/C_pг explicit, ALL → 1.473*10^3 - 1.926*10^5*0.967^2/(1.211*10^3) = 1324.27  # К
T_c1 = 1324.27  # К
# Давление за СА 1-ой ступенью:
p_c1 := p*_г*(1 - H_с1/(C_pг*T*_г))^(k_г/(k_г - 1)) explicit, ALL → 1.986*10^6*(1 - 1.926*10^5/(1.211*10^3*1.473*10^3))^(1.314/(1.314 - 1)) = 1230942  # Па
# Удельный объём газа за турбиной:
ν_c1 := R_г*T_c1/p_c1 explicit, ALL → 289.3*1.324*10^3/(1.231*10^6) = 0.311234  # м^3/кг
# Длина на выходе сопловой лопатки 1-ой ступени:
l_c1 := G_г*ν_c1/(sin(α_11)*D_т*π*c_11) explicit, ALL → 85.071*0.311/(sin(17*deg)*0.799*π*600.103) = 0.0601264  # м
# Длины рабочих и сопловых лопаток по ступеням:
l_л1 := 0.065  # м
l_c1 = 0.0601264  # м
l_л2 := l_л = 0.0998622  # м
l_c2 := 0.08  # м
# Ширина рабочей лопатки по ступеням:
b_л1 := l_л1/1.8 explicit, ALL → 0.065/1.8 = 0.0361111  # м
b_л2 := l_л2/2 explicit, ALL → 0.1/2 = 0.0499311  # м
# Ширина сопловой лопатки:
b_с1 := 1.2*b_л1 = 0.0433333  # м
b_с2 := 1.2*b_л2 = 0.0599173  # м
# Осевой зазор за сопловыми  лопатками по ступеням:
δ_ас1 := 0.25*b_с1 = 0.0108333  # м
δ_ас2 := 0.2*b_с2 = 0.0119835  # м
# Осевой зазор за рабочими  лопатками по ступеням:
δ_ал1 := 0.25*b_л1 = 0.00902778  # м
δ_ал2 := 0.2*b_л2 = 0.00998622  # м
# Поступенчатый расчет турбины
# Первая ступень турбины:
# Располагаемый теплоперепад первой ступени:
H_01 = 296248  # Дж/кг
# Степень реактивности:
ρ_1 = 0.35
# Располагаемый теплоперепад в СА:
H_11 := H_01*(1 - ρ_1) explicit, ALL → 2.962*10^5*(1 - 0.35) = 192561  # Дж/кг
# Коэффициент скорости:
φ_1 = 0.967
# Скорость за СА 1-ой ступени:
c_11 = 600.103  # м/c
# Приведённая скорость:
λ_СА1 := c_11/sqrt(2*k_г/(k_г + 1)*R_г*T*_г) explicit, ALL → 600.103/sqrt(2*1.314/(1.314 + 1)*289.3*1.473*10^3) = 0.862619
# Окружная составляющая скорости за СА первой ступени:
c_11u := c_11*cos(α_11) explicit, ALL → 600.103*cos(17*deg) = 573.881  # м/с
# Температура за СА:
T_11 := T*_г - H_11*φ_1^2/C_pг explicit, ALL → 1.473*10^3 - 1.926*10^5*0.967^2/(1.211*10^3) = 1324.27  # К
# Температура в конце адиабатного расширения в СА:
T'_11 := T*_г - H_11/C_pг explicit, ALL → 1.473*10^3 - 1.926*10^5/(1.211*10^3) = 1313.94  # К
# Давление перед рабочими лопатками:
p_11 := p*_г*(T'_11/T*_г)^(k_г/(k_г - 1)) explicit, ALL → 1.986*10^6*(1.314*10^3/(1.473*10^3))^(1.314/(1.314 - 1)) = 1230942  # Па
# Кольцевая площадь сечения перед рабочими лопатками:
А_11 := π*D_1*l_c1 explicit, ALL → π*0.799*0.06 = 0.150906  # м^2
# Удельный объем перед рабочими лопатками:
ν_11 := R_г*T_11/p_11 explicit, ALL → 289.3*1.324*10^3/(1.231*10^6) = 0.311234  # м^3/кг
# Осевая скорость перед рабочими лопатками:
с_11а := c_1а = 175.453  # м/с
# Относительная скорость при входе в рабочие лопатки:
w_11 := sqrt(c_11^2 + U_т^2 - 2*c_11*U_т*cos(α_11)) explicit, ALL → sqrt(600.103^2 + 409.936^2 - 2*600.103*409.936*cos(17*deg)) = 240.129  # м/с
# Угол входа потока на рабочие лопатки:
β_11 := atan(с_11а/(c_11*cos(α_11) - U_т))/deg explicit, ALL → atan(175.453/(600.103*cos(17*deg) - 409.936))/deg = 46.942
# Располагаемый теплоперепад в РК:
U_т = 409.936
Н_12 := ρ_1*H_01*T_11/T'_11 explicit, ALL → 0.35*2.962*10^5*1.324*10^3/(1.314*10^3) = 104501  # Дж/кг
# Окружная скорость при входе на рабочие лопатки:
T_11/T'_11 = 1.00786
u_1 := U_т = 409.936  # м/с
# Диаметр на входе из рабочих лопаток
D_2 := D_1 - 0 = 0.798898  # м
# Окружная скорость на выходе из рабочих лопаток:
u_2 := π*D_2*n_т/60 explicit, ALL → π*0.799*9.8*10^3/60 = 409.936  # м/с
# Коэффициент скорости в рабочих лопатках:
ψ_1 := 0.955
# Относиельная скорость за рабочими лопатками:
w_12 := ψ_1*sqrt(w_11^2 + 2*Н_12 + u_2^2 - u_1^2) explicit, ALL → 0.955*sqrt(240.129^2 + 2*1.045*10^5 + 409.936^2 - 409.936^2) = 493.158  # м/с
# Температура за рабочими лопатками:
T_12 := T_11 - (w_12^2 - w_11^2 - u_2^2 + u_1^2)/(2*C_pг) explicit, ALL → 1.324*10^3 - (493.158^2 - 240.129^2 - 409.936^2 + 409.936^2)/(2*1.211*10^3) = 1247.64
К
# Температура к конце адиабатного расширения в рабочих лопатках:
T'_12 := T_11 - Н_12/C_pг explicit, ALL → 1.324*10^3 - 1.045*10^5/(1.211*10^3) = 1237.95  # К
# Давление за рабочими лопатками:
p_12 := p_11*(T'_12/T_11)^(k_г/(k_г - 1)) explicit, ALL → 1.231*10^6*(1.238*10^3/(1.324*10^3))^(1.314/(1.314 - 1)) = 928405  # Па
# Удельный объем за рабочими лопатками:
ν_12 := R_г*T_12/p_12 explicit, ALL → 289.3*1.248*10^3/(9.284*10^5) = 0.388776  # м^3/кг
# Площадь кольцевого сечения за рабочими лопатками:
А_12 := π*D_2*l_л1 explicit, ALL → π*0.799*0.065 = 0.163138  # м^2
# Осевая скорость за рабочими лопатками:
с_12а := G_г*ν_12/А_12 explicit, ALL → 85.071*0.389/0.163 = 202.734  # м/с
# Угол выхода потока из рабочих лопаток:
β_12 := asin(с_12а/w_12)/deg explicit, ALL → asin(202.734/493.158)/deg = 24.2735
# Скорость закрутки потока за рабочими лопатками:
с_12u := w_12*cos(β_12*deg) - u_2 explicit, ALL → 493.158*cos(24.273*deg) - 409.936 = 39.6238  # м/с
# Угол выхода потока из рабочих лопаток:
α_12 := atan(с_12а/с_12u)/deg explicit, ALL → atan(202.734/39.624)/deg = 78.9411
# Скорость газа за рабочими лопатками:
с_12 := sqrt(с_12а^2 + с_12u^2) explicit, ALL → sqrt(202.734^2 + 39.624^2) = 206.57  # м/с
# Работа на окружности РК:
L_1u := u_1*с_12u + c_11u*u_2 explicit, ALL → 409.936*39.624 + 573.881*409.936 = 251498  # Дж/кг
# Параметры треугольника скоростей первой ступени
с_11а = 175.453
с_12а = 202.734
c_11u = 573.881
с_12u = 39.6238
c_11 = 600.103
с_12 = 206.57
α_11 = 17 deg
α_12 = 78.9411
β_11 = 46.942
β_12 = 24.2735
# КПД на окружности РК:
η_1u := L_1u/H_01 explicit, ALL → 2.515*10^5/(2.962*10^5) = 0.848944
# Удельные параметры за СА:
h_1c := (φ_1^-2 - 1)*c_11^2/2 explicit, ALL → (0.967^-2 - 1)*600.103^2/2 = 12499.3  # Дж/кг
# То же, с учетом их использования в РК:
h'_1c := h_1c*T'_12/T_11 explicit, ALL → 1.25*10^4*1.238*10^3/(1.324*10^3) = 11684.6  # Дж/кг
# Относительные потери в СА:
ξ_1с := h_1c/H_01 explicit, ALL → 1.25*10^4/(2.962*10^5) = 0.0421922
# То же, с учетом их использования в рабочих лопатках:
ξ'_1c := ξ_1с*T'_12/T_11 explicit, ALL → 0.042*1.238*10^3/(1.324*10^3) = 0.039442
# Удельные потери в рабочих лопатках:
h_1л := (ψ_1^-2 - 1)*w_12^2/2 explicit, ALL → (0.955^-2 - 1)*493.158^2/2 = 11729.9  # Дж/кг
# Относительные потери в рабочих лопатках:
ξ_1л := h_1л/H_01 explicit, ALL → 1.173*10^4/(2.962*10^5) = 0.0395949
# Удельные потери с выходной скоростью:
h_1в := с_12^2/2 explicit, ALL → 206.57^2/2 = 21335.5  # Дж/кг
# Относительные потери с выходной скоростью:
ξ_1в := h_1в/H_01 explicit, ALL → 2.134*10^4/(2.962*10^5) = 0.0720191
# КПД на окружности РК:
η_1u := 1 - ξ'_1c - ξ_1л - ξ_1в explicit, ALL → 1 - 0.039 - 0.04 - 0.072 = 0.848944
# Радиальный зазор между корпусом и сопловыми лопатками:
δ_1с := 0.8*10^-3 = 0.0008  # м
# Радиальный зазор между корпусом и рабочими лопатками:
δ_1л := 0.8*10^-3 = 0.0008  # м
# Удельные потери в радиальном зазоре:
h_1з := 1.37*(1 + 1.6*ρ_1)*(1 + l_л1/D_т)*δ_1л/l_л1*L_1u = 7153.64  # Дж/кг
# Относительные потери в радиальном зазоре:
ξ_1з := h_1з/H_01 explicit, ALL → 7.154*10^3/(2.962*10^5) = 0.0241475
# Удельная работа ступени с учетом потери в радиальном зазоре:
L_uз := L_1u - h_1з explicit, ALL → 2.515*10^5 - 7.154*10^3 = 244344  # Дж/кг
# Мощностной КПД ступени:
η'_1т := η_1u - ξ_1з explicit, ALL → 0.849 - 0.024 = 0.824797
# Лопаточный КПД ступени:
η'_1л := η'_1т + ξ_1в explicit, ALL → 0.825 + 0.072 = 0.896816
# Площадь открытой части соплового аппарата
ε := 1
# Средняя плотность газа  с обеих сторон диска
ρ_1cp := (ν_11^-1 + ν_12^-1)/2 explicit, ALL → (0.311^-1 + 0.389^-1)/2 = 2.8926  # кг/м^3
# Затраты мощности на трение и вентиляцию:
N_1т.в := (1.07*D_т^2 + 61*(1 - ε)*D_т*l_л1)*(u_1/100)^3*ρ_1cp = 136.082
# Удельные потери на трение и вентиляцию:
h_1т.в := N_1т.в*1000/G_г explicit, ALL → 136.082*1*10^3/85.071 = 1599.64  # Дж/кг
# Относительные потери на трение и вентиляцию:
ξ_1т.в := h_1т.в/H_01 explicit, ALL → 1.6*10^3/(2.962*10^5) = 0.00539966
# Мощностной КПД ступени с учетом потери на трение и вентиляцию:
η_1т := η'_1т - ξ_1т.в explicit, ALL → 0.825 - 5.4*10^-3 = 0.819397
# Лопаточный КПД ступени с учетом потери на трение и вентиляцию:
η_1л := η'_1л - ξ_1т.в explicit, ALL → 0.897 - 5.4*10^-3 = 0.891416
# Удельная работа ступени:
L_1т := H_01*η_1т explicit, ALL → 2.962*10^5*0.819 = 242744  # Дж/кг
# Температура за первой ступенью:
T'_ст1 := T_12 + h_1з/C_pг + h_1т.в/C_pг explicit, ALL → 1.248*10^3 + 7.154*10^3/(1.211*10^3) + 1.6*10^3/(1.211*10^3) = 1254.87  # К
# Температура торможения за первой ступенью:
T*_ст1 := T'_ст1 + h_1в/C_pг explicit, ALL → 1.255*10^3 + 2.134*10^4/(1.211*10^3) = 1272.49  # К
# Давление торможения за первой ступенью:
p*_ст1 := p_12*(T*_ст1/T'_ст1)^(k_г/(k_г - 1)) explicit, ALL → 9.284*10^5*(1.272*10^3/(1.255*10^3))^(1.314/(1.314 - 1)) = 984200  # Па
# Располагаемый теплоперепад по параметрам торможения:
H*_01 := C_pг*T*_г*(1 - (p*_ст1/p*_г)^((k_г - 1)/k_г)) explicit, ALL → 1.211*10^3*1.473*10^3*(1 - (9.842*10^5/(1.986*10^6))^((1.314 - 1)/1.314)) = 275364  # Дж/кг
# КПД ступени по параметрам торможения:
η*_1т := L_1т/H*_01 explicit, ALL → 2.427*10^5/(2.754*10^5) = 0.88154
# Уточнение коэффициентов скорости φ и ψ.
# Коэффициент скорости в сопловом аппарате первой ступени:
# Потери на трения
# Вход в турбину - осевой
α_0 := 90*deg
x := (α_11 + α_0)/deg explicit, ALL → (17*deg + 90*deg)/deg = 107
x_с :=
    x
    110 if x > 110
    = 107
y := sin(α_0)/sin(α_11) = 3.4203
y_с :=
    y
    1.7 if y > 1.7
    = 1.7
ζ_с.тр.1 := 0.02185*(0.01065*x_с^2 - 2.295*x_с + 160.5)*(0.1055*y_с^2 - 0.3427*y_с + 0.295) = 0.0139399
# Кромочные потери
# Угол установки профиля в СА
γ_11 := (70 - 0.127*(α_0 - α_11)/deg - 0.0041*((α_0 - α_11)/deg)^2) = 38.8801
# Хорда лопатки:
b_с11 := b_с1/sin(γ_11*deg) explicit, ALL → 0.043/sin(38.88*deg) = 0.0690359  # м
# Оптимальный относительный шаг
K := 0.45
c'_max1 := 0.179
C_maxc1 := c'_max1*b_с11 = 0.0123574
t/b_2.опт := K*(180/(180 - (α_0 + α_11)/deg)*sin(α_0)/sin(α_11))^(1/3)*(1 - c'_max1) = 0.752016
(t/b)_с.опт1 := 0.783
# Найдем шаг решетки
t_c1 := (t/b)_с.опт1*b_с11 explicit, ALL → 0.783*0.069 = 0.0540551  # м
# Диаметр кромки соплового аппарата
s_с1 := 2*10^-3  # м
# Относительные кромочные потери в сопловом аппарате
ζ_с.кр1 := 0.2*s_с1/(t_c1*sin(α_11)) explicit, ALL → 0.2*2*10^-3/(0.054*sin(17*deg)) = 0.0253098
# Профильные потери в сопловом аппарате
ζ_с.пр1 := ζ_с.тр.1 + ζ_с.кр1 explicit, ALL → 0.014 + 0.025 = 0.0392496
# Концевые потери
ζ_с.к1 := 2*ζ_с.тр.1*t_c1*sin(α_11)/l_c1 explicit, ALL → 2*0.014*0.054*sin(17*deg)/0.06 = 0.00732818
# Суммарные потери в сопловом аппарате первой ступени
ζ_с1 := ζ_с.пр1 + ζ_с.к1 explicit, ALL → 0.039 + 7.328*10^-3 = 0.0465778
# Коэффициент скорости
φ_1У := sqrt(1 - ζ_с1) explicit, ALL → sqrt(1 - 0.047) = 0.976433
# Коэффициент скорости в рабочем колесе первой ступени
# Потери на трение
x := β_12 + β_11 = 71.2155
x :=
    x
    110 if x > 110
    = 71.2155
y := sin(β_11*deg)/sin(β_12*deg) = 1.77737
y :=
    y
    1.7 if y > 1.7
    = 1.7
ζ_тр.1 := 0.02185*(0.01065*x^2 - 2.295*x + 160.5)*(0.1055*y^2 - 0.3427*y + 0.295) = 0.0193116
# Угол установки профиля в РК:
γ_1рк := (70 - 0.127*(β_11 - β_12) - 0.0041*(β_11 - β_12)^2) = 65.0143
# Хорда лопатки:
b_л11 := b_л1/sin(γ_1рк*deg) explicit, ALL → 0.0361/sin(65.0143*deg) = 0.0398396  # м
# Оптимальный относительный шаг
K := 0.6
c'_max2 := 0.3 = 0.3
t/b_1.опт := K*(180/(180 - (β_11 + β_12))*sin(β_11*deg)/sin(β_12*deg))^(1/3)*(1 - c'_max2) = 0.601742
(t/b)_опт1 := 0.7
# Найдем шаг решетки
t_1 := (t/b)_опт1*b_л11 explicit, ALL → 0.7*0.04 = 0.0278877  # м
# Диаметр кромки рабочего колеса
s_1 := 2*10^-3  # м
# Относительные кромочные потери в рабочем колесе
ζ_кр1 := 0.2*s_1/(t_1*sin(β_12*deg)) explicit, ALL → 0.2*2*10^-3/(0.028*sin(24.273*deg)) = 0.0348905
# Профильные потери в рабочем колесе
ζ_пр1 := ζ_тр.1 + ζ_кр1 explicit, ALL → 0.019 + 0.035 = 0.0542022
# Концевые потери
ζ_к1 := 2*ζ_тр.1*t_1*sin(β_12*deg)/l_л1 explicit, ALL → 2*0.019*0.028*sin(24.273*deg)/0.065 = 0.00681221
# Суммарные потери в рабочем колесе первой ступени
ζ_1 := ζ_пр1 + ζ_к1 explicit, ALL → 0.054 + 6.812*10^-3 = 0.0610144
# Коэффициент скорости
ψ_1У := sqrt(1 - ζ_1) explicit, ALL → sqrt(1 - 0.061) = 0.969013
# Температура за первой ступенью с учётом охлаждения в первом приближении:
T*_ст1 = 1272.49
T*_ст1 := (c_pgm(T*_ст1, α_г)*T*_ст1*g_т + C_pсв(T*_к + 200)*(T*_к + 200)*(g_охл - 0.02)*0.6)/(c_pgm(T*_ст1, α_г)*g_т + C_pсв(T*_к + 200)*(g_охл - 0.02)*0.6) = 1266.39
К
# Расход за первой ступенью:
G_г.вд2 := G_в*(1 + g_m)*(1 - g_ут - 0.4*(g_охл - 0.02) - 0.02) = 86.6947  # кг/с
# Относительный расход через вторую ступень:
g_т2 := (1 + g_m)*(1 - g_ут - 0.4*(g_охл - 0.02) - 0.02) = 0.979812
# Расчет второй ступени ТВД:
# Температура торможения перед второй ступенью:
T*_ст1 = 1266.39  # К
# Давления торможения перед второй ступенью:
p*_ст1 = 984200  # Па
# Располагаемый теплоперепад второй ступени: ступени:
H_02 := C_pг*T*_ст1*(1 - (p_т/p*_ст1)^((k_г - 1)/k_г)) explicit, ALL → 1.211*10^3*1.266*10^3*(1 - (4.163*10^5/(9.842*10^5))^((1.314 - 1)/1.314)) = 284909  # Дж/кг
# Удельная работа второй ступени:
η_т2 := 0.815
L_т2 := H_02*η_т2 explicit, ALL → 2.849*10^5*0.815 = 232201  # Дж/кг
# Степень реактивности:
ρ_2 := 0.3
# Располагаемый теплоперепад в СА:
H_21 := H_02*(1 - ρ_2) explicit, ALL → 2.849*10^5*(1 - 0.3) = 199437  # Дж/кг
# Коэффициент скорости:
φ_2 := 0.972
# Скорость за СА 2-ой ступени:
c_21 := φ_2*sqrt(2*H_21) explicit, ALL → 0.972*sqrt(2*1.994*10^5) = 613.88  # м/c
# Угол потока за СА второй ступени:
α_21 := 22
# Окружная составляющая скорости за СА второй ступени:
c_21u := c_21*cos(α_21*deg) explicit, ALL → 613.88*cos(22*deg) = 569.18  # м/с
# Температура за СА:
T_21 := T*_ст1 - H_21*φ_2^2/C_pг explicit, ALL → 1.266*10^3 - 1.994*10^5*0.972^2/(1.211*10^3) = 1110.75  # К
# Температура в конце адиабатного расширения в СА:
T'_21 := T*_ст1 - H_21/C_pг explicit, ALL → 1.266*10^3 - 1.994*10^5/(1.211*10^3) = 1101.65  # К
# Давление перед рабочими лопатками:
p_21 := p*_ст1*(T'_21/T*_ст1)^(k_г/(k_г - 1)) explicit, ALL → 9.842*10^5*(1.102*10^3/(1.266*10^3))^(1.314/(1.314 - 1)) = 549305  # Па
# Кольцевая площадь сечения перед рабочими лопатками:
А_21 := π*D_1*l_c2 explicit, ALL → π*0.799*0.08 = 0.200785  # м^2
# Удельный объем перед рабочими лопатками:
ν_21 := R_г*T_21/p_21 explicit, ALL → 289.3*1.111*10^3/(5.493*10^5) = 0.584993  # м^3/кг
# Осевая скорость перед рабочими лопатками:
с_21а := G_г.вд2*ν_21/А_21 = 252.587  # м/с
# Угол потока за СА проверка:
α_21 := asin(с_21а/c_21)/deg explicit, ALL → asin(252.587/613.88)/deg = 24.2966
# Относительная скорость при входе в рабочие лопатки:
w_21 := sqrt(c_21^2 + U_т^2 - 2*c_21*U_т*cos(α_21*deg)) explicit, ALL → sqrt(613.88^2 + 409.936^2 - 2*613.88*409.936*cos(24.297*deg)) = 293.551
# Угол входа потока на рабочие лопатки:
β_21 := atan(с_21а/(c_21*cos(α_21*deg) - U_т))/deg explicit, ALL → atan(252.587/(613.88*cos(24.297*deg) - 409.936))/deg = 59.3678
# Располагаемый теплоперепад в РК:
Н_22 := ρ_2*H_02*T_21/T'_21 explicit, ALL → 0.3*2.849*10^5*1.111*10^3/(1.102*10^3) = 86178.5  # Дж/кг
# Окружная скорость при входе на рабочие лопатки:
u_22 := U_т = 409.936  # м/с
# Коэффициент скорости в рабочих лопатках:
ψ_2 := 0.971
# Относительная скорость за рабочими лопатками:
w_22 := ψ_2*sqrt(w_21^2 + 2*Н_22) explicit, ALL → 0.971*sqrt(293.551^2 + 2*8.618*10^4) = 493.712  # м/с
# Температура за рабочими лопатками:
T_22 := T_21 - (w_22^2 - w_21^2)/(2*C_pг) explicit, ALL → 1.111*10^3 - (493.712^2 - 293.551^2)/(2*1.211*10^3) = 1045.67  # К
# Температура к конце адиабатного расширения в рабочих лопатках:
T'_22 := T_21 - Н_22/C_pг explicit, ALL → 1.111*10^3 - 8.618*10^4/(1.211*10^3) = 1039.56  # К
# Давление за рабочими лопатками:
p_22 := p_21*(T'_22/T_21)^(k_г/(k_г - 1)) explicit, ALL → 5.493*10^5*(1.04*10^3/(1.111*10^3))^(1.314/(1.314 - 1)) = 416335  # Па
# Удельный объем за рабочими лопатками:
ν_22 := R_г*T_22/p_22 explicit, ALL → 289.3*1.046*10^3/(4.163*10^5) = 0.726607  # м^3/кг
# Площадь кольцевого сечения за рабочими лопатками:
А_22 := π*D_т*l_л2 explicit, ALL → π*0.799*0.1 = 0.250635  # м^2
# Осевая скорость за рабочими лопатками:
с_22а := G_г.вд2*ν_22/А_22 explicit, ALL → 86.695*0.727/0.251 = 251.333  # м/с
# Угол выхода потока из рабочих лопаток:
β_22 := asin(с_22а/w_22)/deg explicit, ALL → asin(251.333/493.712)/deg = 30.6017
# Скорость закрутки потока за рабочими лопатками:
с_22u := w_22*cos(β_22*deg) - u_2 explicit, ALL → 493.712*cos(30.602*deg) - 409.936 = 15.0154  # м/с
# Угол выхода потока из рабочих лопаток:
α_22 := atan(с_22а/с_22u)/deg explicit, ALL → atan(251.333/15.015)/deg = 86.581
# Скорость газа за рабочими лопатками:
с_22 := sqrt(с_22а^2 + с_22u^2) explicit, ALL → sqrt(251.333^2 + 15.015^2) = 251.781  # м/с
# Работа на окружности РК:
L_2u := u_22*(с_22u + c_21u) explicit, ALL → 409.936*(15.015 + 569.18) = 239483  # Дж/кг
# Треугольники скоростей:
с_21а = 252.587
с_22а = 251.333
c_21u = 569.18
с_22u = 15.0154
c_21 = 613.88
с_22 = 251.781
α_21 = 24.2966
α_22 = 86.581
β_21 = 59.3678
β_22 = 30.6017
# КПД на окружности РК:
η_2u := L_2u/H_02 explicit, ALL → 2.395*10^5/(2.849*10^5) = 0.840557
# Удельные параметры а СА:
h_2c := (φ_2^-2 - 1)*c_21^2/2 explicit, ALL → (0.972^-2 - 1)*613.88^2/2 = 11012.1  # Дж/кг
# То же, с учетом их использования в РК:
h'_2c := h_2c*T'_22/T_21 explicit, ALL → 1.101*10^4*1.04*10^3/(1.111*10^3) = 10306.4  # Дж/кг
# Относительные потери в СА:
ξ_2с := h_2c/H_02 explicit, ALL → 1.101*10^4/(2.849*10^5) = 0.0386512
# То же, с учетом их использования в рабочих лопатках:
ξ'_2c := ξ_2с*T'_22/T_21 explicit, ALL → 0.039*1.04*10^3/(1.111*10^3) = 0.0361742
# Удельные потери в рабочих лопатках:
h_2л := (ψ_2^-2 - 1)*w_22^2/2 explicit, ALL → (0.971^-2 - 1)*493.712^2/2 = 7388.63  # Дж/кг
# Относительные потери в рабочих лопатках:
ξ_2л := h_2л/H_02 explicit, ALL → 7.389*10^3/(2.849*10^5) = 0.0259333
# Удельные потери с выходной скоростью:
h_2в := с_22^2/2 explicit, ALL → 251.781^2/2 = 31696.9  # Дж/кг
# Относительные потери с выходной скоростью:
ξ_2в := h_2в/H_02 explicit, ALL → 3.17*10^4/(2.849*10^5) = 0.111252
# КПД на окружности РК:
η_2u := 1 - ξ'_2c - ξ_2л - ξ_2в explicit, ALL → 1 - 0.036 - 0.026 - 0.111 = 0.82664
# Радиальный зазор между корпусом и сопловыми лопатками:
δ_2с := 0.8*10^-3 = 0.0008  # м
# Радиальный зазор между корпусом и рабочими лопатками:
δ_2л := 0.8*10^-3 = 0.0008  # м
# Удельные потери в радиальном зазоре:
h_2з := 1.37*(1 + 1.6*ρ_2)*(1 + l_л2/D_т)*δ_2л/l_л2*L_2u = 4376.2  # Дж/кг
# Относительные потери в радиальном зазоре:
ξ_2з := h_2з/H_02 explicit, ALL → 4.376*10^3/(2.849*10^5) = 0.01536
# Удельная работа ступени с учетом потери в радиальном зазоре:
L_2uз := L_2u - h_2з explicit, ALL → 2.395*10^5 - 4.376*10^3 = 235106  # Дж/кг
# Мощностной КПД ступени:
η'_2т := η_2u - ξ_2з explicit, ALL → 0.827 - 0.015 = 0.81128
# Лопаточный КПД ступени:
η'_2л := η'_2т + ξ_2в explicit, ALL → 0.811 + 0.111 = 0.922533
# Площадь открытой части соплового аппарата
ε := 1
# Средняя плотность газа  с обеих сторон диска
ρ_2cp := (ν_21^-1 + ν_22^-1)/2 explicit, ALL → (0.585^-1 + 0.727^-1)/2 = 1.54284  # м^3/кг
# Затраты мощности на трение и вентиляцию:
N_2т.в := (1.07*D_т^2 + 61*(1 - ε)*D_т*l_л2)*(u_2/100)^3*ρ_2cp = 72.5831
# Удельные потери на трение и вентиляцию:
h_2т.в := N_2т.в*1000/G_г.вд2 explicit, ALL → 72.583*1*10^3/86.695 = 837.227  # Дж/кг
# Относительные потери на трение и вентиляцию:
ξ_2т.в := h_2т.в/H_02 explicit, ALL → 837.227/(2.849*10^5) = 0.00293857
# Мощностной КПД ступени с учетом потери на трение и вентиляцию:
η_2т := η'_2т - ξ_2т.в explicit, ALL → 0.811 - 2.939*10^-3 = 0.808342
# Лопаточный КПД ступени с учетом потериь на трение и вентиляцию:
η_2л := η'_2л - ξ_2т.в explicit, ALL → 0.923 - 2.939*10^-3 = 0.919594
# Удельная работа ступени:
L_2т := H_02*η_2т explicit, ALL → 2.849*10^5*0.808 = 230304  # Дж/кг
# Температура за второй ступенью:
T'_ст2 := T_22 + h_2з/C_pг + h_2т.в/C_pг explicit, ALL → 1.046*10^3 + 4.376*10^3/(1.211*10^3) + 837.227/(1.211*10^3) = 1049.97  # К
# Температура торможения за второй ступенью:
T*_ст2 := T'_ст2 + h_2в/C_pг explicit, ALL → 1.05*10^3 + 3.17*10^4/(1.211*10^3) = 1076.16  # К
# Давление торможения за второй ступенью:
p*_ст2 := p_22*(T*_ст2/T'_ст2)^(k_г/(k_г - 1)) explicit, ALL → 4.163*10^5*(1.076*10^3/(1.05*10^3))^(1.314/(1.314 - 1)) = 461535  # Па
# Располагаемый теплоперепад по параметрам торможения:
H_02 = 284909
H*_02 := C_pг*T*_ст1*(1 - (p*_ст2/p*_ст1)^((k_г - 1)/k_г)) explicit, ALL → 1.211*10^3*1.266*10^3*(1 - (4.615*10^5/(9.842*10^5))^((1.314 - 1)/1.314)) = 253784
Дж/кг
# КПД ступени по параметрам торможения:
η*_2т := L_2т/H*_02 explicit, ALL → 2.303*10^5/(2.538*10^5) = 0.907482
# Уточнение коэффициентов скорости φ и ψ.
# Коэффициент скорости в сопловом аппарате первой ступени:
# a) Потери на трения
# Вход в турбину
α_12 = 78.9411
x := α_21 + α_12
x_с :=
    x
    110 if x > 110
    = 103.238
y := sin(α_12*deg)/sin(α_21*deg) = 2.38524
y_с :=
    y
    1.7 if y > 1.7
    = 1.7
ζ_с.тр.2 := 0.02185*(0.01065*x_с^2 - 2.295*x_с + 160.5)*(0.1055*y_с^2 - 0.3427*y_с + 0.295) = 0.0140195
# б) Кромочные потери
# Угол установки профиля в СА
γ_с2 := (70 - 0.127*(α_12 - α_21) - 0.0041*(α_12 - α_21)^2) = 50.8175
# Хорда лопатки:
b_с22 := b_с2/sin(γ_с2*deg) explicit, ALL → 0.0599/sin(50.8175*deg) = 0.077299  # м
# Оптимальный относительный шаг
K := 0.45
c'_max2 := 0.2
t/b_2.опт := K*(180/(180 - (α_12 + α_21))*sin(α_12*deg)/sin(α_21*deg))^(1/3)*(1 - c'_max2) = 0.63903
(t/b)_с.опт2 := 0.7
# Найдем шаг решетки
t_c2 := (t/b)_с.опт2*b_с22 explicit, ALL → 0.7*0.077 = 0.0541093  # м
# Диаметр кромки соплового аппарата
s_с2 := 2*10^-3  # м
# Относительные кромочные потери в сопловом аппарате
ζ_с.кр2 := 0.2*s_с2/(t_c2*sin(α_21*deg)) explicit, ALL → 0.2*2*10^-3/(0.054*sin(24.297*deg)) = 0.0179663
# Профильные потери в сопловом аппарате
ζ_с.пр2 := ζ_с.тр.2 + ζ_с.кр2 explicit, ALL → 0.014 + 0.018 = 0.0319858
# Концевые потери
ζ_с.к2 := 2*ζ_с.тр.2*t_c2*sin(α_21*deg)/l_c2 explicit, ALL → 2*0.014*0.054*sin(24.297*deg)/0.08 = 0.0078032
# Суммарные потери в сопловом аппарате первой ступени
ζ_с2 := ζ_с.пр2 + ζ_с.к2 explicit, ALL → 0.032 + 7.803*10^-3 = 0.039789
# Коэффициент скорости
φ_2 := sqrt(1 - ζ_с2) explicit, ALL → sqrt(1 - 0.04) = 0.979904
# Коэффициент скорости в рабочем колесе первой ступени
# Потери на трение
x := β_22 + β_21 = 89.9696
x :=
    x
    110 if x > 110
    = 89.9696
y := sin(β_21*deg)/sin(β_22*deg) = 1.69026
y :=
    y
    1.7 if y > 1.7
    = 1.69026
ζ_тр.2 := 0.02185*(0.01065*x^2 - 2.295*x + 160.5)*(0.1055*y^2 - 0.3427*y + 0.295) = 0.015082
# Кромочные потери
# Угол установки профиля в РК:
γ_рк2 := (70 - 0.127*(β_21 - β_22) - 0.0041*(β_21 - β_22)^2) = 62.954
# Хорда лопатки:
b_л22 := b_л2/sin(γ_рк2*deg) explicit, ALL → 0.05/sin(62.954*deg) = 0.0560619  # м
# Оптимальный относительный шаг
K := 0.6
c'_max2 := 0.2 = 0.2
t/b_2.опт := K*(180/(180 - (β_21 + β_22))*sin(β_21*deg)/sin(β_22*deg))^(1/3)*(1 - c'_max2) = 0.720311
(t/b)_опт2 := 0.7
# Найдем шаг решетки
t_2 := (t/b)_опт2*b_л22 explicit, ALL → 0.7*0.056 = 0.0392434  # м
# Диаметр кромки рабочего колеса
s_2 := 2*10^-3  # м
# Относительные кромочные потери в рабочем колесе
ζ_кр2 := 0.2*s_2/(t_2*sin(β_22*deg)) explicit, ALL → 0.2*2*10^-3/(0.039*sin(30.602*deg)) = 0.0200225
# Профильные потери в рабочем колесе
ζ_пр2 := ζ_тр.2 + ζ_кр2 explicit, ALL → 0.015 + 0.02 = 0.0351045
# Концевые потери
ζ_к2 := 2*ζ_тр.2*t_2*sin(β_22*deg)/l_л2 explicit, ALL → 2*0.015*0.039*sin(30.602*deg)/0.1 = 0.00603434
# Суммарные потери в рабочем колесе первой ступени
ζ_2 := ζ_пр2 + ζ_к2 explicit, ALL → 0.035 + 6.034*10^-3 = 0.0411389
# Коэффициент скорости
ψ_2 := sqrt(1 - ζ_2) explicit, ALL → sqrt(1 - 0.041) = 0.979215
# Расчет параметров турбины:
# Суммарная работа турбины
L_тΣ := L_1т + L_2т explicit, ALL → 2.427*10^5 + 2.303*10^5 = 473048  # Дж/кг
# Располагаемый теплоперепад
Н_т = 555585  # Дж/кг
# Располагаемый теплоперепад по параметрам торможения:
# *
H*_т := C_pг*T*_г*(1 - (p*_ст2/p*_г)^((k_г - 1)/k_г)) explicit, ALL → 1.211*10^3*1.473*10^3*(1 - (4.615*10^5/(1.986*10^6))^((1.314 - 1)/1.314)) = 524971  # Дж/кг
# Мощностной КПД турбины
η_т := L_тΣ/Н_т explicit, ALL → 4.73*10^5/(5.56*10^5) = 0.851443
# Лопаточный КПД турбины
η_л := (L_тΣ + h_2в)/Н_т explicit, ALL → (4.73*10^5 + 3.17*10^4)/(5.556*10^5) = 0.908494
# КПД турбины по параметрам торможения:
η*_т := L_тΣ/H*_т explicit, ALL → 4.73*10^5/(5.25*10^5) = 0.901094
# Профилирование лопаток по радиусу
# Закон профилирования:
α_1 == const
# Угол выхода из СА 1 ступени:
α_11 = 17 deg
# Средний радиус СА и РК:
r_ср := D_т/2 explicit, ALL → 0.799/2 = 0.399449  # м
D_т = 0.798898  # м
# Корневой радиус | Периферийный радиус СА:
r_к := D_т/2 - l_c1/2 explicit, ALL → 0.799/2 - 0.06/2 = 0.369386  # м
r_п := D_т/2 + l_c1/2 explicit, ALL → 0.799/2 + 0.06/2 = 0.429512  # м
r_п := D_т/2 + (l_c1 - 0.002)/2 = 0.428512  # м
# Окружная скорость на выходе из СА на среднем радиусе:
c_11u = 573.881  # м/c
м/c
cos(60 deg) = 0.5
# Абсолютная скорость на выходе из СА на среднем радиусе:
c_11 = 600.103
# Распределение давления по радиусу
P_ст(r) := p_11*(1 + (k_г - 1)*c_11^2/(2*(k_г*R_г*T'_11))*(1 - (r_ср/r)^(2*cos(α_11)^2)))^(k_г/(k_г - 1))
P_ст(r_ср) = 1230942  # Па
p_11 = 1230942
# Степень понижения давления в РК
π_рк(r) := P_ст(r)/p_21
# Осевая скорость за СА: | Окружная скорость за СА: | Полная скорость за СА:
c_1a(r) := с_11а*(r_ср/r)^(cos(α_11)^2)
c_1u(r) := c_11u*(r_ср/r)^(cos(α_11)^2)
c_1(r) := c_11*(r_ср/r)^(cos(α_11)^2)
c_1a(r_к) = 188.468  # м/c
c_1u(r_к) = 616.451  # м/c
c_1(r_к) = 644.617  # м/c
c_1a(r_ср) = 175.453  # м/c
c_1u(r_ср) = 573.881
c_1(r_ср) = 600.103  # м/c
c_1a(r_п) = 164.538  # м/c
c_1u(r_п) = 538.18  # м/c
c_1(r_п) = 562.77  # м/c
# Адиабатическая скорость за СА:
c_1ад(r) := c_1(r)/φ_1
c_1ад(r_к) = 666.616  # м/c
c_1ад(r_ср) = 620.582  # м/c
c_1ад(r_п) = 581.975  # м/c
# Перепад на СА:
ρ_r(r) := ρ_1*(π_рк(r)^((k_г - 1)/k_г) - 1)/(π_рк(r_ср)^((k_г - 1)/k_г) - 1)  # disabled
H_с11(r) := c_1ад(r)^2/2
H_с11(r_к) = 222188  # Дж/кг
Дж/кг
H_с11(r) := H_01*(1 - ρ_r(r))  # disabled
H_с11(r_ср) = 192561
H_с11(r_п) = 169348  # Дж/кг
H_рк(r) := (H_01 - H_с11(r))*T_11/T'_11  # disabled
# Перепад на РК:
H_рк(r) := (H_01 - H_с11(r))*T_11/T'_11
H_рк(r_к) = 74641.4  # Дж/кг
H_рк(r_ср) = 104501  # Дж/кг
H_рк(r_п) = 127897  # Дж/кг
# Степень реактивности
ρ_r(r) := 1 - (1 - ρ_1)*(r_ср/r)^(2*cos(α_11)^2)
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ρ_r(r_к) = 0.249992
ρ_r(r_ср) = 0.35
ρ_r(r_п) = 0.428358
# Окружная скорость:
u(r) := U_т*r/r_ср
u(r_к) = 379.083  # м/c
u(r_ср) = 409.936  # м/c
u(r_п) = 439.762  # м/c
# Угол выхода потока из СА в относительном движении
β_1(r) := atan(c_1a(r)/(c_1(r)*cos(α_11) - u(r)))
β_1(r_к) = 38.4493 deg
β_1(r_ср) = 46.942 deg
β_1(r_п) = 59.1144 deg
# Окружная скорость на выходе из РК
c_2u(r) := L_1u/u(r) - c_1u(r)
c_2u(r_к) = 46.9855  # м/c
c_2u(r_ср) = 39.6238  # м/c
c_2u(r_п) = 33.715  # м/c
# Относительная скорость за СА:
w_1(r) := sqrt(c_1(r)^2 + u(r)^2 - 2*c_1(r)*u(r)*cos(α_11))
w_1(r_к) = 303.09  # м/с
w_1(r_ср) = 240.129  # м/с
w_1(r_п) = 191.726  # м/с
# Относительная скорость за РК:
w_2(r) := ψ_1*sqrt(w_1(r)^2 + 2*H_рк(r))
w_2(r_к) = 468.968  # м/с
w_2(r_ср) = 493.158  # м/с
w_2(r_п) = 516.542  # м/с
# Окружная составляющая относительной скорости за РК:
w_2u(r) := c_2u(r) + u(r)
w_2u(r_к) = 426.069  # м/с
w_2u(r_ср) = 449.56  # м/с
w_2u(r_п) = 473.477  # м/с
# Осевая составляющая относительной скорости за РК:
w_2a(r) := sqrt(w_2(r)^2 - w_2u(r)^2)
w_2a(r_к) = 195.95  # м/с
w_2a(r_ср) = 202.734  # м/с
w_2a(r_п) = 206.483  # м/с
# Осевая составляющая абсолютной скорости за РК:
c_2a(r) := w_2a(r)
# Полная абсолютная скорость за РК:
c_2(r) := sqrt(c_2a(r)^2 + c_2u(r)^2)
c_2(r_к) = 201.505  # м/с
c_2(r_ср) = 206.57  # м/с
c_2(r_п) = 209.217  # м/с
# Угол выхода потока из РК в относительном движении:
β_2(r) := atan(w_2a(r)/w_2u(r))
β_2(r_к) = 24.6978 deg
β_2(r_ср) = 24.2735 deg
β_2(r_п) = 23.562 deg
# Угол выхода потока из РК в абсолютном движении:
α_2(r) := atan(c_2a(r)/c_2u(r))
α_2(r_к) = 76.516 deg
α_2(r_ср) = 78.9411 deg
α_2(r_п) = 80.7264 deg
# Число лопаток в СА:
z_с := π*D_т/t_c1 = 46.4306
z_с := 46
# Число лопаток в РК:
z_рк := π*D_т/t_1 = 89.9971
z_рк := 89
# Пересчитаю шаг решетки СА и РК:
t_ск := π*2*r_к/z_с = 0.0504548  # м
t_с := π*2*r_ср/z_с = 0.0545611  # м
t_сп := π*2*r_п/z_с = 0.0585309  # м
t_ркк := π*2*r_к/z_рк = 0.0260777  # м
t_рк := π*2*r_ср/z_рк = 0.0282001  # м
t_ркп := π*2*r_п/z_рк = 0.0302519  # м
# Средний диаметр
# Ширина лопаток:, м: | Горло
b_с1 = 0.0433333
a_рк.ср := t_рк*sin(β_2(r_ср)) = 0.0115929
b_л1 = 0.0361111
# Хорда, м:
a_c.ср := t_с*sin(α_11) = 0.0159521
b_с11 = 0.0690359  # CA
b_л11 = 0.0398396
r_1CA := 0.0355*b_с1 = 0.00153833
# Газовые углы:
d_1CA := 2*r_1CA = 0.00307667
α_0 := 90 deg
RK
α_11 = 0.296706
r_1RK := 0.03*b_л1 = 0.00108333
β_1(r_ср) = 46.942 deg
d_1CA := 2*r_1RK = 0.00216667
β_2(r_ср) = 24.2735 deg
# Шаг, м:
C_maxc1 := c'_max1*46.9 = 8.3951
t_с = 0.0545611
t_рк = 0.0282001
# Втулочный диаметр.
# Газовые углы: | CA
r_1CA := 0.045*b_с1 = 0.00195
α_0к := 90 deg
α_1к := α_11 = 0.296706
d_1CA := 2*r_1CA = 0.0039
β_1(r_к) = 38.4493 deg
RK
β_2(r_к) = 24.6978 deg
# Ширина лопаток, м:
r_1RK := 0.06*b_л1 = 0.00216667
b_л1 = 0.0361111
b_a.с.к := b_с1 = 0.0433333
d_1CA := 2*r_1RK = 0.00433333
# Шаг профилей, м:
t_с.к := π*r_к*2/z_с = 0.0504548  # Горло
t_рк.к := π*r_к*2/z_рк = 0.0260777
a_рк.к := t_рк.к*sin(β_2(r_к)) = 0.0108961
a_c.к := t_с.к*sin(α_11) = 0.0147515
# Периферийный диаметр.
# Газовые углы: | Шаг профилей, м:
α_0п := 90 deg
t_с.п := π*r_п*2/z_с = 0.0585309
α_1п := α_11 = 0.296706
β_1(r_п) = 59.1144 deg
t_рк.п := π*r_п*2/z_рк = 0.0302519
β_2(r_п) = 23.562 deg
# Горло
a_рк.п := t_рк.п*sin(β_2(r_п)) = 0.0120929
a_c.п := t_с.п*sin(α_11) = 0.0171128
# Толщина профиля:
C_maxc1 := c'_max1*49.5 = 8.8605
c_1(r_к) = 644.617  # м/c
c_1a(r_к) = 188.468  # м/c
c_1u(r_к) = 616.451  # м/c
c_1(r_ср) = 600.103  # м/c
c_1a(r_ср) = 175.453  # м/c
c_1u(r_ср) = 573.881
c_1(r_п) = 562.77  # м/c
c_1a(r_п) = 164.538  # м/c
c_1u(r_п) = 538.18  # м/c
c_2u(r_к) = 46.9855  # м/c
c_2(r_к) = 201.505  # м/с
w_2a(r_к) = 195.95  # м/с
c_2u(r_ср) = 39.6238  # м/c
c_2(r_ср) = 206.57  # м/с
w_2a(r_ср) = 202.734  # м/с
c_2u(r_п) = 33.715  # м/c
c_2(r_п) = 209.217  # м/с
w_2a(r_п) = 206.483  # м/с
u(r_к) = 379.083  # м/с
β_1(r_к) = 38.4493 deg  # м/с
w_1(r_к) = 303.09
β_1(r_ср) = 46.942 deg
w_1(r_ср) = 240.129  # м/с
u(r_ср) = 409.936  # м/с
α_11 = 17 deg
β_1(r_п) = 59.1144 deg
w_1(r_п) = 191.726
м/с
u(r_п) = 439.762  # м/с
β_2(r_к) = 24.6978 deg
α_2(r_к) = 76.516 deg
w_2u(r_к) = 426.069  # м/с
β_2(r_ср) = 24.2735 deg
α_2(r_ср) = 78.9411 deg
w_2u(r_ср) = 449.56  # м/с
β_2(r_п) = 23.562 deg
α_2(r_п) = 80.7264 deg
w_2u(r_п) = 473.477  # м/с
w_2(r_к) = 468.968  # м/с
w_2(r_ср) = 493.158  # м/с
w_2(r_п) = 516.542  # м/с
# Расчёт на прочность пера лопатки
# Рабочее колесо
F_пер := 233.074579*10^-6 explicit, ALL → 233.075*10^-6 = 0.000233075  # м^2
F_ср := 310.906286*10^-6 explicit, ALL → 310.906*10^-6 = 0.000310906  # м^2
F_вт := 354.94291*10^-6 explicit, ALL → 354.943*10^-6 = 0.000354943  # м^2
R_пер := r_п = 0.428512  # м
R_ср := r_ср = 0.399449  # м
R_вт := r_к = 0.369386  # м
# Зададим распределение площадей плавной кривой:
Given
a := 1
b := 1
c := 2
a + b*R_вт^c == F_вт
a + b*R_ср^c == F_ср
a + b*R_пер^c == F_пер
[a; b; c] := Find([a; b; c]) = [0.000396831; -0.392346; 9.18243]
F(z) := a + b*z^c
z := 0, 0.001 .. R_пер
# Плотность материала лопатки:
ρ := 8400  # кг/м^3
# Частота вращения ротора:
n_т = 9800
ω := 2*π*n_т/60 = 1026.25  # c^-1
N(z) := ρ*ω^2*integral(z_1*F(z_1), z_1 = z .. R_пер)
σ_р(z) := N(z)/F(z)
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м
Па
σ_р(R_вт) = 179027559  # Па
# Изгибающие моменты от аэродинамических сил:
# Давление перед рабочим колесом: | Распределение давления по радиусу
P_1(r) := P_ст(r)
# Давление за рабочим колесом:
P_2 := p_21 = 549305  # Па
# Температура перед РК:
T_1 := T_11 = 1324.27  # К
# Температура за РК:
T_2 := T'_ст1 = 1254.87  # К
P_ст(r_к) = 1143685
# Плотность газа перед рабочей лопаткой
p_11 = 1230942
ρ_1(r) := P_1(r)/(R_г*T_1)  # кг/м^3
Па
R_пер := r_п = 0.428512
# Плотность газа за рабочей лопаткой:
R_ср := r_ср = 0.399449
ρ_2 := P_2/(R_г*T_2) = 1.5131  # кг/м^3
R_вт := r_к = 0.369386
# Количество лопаток:
m := 89
C_1a := [164.5; 175.5; 188.5]
C_2a := [206.483; 202.734; 195.95]
C_1u := [538.18; 573.881; 616.5]
C_2u := [33.715; 39.624; 46.986]
z := 10^-3*[429; 399; 369]  # м
u := [439.8; 409.9; 379.1]
Н/м
ORIGIN := 0
q_x :=
    for i ∈ 0 .. 2
        q_x[i] ← (-P_2 + P_1(z[i]))*2*π*z[i]/m + 2*π*z[i]/m*(C_1a[i]^2*ρ_1(z[i]) - C_2a[i]^2*ρ_2)
    q_x
    = [23689.1; 20199.9; 16699.1]
q_y :=
    for i ∈ 0 .. 2
        q_y[i] ← 2*π*z[i]/m*(C_1a[i]*ρ_1(z[i])*(C_1u[i] - u[i]) - C_2a[i]*ρ_2*(C_2u[i] - u[i]))
    q_y
    = [5510.67; 5801.59; 6041.56]  # Н/м
vz := stack(0.369, 0.399, 0.429)
vq_x := stack(1.67*10^4, 2.02*10^4, 2.369*10^4)
vs1 := lspline(vz, vq_x)
q_x(z) := interp(vs1, vz, vq_x, z)
vq_y := stack(6.042*10^3, 5.802*10^3, 5.511*10^3)
vs := lspline(vz, vq_y)
q_y(z) := interp(vs, vz, vq_y, z)
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# м | м
# Н/м | Н/м
M_ξq(z) := -(z*integral(q_y(z_1), z_1 = z .. R_пер) - integral(z_1*q_y(z_1), z_1 = z .. R_пер))
M_ξq(R_вт) = 9.97378  # Н*м
φ_В := 19.552985
M_ηq(z) := (integral(z_1*q_x(z_1), z_1 = z .. R_пер) - z*integral(q_x(z_1), z_1 = z .. R_пер))
M_ηq(R_вт) = 37.3021  # Н*м
M_u := M_ξq(R_вт)*cos(φ_В*deg) + M_ηq(R_вт)*sin(φ_В*deg) = 21.8828  # Н*м
M_v := -M_ξq(R_вт)*sin(φ_В*deg) + M_ηq(R_вт)*cos(φ_В*deg) = 31.8129  # Н*м
I_u.В := 7783.508377*10^-12 = 7.78351e-9  # м^4
I_v.В := 31367.988630*10^-12 = 3.1368e-8  # м^4
# Определим положение нейтральной оси:
β := atan(M_v*I_u.В/(M_u*I_v.В))*1/deg = 19.8362
# Точка А
v_A := 11.702516*10^-3  # м
u_A := (-13.398406)*10^-3  # м
σ_A := M_u*v_A/I_u.В - M_v*u_A/I_v.В = 46489299  # Па
# Точка B
v_B := 10.215384*10^-3  # м
u_B := 22.894132*10^-3  # м
σ_B := M_u*v_B/I_u.В - M_v*u_B/I_v.В = 5500995  # Па
# Точка С
v_C := -8.659754*10^-3  # м
u_C := 2.024124*10^-3  # м
σ_C := M_u*v_C/I_u.В - M_v*u_C/I_v.В = -26399155  # Па
# Наиболее опасная точка А
σ_Σ := σ_р(R_вт) + σ_A = 225516858  # Па
σ_р(R_вт) = 179027559  # Па
# Примем материал ЭП202-ВД
# В качестве критерия работоспособности выберем длительную прочность при температуре 925 К на 10000 часов
σ_дл := 310*10^6  # Па
σ_дл/σ_Σ explicit, ALL → 310*10^6/(2.255*10^8) = 1.37462
# Оценка нагрузки на подшипник по окружной скорости на среднем диаметре:
# Подшипник радиально упорный
D_ср := 0.068  # м
# Окружная скорость:
u := π*D_ср*n_т/60 explicit, ALL → π*0.068*9.8*10^3/60 = 34.8926  # м/с
# Подшипник радиальный опоры твд
D_ср := 0.085  # м
# Окружная скорость:
u := π*D_ср*n_т/60 explicit, ALL → π*0.085*9.8*10^3/60 = 43.6158  # м/с
# Оценка расхода масла через один подшипник
# Теплоёмкость масла
С_м := 2200  # Дж/(кг*К)
# Плотность масла
ρ_м := 900  # кг/м^3
# Доля потерь в подшипниках
η_п := 0.0005
# Суммарный подвод масла
G_м := N_e*η_м*η_п*60*1000/(С_м*100*ρ_м) explicit, ALL → 32*10^6*0.99*5*10^-4*60*1*10^3/(2.2*10^3*100*900) = 4.8  # л/мин
# Список использованной литературы
# 1. В.Е. Михальцев, В.Д. Моляков. Теория и проектирование газовой турбины. Часть 2.: Учеб. пособие по курсу "Лоаточные машины газотурбинных и комбинированных установок. Газовые турбины"/ Под ред. М.И. Осипова. - М.: Изд-во МГТУ им. Н.Э. Баумана, 2008. - 116с.: ил.
# 2. В.Е. Михальцев, В.Д. Моляков. Теория и проектирование газовой турбины. Часть 1.: Учеб. пособие по курсу "Лоаточные машины газотурбинных и комбинированных установок. Газовые турбины"/ Под ред. М.И. Осипова. - М.: Изд-во МГТУ им. Н.Э. Баумана, 2006. - 104с.: ил.
# 3. В.Е. Михальцев, В.Д. Моляков. Расчет параметров цикла при проектировании газотурбинных двигателей и комбинированных установок.: Учеб. пособие; Под ред. И.Г. Суровецева. - М.: Изд-во МГТУ им. Н.Э. Баумана, 2014. - 58 с.: ил.
# 4. Курс лекций по курсу "Лопаточные машины Ч.2. Турбины".
