# [area: Подключение библиотек]
# Начало отсчета начиная с:
ORIGIN := 1
# [component: outputs EXCEL_атм]
transpose(EXCEL_атм) =  # no stored result
H_атм := submatrix(EXCEL_атм, 2, rows(EXCEL_атм), 1, 1)
transpose(H_атм) = [
    -2000, -1950, -1900, -1850, -1800, -1750, -1700, -1650, -1600, -1550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]
T_атм := submatrix(EXCEL_атм, 2, rows(EXCEL_атм), 2, 2)
transpose(T_атм) = [
    301.154, 300.829, 300.504, 300.179, 299.853, 299.528, 299.203, 298.878, 298.553, 298.227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]
P_атм := submatrix(EXCEL_атм, 2, rows(EXCEL_атм), 3, 3)
transpose(P_атм) = [
    127.783, 127.059, 126.339, 125.622, 124.908, 124.198, 123.491, 122.787, 122.087, 121.39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]*10^3
P_атм(H) := interp(cspline(H_атм, P_атм), H_атм, P_атм, H)
T_атм(H) := interp(cspline(H_атм, T_атм), H_атм, T_атм, H)
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# [component: outputs EXCEL_Сp.воздух]
PT_Cp.воздух[:, 1] := submatrix(EXCEL_Сp.воздух, 2, cols(EXCEL_Сp.воздух), 1, 1)
PT_Cp.воздух[:, 2] := transpose(submatrix(EXCEL_Сp.воздух, 1, 1, 2, cols(EXCEL_Сp.воздух)))
# Газовая постоянная воздуха (Дж/кг/К):
R_в := 287.14
transpose(PT_Cp.воздух) = [
    99971, 99972, 99973, 99974, 99975, 99976, 99977, 99978, 99979, 99980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;
    75, 80, 85, 90, 95, 100, 105, 110, 115, 120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]
Cp_воздух := submatrix(EXCEL_Сp.воздух, 2, cols(EXCEL_Сp.воздух), 2, cols(EXCEL_Сp.воздух))
EXCEL_Сp.воздух =  # no stored result
Cp_воздух =  # no stored result
Cp_воздух(P, T) :=
    interp(cspline(PT_Cp.воздух, Cp_воздух), PT_Cp.воздух, Cp_воздух, [P; T]) if (10^5 ≤ P ≤ 10^8) and (75 ≤ T ≤ 1300)
    otherwise
        4187*{
            0.2407 + 0.0193*(2.5*10^-3*T - 0.875) + 2.0*10^-3*(2.5*10^-5*T^2 - 0.0275*T + 6.5625) if (T_0 < T < 750)
            0.26 + 0.032*(1.176*10^-3*T - 0.88235) - 0.374*10^-2*(5.5556*10^-6*T^2 - 1.3056*10^-2*T + 6.67) if (T ≥ 750)
        }  # disabled
Cp_воздух(P, T) :=
    k ← transpose([0.2521923, -0.1186612, 0.3360775, -0.3073812, 0.1382207, -0.03090246, 0.002745383])
    4187*sum(k[i + ORIGIN]*(T/1000)^i, i = 0 .. 6)
# Визуализация зависимости теплоёмкости воздуха от давления и температуры:
Cp_воздух_3D := CreateMesh(Cp_воздух, 10^5, 10^8, 100, 1300, 40, 40)
# [component: inputs Cp_воздух_3D]
Cp_воздух.ср(P_1, P_2, T_1, T_2) :=
    1/(P_2 - P_1)*1/(T_2 - T_1)*integral(integral(Cp_воздух(P, T), T = T_1 .. T_2), P = P_1 .. P_2) if (P_1 ≠ P_2) and (T_1 ≠ T_2)
    1/(P_2 - P_1)*integral(Cp_воздух(P, 0.5*(T_1 + T_2)), P = P_1 .. P_2) if (P_1 ≠ P_2) and (T_1 == T_2)
    1/(T_2 - T_1)*integral(Cp_воздух(0.5*(P_1 + P_2), T), T = T_1 .. T_2) if (P_1 == P_2) and (T_1 ≠ T_2)
    Cp_воздух(0.5*(P_1 + P_2), 0.5*(T_1 + T_2)) otherwise
Cp_воздух.ср(P_1, P_2, T_1, T_2) :=
    1/(T_2 - T_1)*integral(Cp_воздух(mean(P_1, P_2), T), T = T_1 .. T_2) if (T_1 ≠ T_2)
    Cp_воздух(mean(P_1, P_2), mean(T_1, T_2)) otherwise
# [component: outputs EXCEL_Cp_ч.керосин]
T_Cp_ч.керосин := submatrix(EXCEL_Cp_ч.керосин, 2, 22, 1, 1)
transpose(T_Cp_ч.керосин) = [273, 373, 473, 573, 673, 773, 873, 973, 1073, 1173, 1273, 1373, 1473, 1573, 1673, 1773, 1873, 1973, 2073, 2173, 2273]
Cp_ч.керосин := submatrix(EXCEL_Cp_ч.керосин, 2, 22, 2, 2)
transpose(Cp_ч.керосин) = [1055.7, 1079, 1106.8, 1137.2, 1168.5, 1199.4, 1229.2, 1257, 1282.4, 1305.4, 1325.9, 1344, 1359.9, 1374, 1386.5, 1397.7, 1407.9, 1417.2, 1425.6, 1433.1, 1439.1]
Cp_ч.керосин(T) :=
    interp(cspline(T_Cp_ч.керосин, Cp_ч.керосин), T_Cp_ч.керосин, Cp_ч.керосин, T) if T_Cp_ч.керосин[ORIGIN] ≤ T ≤ T_Cp_ч.керосин[rows(T_Cp_ч.керосин)]
    NaN otherwise
# [component: outputs EXCEL_Cp_ч.дизель]
T_Cp_ч.дизель := submatrix(EXCEL_Cp_ч.дизель, 2, 22, 1, 1)
transpose(T_Cp_ч.дизель) = [273, 373, 473, 573, 673, 773, 873, 973, 1073, 1173, 1273, 1373, 1473, 1573, 1673, 1773, 1873, 1973, 2073, 2173, 2273]
Cp_ч.дизель := submatrix(EXCEL_Cp_ч.дизель, 2, 22, 2, 2)
transpose(Cp_ч.дизель) = [1050, 1073.6, 1101.6, 1132, 1163.3, 1194.1, 1223.6, 1251.2, 1276.4, 1299.2, 1319.4, 1337.2, 1352.9, 1366.7, 1379, 1390, 1400, 1409.2, 1417.5, 1424.9, 1430.9]
Cp_ч.дизель(T) :=
    interp(cspline(T_Cp_ч.дизель, Cp_ч.дизель), T_Cp_ч.дизель, Cp_ч.дизель, T) if T_Cp_ч.дизель[ORIGIN] ≤ T ≤ T_Cp_ч.дизель[rows(T_Cp_ч.дизель)]
    NaN otherwise
# [component: outputs EXCEL_Cp_ч.мазут]
T_Cp_ч.мазут := submatrix(EXCEL_Cp_ч.мазут, 2, rows(EXCEL_Cp_ч.мазут), 1, 1)
transpose(T_Cp_ч.мазут) = [273, 373, 473, 573, 673, 773, 873, 973, 1073, 1173, 1273, 1373, 1473, 1573, 1673, 1773, 1873, 1973, 2073, 2173, 2273]
Cp_ч.мазут := submatrix(EXCEL_Cp_ч.мазут, 2, rows(EXCEL_Cp_ч.мазут), 2, 2)
transpose(Cp_ч.мазут) = [1044.5, 1068.4, 1096.6, 1127.1, 1158.3, 1189, 1218.4, 1245.7, 1270.7, 1293.2, 1313.2, 1330.8, 1346.2, 1359.8, 1371.9, 1382.7, 1392.6, 1401.6, 1409.9, 1417.3, 1423.5]
Cp_ч.мазут(T) :=
    interp(cspline(T_Cp_ч.мазут, Cp_ч.мазут), T_Cp_ч.мазут, Cp_ч.мазут, T) if T_Cp_ч.мазут[ORIGIN] ≤ T ≤ T_Cp_ч.мазут[rows(T_Cp_ч.мазут)]
    NaN otherwise
# [component: outputs EXCEL_Cp_ч.пг]
T_Cp_ч.пг := submatrix(EXCEL_Cp_ч.пг, 2, rows(EXCEL_Cp_ч.пг), 1, 1)
transpose(T_Cp_ч.пг) = [273, 373, 473, 573, 673, 773, 873, 973, 1073, 1173, 1273, 1373, 1473, 1573, 1673, 1773, 1873, 1973, 2073, 2173, 2273]
Cp_ч.пг := submatrix(EXCEL_Cp_ч.пг, 2, rows(EXCEL_Cp_ч.пг), 2, 2)
transpose(Cp_ч.пг) = [1099.9, 1120.1, 1146.2, 1176, 1207.5, 1239.4, 1270.4, 1299.8, 1327.2, 1352.1, 1374.5, 1394.5, 1412.3, 1428.1, 1442.3, 1455, 1466.7, 1477.4, 1487.1, 1495.7, 1502.8]
Cp_ч.пг(T) :=
    interp(cspline(T_Cp_ч.пг, Cp_ч.пг), T_Cp_ч.пг, Cp_ч.пг, T) if T_Cp_ч.пг[ORIGIN] ≤ T ≤ T_Cp_ч.пг[rows(T_Cp_ч.пг)]
    NaN otherwise
# [component: outputs EXCEL_Cp_ч.кг]
T_Cp_ч.кг := submatrix(EXCEL_Cp_ч.кг, 2, rows(EXCEL_Cp_ч.кг), 1, 1)
transpose(T_Cp_ч.кг) = [273, 373, 473, 573, 673, 773, 873, 973, 1073, 1173, 1273, 1373, 1473, 1573, 1673, 1773, 1873, 1973, 2073, 2173, 2273]
Cp_ч.кг := submatrix(EXCEL_Cp_ч.кг, 2, rows(EXCEL_Cp_ч.кг), 2, 2)
transpose(Cp_ч.кг) = [1130.9, 1149.5, 1174.9, 1204.7, 1236.7, 1269.3, 1301.5, 1332.2, 1361, 1387.3, 1411.2, 1432.7, 1451.9, 1469, 1484.5, 1498.6, 1511.6, 1523.8, 1535.3, 1546.3, 1556.6]
Cp_ч.кг(T) :=
    interp(cspline(T_Cp_ч.кг, Cp_ч.кг), T_Cp_ч.кг, Cp_ч.кг, T) if T_Cp_ч.кг[ORIGIN] ≤ T ≤ T_Cp_ч.кг[rows(T_Cp_ч.кг)]
    NaN otherwise
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# Теплоемкость чистых продуктов сгорания при α=1 (Дж/кг/К):
Cp_ч.г(P, T, Fuel) :=
    Cp_ч.керосин(T) if (Fuel == "Керосин") or (Fuel == "Бензин")
    Cp_ч.дизель(T) if (Fuel == "Дизель")
    Cp_ч.мазут(T) if (Fuel == "Мазут")
    Cp_ч.пг(T) if (Fuel == "Природный газ")
    Cp_ч.кг(T) if (Fuel == "Коксовый газ")
    NaN if (Fuel == "Водород")
    NaN otherwise
# Ср. теплоемкость чистых продуктов сгорания при α=1 (Дж/кг/К):
Cp_ч.г.ср(P_1, P_2, T_1, T_2, Fuel) :=
    1/(P_2 - P_1)*1/(T_2 - T_1)*integral(integral(Cp_ч.г(P, T, Fuel), T = T_1 .. T_2), P = P_1 .. P_2) if (P_1 ≠ P_2) and (T_1 ≠ T_2)
    1/(P_2 - P_1)*integral(Cp_ч.г(P, 0.5*(T_1 + T_2), Fuel), P = P_1 .. P_2) if (P_1 ≠ P_2) and (T_1 == T_2)
    1/(T_2 - T_1)*integral(Cp_ч.г(0.5*(P_1 + P_2), T, Fuel), T = T_1 .. T_2) if (P_1 == P_2) and (T_1 == T_2)
    Cp_ч.г(0.5*(P_1 + P_2), 0.5*(T_1 + T_2), Fuel)
# [component: outputs EXCEL_Cp_керосин]
T_Cp_керосин := submatrix(EXCEL_Cp_керосин, 2, rows(EXCEL_Cp_керосин), 2, 2)
transpose(T_Cp_керосин) = [293.15, 303.15, 313.15, 323.15, 333.15, 343.15, 353.15, 363.15, 373.15, 383.15, 393.15, 403.15, 413.15, 423.15, 433.15, 443.15, 453.15, 463.15, 473.15, 483.15, 493.15, 503.15, 513.15, 523.15, 533.15, 543.15]
Cp_керосин := submatrix(EXCEL_Cp_керосин, 2, rows(EXCEL_Cp_керосин), 3, 3)
transpose(Cp_керосин) = [2000, 2040, 2090, 2140, 2180, 2230, 2280, 2330, 2380, 2430, 2480, 2530, 2580, 2630, 2680, 2730, 2790, 2840, 2890, 2940, 3000, 3050, 3110, 3160, 3210, 3260]
Cp_керосин(T) := interp(pspline(T_Cp_керосин, Cp_керосин), T_Cp_керосин, Cp_керосин, T)
# [component: outputs EXCEL_Cp_бензин]
T_Cp_бензин := submatrix(EXCEL_Cp_бензин, 2, rows(EXCEL_Cp_бензин), 2, 2)
transpose(T_Cp_бензин) = [293.15, 303.15, 313.15, 323.15, 333.15, 343.15, 353.15, 363.15, 373.15, 383.15, 393.15, 403.15, 413.15, 423.15, 433.15, 443.15, 453.15, 463.15, 473.15, 483.15]
Cp_бензин := submatrix(EXCEL_Cp_бензин, 2, rows(EXCEL_Cp_бензин), 3, 3)
transpose(Cp_бензин) = [2060, 2110, 2150, 2200, 2240, 2300, 2350, 2410, 2460, 2510, 2570, 2620, 2680, 2740, 2800, 2860, 2920, 2980, 3040, 3110]
Cp_бензин(T) :=
    interp(pspline(T_Cp_бензин, Cp_бензин), T_Cp_бензин, Cp_бензин, T) if T_Cp_бензин[ORIGIN] ≤ T ≤ T_Cp_бензин[rows(T_Cp_бензин)]
    NaN otherwise
# [component: outputs EXCEL_Cp_ПГ]
T_Cp_ПГ := transpose(submatrix(EXCEL_Cp_ПГ, 1, 1, 2, cols(EXCEL_Cp_ПГ)))
transpose(T_Cp_ПГ) = [250, 260, 270, 280, 288.15, 293.15, 300, 320, 340, 360, 380, 400, 450]
Cp_ПГ := transpose(submatrix(EXCEL_Cp_ПГ, 6, 6, 2, cols(EXCEL_Cp_ПГ)))
transpose(Cp_ПГ) = [2255, 2252, 2253, 2258, 2266, 2271, 2280, 2314, 2357, 2407, 2464, 2525, 2690]
Cp_ПГ(T) := interp(pspline(T_Cp_ПГ, Cp_ПГ), T_Cp_ПГ, Cp_ПГ, T)
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# Теплоемкость горючего (Дж/кг/К):
Cp_гор(P, T, Fuel) :=
    Cp_керосин(T) if (Fuel == "Керосин")
    Cp_бензин(T) if (Fuel == "Бензин")
    NaN if (Fuel == "Дизель")
    NaN if (Fuel == "Мазут")
    Cp_ПГ(T) if (Fuel == "Природный газ")
    NaN if (Fuel == "Коксовый газ")
    NaN if (Fuel == "Водород")
    NaN otherwise
# Ср. теплоемкость горючего (Дж/кг/К):
Cp_гор.ср(P_1, P_2, T_1, T_2, Fuel) :=
    1/(P_2 - P_1)*1/(T_2 - T_1)*integral(integral(Cp_гор(P, T, Fuel), T = T_1 .. T_2), P = P_1 .. P_2) if (P_1 ≠ P_2) and (T_1 ≠ T_2)
    1/(P_2 - P_1)*integral(Cp_гор(P, 0.5*(T_1 + T_2), Fuel), P = P_1 .. P_2) if (P_1 ≠ P_2) and (T_1 == T_2)
    1/(T_2 - T_1)*integral(Cp_гор(0.5*(P_1 + P_2), T, Fuel), T = T_1 .. T_2) if (P_1 == P_2) and (T_1 ≠ T_2)
    Cp_гор(0.5*(P_1 + P_2), 0.5*(T_1 + T_2), Fuel) otherwise
# Нисшая рабочая теплота сгорания топлива (Дж/кг) [1 с. 7-8]:
Q_нр(Fuel) := 10^3*{
    0.5*(43600 + 42700) if (Fuel == "Керосин") or (Fuel == "Бензин")
    0.5*(42300 + 43100) if (Fuel == "Дизель")
    42300 if (Fuel == "Соляровое масло")
    0.5*(41300 + 40400) if (Fuel == "Мазут")
    0.5*(48630 + 45850) if (Fuel == "Природный газ")
    0.5*(41500 + 10000) if (Fuel == "Коксовый газ")
    121020 if (Fuel == "Водород")
    NaN otherwise
}
# Стехиометрический коэф. [1 с. 19]:
l_0(Fuel) :=
    14.61 if (Fuel == "Керосин") or (Fuel == "Бензин")
    14.35 if (Fuel == "Дизель")
    13.31 if (Fuel == "Мазут")
    14.35 if (Fuel == "Соляровое масло")
    16.683 if (Fuel == "Природный газ")
    9.908 if (Fuel == "Коксовый газ")
    34.29 if (Fuel == "Водород")
    NaN otherwise
# Газовая постоянная продуктов сгорания (Дж/кг/К):
R_газ(α, Fuel) :=
    288.1954313 + 0.69169588/α if (Fuel == "Керосин") or (Fuel == "Бензин")
    288.1856907 - 0.213996376/α if Fuel == "Т-1"
    288.190113 + 0.196844775/α if Fuel == "ТС-1"
    288.1792281 - 0.813445523/α if Fuel == "Дизель"
    288.1729604 - 1.432301634/α if Fuel == "Соляровое масло"
    288.1635509 - 2.254443192/α if Fuel == "Мазут"
    290.0288864 + 12.20796064/α if Fuel == "Природный газ"
    288.4860344 + 20.14625488/α if Fuel == "Коксовый газ"
    289.9681764 + 2.138861745/α if Fuel == "Биогаз"
    NaN otherwise
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R_газ.ср(α_1, α_2, Fuel) :=
    1/(α_2 - α_1)*integral(R_газ(α, Fuel), α = α_1 .. α_2) if (α_1 ≠ α_2)
    R_газ(mean(α_1, α_2), Fuel) otherwise
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# Теплоемкость продуктов сгорания (Дж/кг/К):
Cp_газ(P, T, α, Fuel) := ((1 + l_0(Fuel))*Cp_ч.г(P, T, Fuel) + (α - 1)*l_0(Fuel)*Cp_воздух(P, T))/(1 + α*l_0(Fuel))
T := 0 .. 2000
# Ср. теплоемкость продуктов сгорания (Дж/кг/К):
Cp_газ.ср(P_1, P_2, T_1, T_2, α_1, α_2, Fuel) :=
    1/(α_2 - α_1)*1/(P_2 - P_1)*1/(T_2 - T_1)*integral(integral(integral(Cp_газ(P, T, α, Fuel), T = T_1 .. T_2), P = P_1 .. P_2), α = α_1 .. α_2) if (P_1 ≠ P_2) and (T_1 ≠ T_2) and (α_1 ≠ α_2)
    1/(P_2 - P_1)*1/(T_2 - T_1)*integral(integral(Cp_газ(P, T, mean(α_1, α_2), Fuel), T = T_1 .. T_2), P = P_1 .. P_2) if (P_1 ≠ P_2) and (T_1 ≠ T_2) and (α_1 == α_2)
    1/(α_2 - α_1)*1/(P_2 - P_1)*integral(integral(Cp_газ(P, mean(T_1, T_2), α, Fuel), P = P_1 .. P_2), α = α_1 .. α_2) if (P_1 ≠ P_2) and (T_1 == T_2) and (α_1 ≠ α_2)
    1/(α_2 - α_1)*1/(T_2 - T_1)*integral(integral(Cp_газ(mean(P_1, P_2), T, α, Fuel), T = T_1 .. T_2), α = α_1 .. α_2) if (P_1 == P_2) and (T_1 ≠ T_2) and (α_1 ≠ α_2)
    Cp_газ(mean(P_1, P_2), mean(T_1, T_2), mean(α_1, α_2), Fuel) otherwise
# Динамичекая вязкость [Па*с]:
# Вязкость продуктов сгорания:
μ_газ(T, α_в) := 10^-5*(0.229*(T/1000)^3 - 1.333*(T/1000)^2 + 4.849*(T/1000) + 0.505 - 0.275/α_в)
μ_газ_3D := CreateMesh(μ_газ, 0, 3000, 1, 10, 40, 40)
# [component: inputs μ_газ_3D]
μ(substance, T) :=
    17.16*10^-6*(T/273.15)^0.68 if substance == "воздух"
    13.65*10^-6*(T/273.15)^0.82 if substance == "газ"
    NaN otherwise
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# Коэф. теплопроводности [Вт/м/К]:
λ(substance, T) :=
    244.2*10^-4*(T/273.15)^0.82 if substance == "воздух"
    147*10^-4*(T/273.15)^1.23 if substance == "газ"
    NaN otherwise
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# [component: outputs EXCEL_σ_ВКНА1В]
EXCEL_σ_ВКНА1В = [
    "T [С]", "T [К]", "σ_в [Па]", "σ_10 [Па]", "σ_100 [Па]", "σ_500 [Па]", "σ_1000 [Па]";
    20, 293.15, 725000000, 0, 0, 0, 0;
    900, 1173.15, 630000000, 375000000, 230000000, 170000000, 145000000;
    1000, 1273.15, 475000000, 255000000, 125000000, 80000000, 65000000;
    1100, 1373.15, 395000000, 105000000, 60000000, 40000000, 35000000;
    1200, 1473.15, 225000000, 65000000, 39000000, 27500000, 23000000;
    1250, 1523.15, 135000000, 22000000, 13000000, 0, 0;
    1300, 1573.15, 65000000, 0, 0, 0, 0
]
T_σ_ВКНА1В := submatrix(EXCEL_σ_ВКНА1В, 2, rows(EXCEL_σ_ВКНА1В), ORIGIN + 1, ORIGIN + 1)
σ_в_ВКНА1В := submatrix(EXCEL_σ_ВКНА1В, 2, rows(EXCEL_σ_ВКНА1В), ORIGIN + 2, ORIGIN + 2)
transpose(T_σ_ВКНА1В) = [293.15, 1173.15, 1273.15, 1373.15, 1473.15, 1523.15, 1573.15]
transpose(σ_в_ВКНА1В) = [725, 630, 475, 395, 225, 135, 65]*10^6
σ_в_ВКНА1В(T) := interp(lspline(T_σ_ВКНА1В, σ_в_ВКНА1В), T_σ_ВКНА1В, σ_в_ВКНА1В, T)
Tτ_σ_ВКНА1В[:, 1] := submatrix(EXCEL_σ_ВКНА1В, 3, 6, 2, 2)
Tτ_σ_ВКНА1В[:, 2] := transpose([10, 100, 500, 1000])*3600
transpose(Tτ_σ_ВКНА1В) = [1173.15, 1273.15, 1373.15, 1473.15; 36000, 360000, 1800000, 3600000]
σ_ВКНА1В := submatrix(EXCEL_σ_ВКНА1В, 3, 6, 4, 7)
σ_ВКНА1В = [375, 230, 170, 145; 255, 125, 80, 65; 105, 60, 40, 35; 65, 39, 27.5, 23]*10^6
# Пределы интерполяции необходимы для предотвращения лжи интерполирования
σ_ВКНА1В(T, τ) :=
    interp(lspline(Tτ_σ_ВКНА1В, σ_ВКНА1В), Tτ_σ_ВКНА1В, σ_ВКНА1В, [T; τ]) if (0 < τ ≤ 1500*3600) and (0 < T ≤ 1500)
    NaN otherwise
σ_ВКНА1В(1400, 1500*3600) = 27.275*10^6
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# [component: outputs EXCEL_E.ВТ3_1]
T_E.ВТ3_1 := submatrix(EXCEL_E.ВТ3_1, 2, rows(EXCEL_E.ВТ3_1), ORIGIN + 1, ORIGIN + 1)
transpose(T_E.ВТ3_1) = [293.15, 373.15, 473.15, 573.15, 673.15, 723.15, 773.15, 873.15]
E_ВТ3_1 := submatrix(EXCEL_E.ВТ3_1, 2, rows(EXCEL_E.ВТ3_1), ORIGIN + 3, ORIGIN + 3)
EXCEL_E.ВТ3_1 = [
    "T (С)", "T (K)", "E (кгс/мм^2)", "E (Па)";
    20, 293.15, 11400, 111834000000;
    100, 373.15, 11000, 107910000000;
    200, 473.15, 10750, 105457500000;
    300, 573.15, 10575, 103740750000;
    400, 673.15, 10150, 99571500000;
    450, 723.15, 9650, 94666500000;
    500, 773.15, 8800, 86328000000;
    600, 873.15, 7650, 75046500000
]
transpose(E_ВТ3_1)/10^9 = [111.834, 107.91, 105.457, 103.741, 99.5715, 94.6665, 86.328, 75.0465]
E_ВТ3_1(T) := interp(cspline(T_E.ВТ3_1, E_ВТ3_1), T_E.ВТ3_1, E_ВТ3_1, T)
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# [area: Основные уравнения, алгоритмы, зависимости и ф-и]
# Газовая универсальная постоянная (Дж/К/моль):
R_ун := 8.31446261815
# Температура абс. нуля (К):
T_0 ≡ 273.15
# Гравитационая постоянная (Н*м^2/кг^2):
G := 6.67*10^-11
# Масса Земли (кг):
# Радиус Земли (м):
[M_Земля; R_Земля] ≡ [5.97*10^24; 6371*10^3]
# Ускорение свободного падения (м/с^2):
g(H) := G*M_Земля/(R_Земля + H)^2
# Модуль Юнга I и II рода (Па):
Jung(number, μ, j) :=
    j*2*(1 + μ) if number == 1
    j/(2*(1 + μ)) if number == 2
    NaN otherwise
# Погрешность:
eps(type, x0, x1) :=
    if type == "rel"
        (x1 - x0)/x0 if x0 ≠ 0
        ∞ otherwise
    x1 - x0 if type == "abs"
# Расстоние между точками:
distance(x1, y1, x2, y2) := sqrt((x2 - x1)^2 + (y2 - y1)^2)
# Расстояние от точки до прямой:
distance2line(x0, y0, A, B, C) := |A*x0 + B*y0 + C|/sqrt(A^2 + B^2)
# Целая часть от деления:
div(dividend, divider) := (dividend - mod(dividend, divider))/divider
# Точка пересечения прямых:
# Матрица переноса-поворота осей
# в точку против часовой стрелки:
axis_x(x, y, xc, yc, α, scale) := ((x - xc)*cos(α) + (y - yc)*sin(α))*scale
axis_y(x, y, xc, yc, α, scale) := (-(x - xc)*sin(α) + (y - yc)*cos(α))*scale
COOR(A1, B1, C1, A2, B2, C2) :=
    [x; y] ← [(C1 - C2)/(A2 - A1); (A2*C1 - A1*C2)/(A2 - A1)]
    [x; y]
# Ф-я номера сечения по номеру ступени (i)
# и положению сечения в ступени (j):
st(i, j) :=
    2*i - 1 if j == 1
    2*i if j == 2
    2*i + 1 if j == 3
    NaN otherwise
# Ф-я ср. сечения:
av(N_r) := ceil(0.5*N_r)
# Коэффициенты прямой:
# Угол между проекциями скоростей [рад]:
triangle(υ_a, υ_u) :=
    atan(υ_a/υ_u) if υ_u > 0
    0.5*π if υ_u == 0
    π + atan(υ_a/υ_u) if υ_u < 0
LINE_ABC(x1, y1, x2, y2) :=
    [A; B; C] ← [(y2 - y1)/(x2 - x1); -1; (x2*y1 - x1*y2)/(x2 - x1)]
    [A; B; C]
# Ср. относ. радиус ():
r̅_ср(d̅) := sqrt((1 + d̅^2)/2)
# Первая производная функции:
derivative(f, x, dx) := (f(x + dx/2) - f(x - dx/2))/dx
Ju(Jx0, Jy0, Jxy0) := (Jx0 + Jy0)/2 - 1/2*sqrt((Jx0 - Jy0)^2 + 4*Jxy0^2)
# Моменты инерции главных центральных осей (мм^4):
Jv(Jx0, Jy0, Jxy0) := (Jx0 + Jy0)/2 + 1/2*sqrt((Jx0 - Jy0)^2 + 4*Jxy0^2)
# Относ. профиль NACA:
NACA(f̅, x̅_f, c̅, o) :=
    [i_minU, i_minL] ← [ORIGIN, ORIGIN]
    for i ∈ 1 .. N_dis
        β_i[i] ← 0 + (i - 1)*π/(2*N_dis)
        X_i[i] ← 1 - cos(β_i[i])
        Y_f[i] ← f̅*{
            x̅_f^-2*(2*x̅_f*X_i[i] - X_i[i]^2) if 0 ≤ X_i[i] < x̅_f
            (1 - x̅_f)^-2*(1 - 2*x̅_f + 2*x̅_f*X_i[i] - X_i[i]^2) if x̅_f ≤ X_i[i]
        }
        gradY_f[i] ← 2*f̅*{
            x̅_f^-2*(x̅_f - X_i[i]) if 0 ≤ X_i[i] < x̅_f
            (1 - x̅_f)^-2*(x̅_f - X_i[i]) if x̅_f ≤ X_i[i]
        }
        [a_0; a_1; a_2; a_3; a_4] ← [
            0.2969;
            -0.126;
            -0.3516;
            0.2843;
            {
                -0.1036 if o == 0
                -0.1015 if o == 1
            }
        ]
        Y_c[i] ← c̅/0.2*(a_0*sqrt(X_i[i]) + a_1*X_i[i] + a_2*X_i[i]^2 + a_3*X_i[i]^3 + a_4*X_i[i]^4)
        θ[i] ← atan(gradY_f[i])
        [X_U[i], Y_U[i]; X_L[i], Y_L[i]] ← [
            X_i[i] - Y_c[i]*sin(θ[i]), Y_f[i] + Y_c[i]*cos(θ[i]);
            X_i[i] + Y_c[i]*sin(θ[i]), Y_f[i] - Y_c[i]*cos(θ[i])
        ]
        i_minU ← i if (i ≠ ORIGIN) and (X_U[i] < X_U[i - 1])
        i_minL ← i if (i ≠ ORIGIN) and (X_L[i] < X_L[i - 1])
    X_U ← submatrix(X_U, i_minU, N_dis, ORIGIN, ORIGIN)
    Y_U ← submatrix(Y_U, i_minU, N_dis, ORIGIN, ORIGIN)
    X_L ← submatrix(X_L, i_minL, N_dis, ORIGIN, ORIGIN)
    Y_L ← submatrix(Y_L, i_minL, N_dis, ORIGIN, ORIGIN)
    [X_U, Y_U; X_L, Y_L]  # error: Эта переменная не определена.
# Ф-я формы ср. линии профиля:
y/b_ср.л(x/b, θ) := sqrt((2*sin(0.5*θ))^-2 - (x/b - 0.5)^2) - 0.5*cot(0.5*θ)
# Приближенный угол установки профиля в решетке [1, с.114]:
# Частота собственных изгибных колебаний (Гц) [9, с.240]:
υ_установки(γ_inlet, γ_outlet) := (70 - 0.127*(γ_inlet/deg - γ_outlet/deg) - 0.0041*(γ_inlet/deg - γ_outlet/deg)^2)*deg
ν0_изгиб(mode, h, E, ρ, area, Ju) :=
    kl ← transpose([1.875, 4.694, 7.855, 11.00, 14.14, 17.28])
    kl[mode]^2/(2*π*h^2)*sqrt(E*Ju/(ρ*area)) if 1 ≤ mode ≤ rows(kl)
    NaN otherwise
# Угол установки, вычесленный по углам треугольника скоростей и координате пересечения лучей входа и выхода потока:
υ_installation(k, υ_inlet, υ_outlet) :=
    υ_inlet ← π - υ_inlet if υ_inlet > π/2
    υ_outlet ← π - υ_outlet if υ_outlet > π/2
    atan(tan(υ_outlet)/(1 + (tan(υ_outlet)/tan(υ_inlet) - 1)*k))
# Частота собственных угловых колебаний (Гц) [9, с.243]:
ν0_угл(mode, bandage, h, G, ρ, stiffness, Jp) := sqrt(G*stiffness/(ρ*Jp))*{
    (2*mode - 1)/(4*h) if bandage == 0
    mode/(2*h) otherwise
}
# Оптимальный относительный шаг в решетке () [1, с.183-184]:
t̅_опт(type, cool, γ_inlet, γ_outlet, c̅_max) :=
    c̅_max ←
        if c̅_max == 0
            c̅_max ←
                mean(0.2, 0.22) if cool == 1
                mean(0.1, 0.12) otherwise
        c̅_max otherwise
    {
        0.45 if type == "СА"
        0.6 if type == "РК"
    }*nthroot(180/(180 - (γ_inlet/deg + γ_outlet/deg))*sin(γ_inlet)/sin(γ_outlet), 3)*(1 - c̅_max)*{
        mean(1.05, 1.1) if cool
        1 otherwise
    }
# Характеристики профиля:
foil_properties(coordinates) :=
    [x_upper, y_upper; x_lower, y_lower] ← coordinates
    f_upper(x) ← interp(lspline(x_upper, y_upper), x_upper, y_upper, x)
    f_lower(x) ← interp(lspline(x_lower, y_lower), x_lower, y_lower, x)
    [x_max; x_min] ← [max(stack(x_lower, x_upper)); min(stack(x_lower, x_upper))]
    [l_upper; l_lower] ← [
        integral(sqrt(1 + (d/dx(f_upper(x)))^2), x = x_min .. x_max);
        integral(sqrt(1 + (d/dx(f_lower(x)))^2), x = x_min .. x_max)
    ]
    area ← integral(integral(1, y = f_lower(x) .. f_upper(x)), x = x_min .. x_max)
    [Sx; Sy] ← [
        integral(integral(y, y = f_lower(x) .. f_upper(x)), x = x_min .. x_max);
        integral(integral(x, y = f_lower(x) .. f_upper(x)), x = x_min .. x_max)
    ]
    [x0; y0] ← 1/area*[Sy; Sx]
    [Jx; Jy; Jxy] ← [
        integral(integral(y^2, y = f_lower(x) .. f_upper(x)), x = x_min .. x_max);
        integral(integral(x^2, y = f_lower(x) .. f_upper(x)), x = x_min .. x_max);
        integral(integral(x*y, y = f_lower(x) .. f_upper(x)), x = x_min .. x_max)
    ]
    [Jx0; Jy0; Jxy0] ← [Jx; Jy; Jxy] - area*[y0^2; x0^2; x0*y0]
    α_major ← 0.5*atan(2*Jxy0/(Jy0 - Jx0))
    [Ju; Jv; Juv] ← [
        Jx0*cos(α_major)^2 + Jy0*sin(α_major)^2 - Jxy0*sin(2*α_major);
        Jx0*sin(α_major)^2 + Jy0*cos(α_major)^2 + Jxy0*sin(2*α_major);
        (Jx0 - Jy0)/2*sin(2*α_major) + Jxy0*cos(2*α_major)
    ]
    Jp ← Jx0 + Jy0
    Wp ← Jp/max(sqrt((0 - x0)^2 + (0 - y0)^2), sqrt((1 - x0)^2 + (0 - y0)^2))
    stiffness ← 1/3*integral((f_upper(x) - f_lower(x))^3, x = x_min .. x_max)
    [CPx; CPy] ← [0.35; 0]*(x_max - x_min)
    [
        l_upper;
        l_lower;
        area;
        Sx;
        Sy;
        x0;
        y0;
        Jx;
        Jy;
        Jxy;
        Jx0;
        Jy0;
        Jxy0;
        α_major;
        Ju;
        Jv;
        Juv;
        Jp;
        Wp;
        stiffness;
        CPx;
        CPy
    ]
ε_(b/t)=1(β_outlet) := deg*{
    (0.005*(β_outlet/deg)^2 - 0.05*(β_outlet/deg) + 5) if β_outlet ≤ 60*°
    (-0.0016*(β_outlet/deg)^2 + 0.7031*(β_outlet/deg) - 16.646) otherwise
}
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# [14, c. 27]
# [component: outputs EXCEL_b/t=1_ε/ε]
# [14, c. 27]
transpose(EXCEL_b/t=1_ε/ε) = [
    "b/t=1", 0.5, 0.6, 0.7, 0.8, 0.9, 1, 1.1, 1.2, 1.3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;
    "ε/ε", 0.5, 0.69, 0.79, 0.87, 0.94, 1, 1.07, 1.13, 1.18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]
b/t=1_. := submatrix(EXCEL_b/t=1_ε/ε, 2, rows(EXCEL_b/t=1_ε/ε), ORIGIN, ORIGIN)
transpose(b/t=1_.) = [0.5, 0.6, 0.7, 0.8, 0.9, 1, 1.1, 1.2, 1.3, 1.4, 1.5, 1.6, 1.7, 1.8, 1.9, 2, 2.1, 2.2, 2.3]
ε/ε_. := submatrix(EXCEL_b/t=1_ε/ε, 2, rows(EXCEL_b/t=1_ε/ε), ORIGIN + 1, ORIGIN + 1)
transpose(ε/ε_.) = [0.5, 0.69, 0.79, 0.87, 0.94, 1, 1.07, 1.13, 1.18, 1.22, 1.26, 1.3, 1.34, 1.375, 1.4, 1.425, 1.45, 1.475, 1.5]
b/t=1(ε/ε) := interp(cspline(ε/ε_., b/t=1_.), ε/ε_., b/t=1_., ε/ε)
ε/ε(b/t=1) := interp(cspline(b/t=1_., ε/ε_.), b/t=1_., ε/ε_., b/t=1)
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ζ⋅sin(β3)/(2b/t)(Dp) := 0.0833*Dp^3 + 0.0082*Dp + 0.005
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# [14, c. 30]
# Ф-я приведенной скорости:
λ_M(M, k) := sqrt((k + 1)/2*M^2/(1 + (k - 1)/2*M^2))
# Ф-я числа Маха:
M_λ(λ, k) := λ*sqrt(2/(k + 1))/sqrt(1 - (k - 1)/(k + 1)*λ^2)
# Газодинамические ф-и ГДФ:
ГДФ(parameter, λ, k) :=
    return (1 - λ^2*(k - 1)/(k + 1)) if parameter == "T"
    return (1 - λ^2*(k - 1)/(k + 1))^(k/(k - 1)) if parameter == "P"
    return (1 - λ^2*(k - 1)/(k + 1))^(1/(k - 1)) if parameter == "ρ"
    return λ*((k + 1)/2)^(1/(k - 1))*(1 - λ^2*(k - 1)/(k + 1))^(1/(k - 1)) if parameter == "G"
    return NaN otherwise
# Коэф. расхода:
m_q(k) := sqrt(k*(2/(k + 1))^((k + 1)/(k - 1)))
# Число Рейнольдса:
Re(v, d, ρ, μ) := v*d*ρ/μ
# Число Прандтля:
Pr(μ, Cp, λ) := μ*Cp/λ
# Число Нуссельта:
Nu(α, d, λ) := α*d/λ
# Глубина охлаждения [1, c.21]:
θ_глубина(T*_г, T*_х, T_доп) := (T*_г - T_доп)/(T*_г - T*_х)
# Коэф. теплопроводности [Вт/м/К]:
λ(substance, T) :=
    244.2*10^-4*(T/273.15)^0.82 if substance == "воздух"
    147*10^-4*(T/273.15)^1.23 if substance == "продукты сгорания"
    NaN otherwise
# Динамичекая вязкость [Па*с]:
μ(substance, T) :=
    17.16*10^-6*(T/273.15)^0.68 if substance == "воздух"
    13.65*10^-6*(T/273.15)^0.82 if substance == "продукты сгорания"
    NaN otherwise
# Политропический КПД К и Т ():
η*_n(node, η*, π*, k) :=
    if node == "сжатие"
        1 if π* == 1
        ln((π*^((k - 1)/k) - 1)/η* + 1) otherwise
    if node == "расширение"
        1 if π* == 1
        -k/(k - 1)*ln(η**(π*^((1 - k)/k) - 1) + 1)/ln(π*) otherwise
    NaN otherwise
# Показатель адиабаты:
k_ад(Cp, R) := Cp/(Cp - R)
# Приблизительный показатель адиабаты продуктов сгорания () [1, с.22]:
k_газа(T*) := 0.034*(T*/1000)^2 - 0.144*(T*/1000) + 1.429
# Критическая скорость (м/с):
a_кр(k, R, T*) := sqrt(2*k/(k + 1)*R*T*)
α_смешение(g_ок, g_add, g_гор, Fuel) := (g_ок + g_add)/(g_гор*l_0(Fuel))
T_смешение(P, T, g, α_ок1, P_add, T_add, g_add, α_ок3, Fuel) :=
    T_см ← T
    while 1 > 0
        T'_см ← (g*Cp_газ.ср(P_атм(0), P, T_0, T, α_ок1, α_ок3, Fuel)*T + g_add*Cp_воздух.ср(P_атм(0), P_add, T_0, T_add)*T_add)/(g*Cp_газ.ср(P_атм(0), P, T_0, T_см, α_ок1, α_ок3, Fuel) + g_add*Cp_воздух.ср(P_атм(0), P_add, T_0, T_см))
        if |eps("rel", T_см, T'_см)| ≤ epsilon
            T_см ← T'_см
            break
        T_см ← T'_см
    T_см  # error: Эта переменная не определена.
P_смешение(P, g, P_add, g_add) := (g*P + g_add*P_add)/(g + g_add)
COMPRESSOR3(π*, η*, k_1, P*_1, T*_1) :=
    P*_3 ← P*_1*π*
    iteration ← 0
    T*_3 ← T*_1
    while 1 > 0
        iteration ← iteration + 1
        trace(concat("iteration К = ", num2str(iteration)))
        Cp ← Cp_воздух.ср(P*_1, P*_3, T*_1, T*_3)
        k ← k_ад(Cp, R_в)
        T*'_3 ← T*_1*(1 + (π*^((k - 1)/k) - 1)/η*)
        if |eps("rel", T*_3, T*'_3)| ≤ epsilon
            T*_3 ← T*'_3
            break
        T*_3 ← T*'_3
    Cp_3 ← Cp_воздух(P*_3, T*_3)
    k_3 ← k_ад(Cp_3, R_в)
    transpose([iteration, T*_3, P*_3, Cp_3, k_3])  # error: Эта переменная не определена.
POWERTURBINE3(π*, η*, k_1, P*_1, T*_1, α_ок3) :=
    P*_3 ← P*_1/π*
    iteration ← 0
    T*_3 ← T*_1
    while 1 > 0
        iteration ← iteration + 1
        trace(concat("iteration СТ = ", num2str(iteration)))
        R ← R_газ.ср(α_ок3, α_ок3, Fuel)
        Cp ← Cp_газ.ср(P*_1, P*_3, T*_1, T*_3, α_ок3, α_ок3, Fuel)
        k ← k_ад(Cp, R)
        T*'_3 ← T*_1*(1 - (1 - π*^((1 - k)/k))*η*)
        if |eps("rel", T*_3, T*'_3)| ≤ epsilon
            T*_3 ← T*'_3
            break
        T*_3 ← T*'_3
    Cp_3 ← Cp_газ(P*_3, T*_3, α_ок3, Fuel)
    k_3 ← k_ад(Cp_3, R_газ(α_ок3, Fuel))
    transpose([iteration, T*_3, P*_3, Cp_3, k_3])  # error: Эта переменная не определена.
TURBINE3(η*, L, α_ок1, k_1, g_1, P*_1, T*_1, χ, g_охл, P*_охл, T*_охл, g_гор) :=
    α_СА3 ← α_смешение(g_1 - g_гор, χ*g_охл, g_гор, Fuel)
    R_СА3 ← R_газ(α_СА3, Fuel)
    P*_СА3 ← P_смешение(P*_1, g_1, P*_охл, χ*g_охл)
    T*_СА3 ← T_смешение(P*_1, T*_1, g_1, α_ок1, P*_охл, T*_охл, χ*g_охл, α_СА3, Fuel)
    Cp_СА3 ← Cp_газ(P*_СА3, T*_СА3, α_СА3, Fuel)
    k_СА3 ← k_ад(Cp_СА3, R_СА3)
    α_РК3 ← α_СА3
    R_РК3 ← R_газ(α_РК3, Fuel)
    iteration ← 0
    [P*_РК3, T*_РК3] ← [P*_СА3, T*_СА3]
    while 1 > 0
        iteration ← iteration + 1
        trace(concat("iteration T = ", num2str(iteration)))
        R ← R_газ.ср(α_СА3, α_РК3, Fuel)
        Cp ← Cp_газ.ср(P*_СА3, P*_РК3, T*_СА3, T*_РК3, α_СА3, α_РК3, Fuel)
        k ← k_ад(Cp, R)
        π* ← (1 - L/(Cp*T*_СА3*η*))^(k/(1 - k))
        P*_РК3 ← P*_СА3/π*
        T*_РК3 ← T*_СА3 - L/Cp
        break if L == 0 or |eps("rel", L, Cp_газ.ср(P*_СА3, P*_РК3, T*_СА3, T*_РК3, α_СА3, α_РК3, Fuel)*(T*_СА3 - T*_РК3))| ≤ epsilon
    α_ок3 ← α_смешение(g_1 - g_гор, g_охл, g_гор, Fuel)
    R_3 ← R_газ(α_ок3, Fuel)
    P*_3 ← P_смешение(P*_РК3, g_1 + χ*g_охл, P*_охл, (1 - χ)*g_охл)
    T*_3 ← T_смешение(P*_РК3, T*_РК3, g_1 + χ*g_охл, α_РК3, P*_охл, T*_охл, (1 - χ)*g_охл, α_ок3, Fuel)
    Cp_3 ← Cp_газ(P*_3, T*_3, α_ок3, Fuel)
    k_3 ← k_ад(Cp_3, R_газ(α_ок3, Fuel))
    transpose([iteration, α_ок3, R_3, T*_3, P*_3, Cp_3, k_3, π*])  # error: Эта переменная не определена.
# Фор-ла Тихонова относ. массового расхода на охлаждение
# по максимальной и допустимой температуре,
# отнесенного к массовому расходу на выходе из КС:
g_Тихонов(T_г, T_доп) :=
    g ← 0.01 + 0.09*((T_г - T_доп)/1000) + 0.2*((T_г - T_доп)/1000)^2 + 0.16*((T_г - T_доп)/1000)^3
    g ← 0 if g < 0
    g ← NaN if g > 1
    g
# Фор-ла ЦИАМ относ. массового расхода на охлаждение
# по температурам перед КС, после КС и допустимой,
# отнесенного к массовому расходу на выходе из КС:
g_ЦИАМ(T_КС3, T_доп, T_КС1) :=
    g ← 0.059*θ_глубина(T_КС3, T_КС1, T_доп)/(1 - 1.42*θ_глубина(T_КС3, T_КС1, T_доп))
    g ← 0 if g < 0
    g ← NaN if g > 1
    g
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# Потери на трение в решетках [1, с 184]:
# Удельные потери в Л [1, с. 79]:
ξ_Л(ξ, υ) := (ξ^-2 - 1)*υ^2/2
ξ_трение(γ_inlet, γ_outlet) :=
    x ←
        γ_inlet + γ_outlet if γ_inlet + γ_outlet ≤ 110 °
        110 ° otherwise
    y ←
        sin(γ_inlet)/sin(γ_outlet) if sin(γ_inlet)/sin(γ_outlet) ≤ 1.7
        1.7 otherwise
    0.02185*(0.01065*(x/deg)^2 - 2.295*(x/deg) + 160.5)*(0.1055*y^2 - 0.3427*y + 0.295)
# Удельные потери с выходной скоростью [1, c.79]:
ξ_выход(υ) := υ^2/2
# Потери в радиальном необондаженном зазоре [1, с. 80]:
ξ_r.зазор(Δ_r, h, D_ср, R, Lu) := 1.37*(1 + 1.6*R)*(1 + h/D_ср)*Δ_r/h*Lu
# Кромочные потери [1, c. 128-129]: | Поправка на Re [1, с.184]: | Удельные потери на трение и вентиляцию [1, c. 82-83]:
ξ_Re(Re) :=
    2100/Re - 0.0021 if 10^4 ≤ Re ≤ 10^8
    0 otherwise
ξ_кромка(r_outlet, step, γ_outlet) := 0.2*r_outlet/(step*sin(γ_outlet))
ξ_трениеИвентиляция(D, h, u, ρ, G) :=
    N_трениеИвентиляция ← 10^3*(1.07*D^2 + 61*(1 - 1)*D*h)*(u/100)^3*ρ
    N_трениеИвентиляция/G
# Вторичные потери [1, c. 131, ГОСТ 58990-2020]:
ξ_вторичные(ζ, step, γ_outlet, h) := 2*ζ*step*sin(γ_outlet)/h
# Потери смешения [Абрамович В.И. Прикладная газовая динамика ч.1]:
# Поправка на сжимаемость [ГОСТ Р 58990-2020]:
ξ_смешение(type, g_охл) :=
    c̅_охл ←
        mean(0.4, 0.5) if type == "СА"
        mean(0.4, 0.55) if type == "РК"
    g_охл/(1 + g_охл)*(1 - c̅_охл)^2
ξ_сжимаемость(type, λ) :=
    λ_опт ←
        0.9 if type == "СА"
        0.8 if type == "РК"
    [a_1; a_2] ←
        [0.3; -0.015] if (type == "СА") and (λ/λ_опт > 1)
        [0.28; 0.035] if (type == "РК") and (λ/λ_опт > 1)
        [0.01; -0.01] otherwise
    X ←
        0.3 if λ/λ_опт < 0.3
        λ/λ_опт if 0.3 ≤ λ/λ_опт ≤ 1.35
        1.35 if 1.35 < λ/λ_опт
    a_1*(X - 1)^2 + a_2*(X - 1)
# Термодинамические потери:
ξ_ТД(type, T*_см, T*, P, Cp, R, G, F, γ, u) :=
    AB ←
        F/G*Cp/R*P*sin(γ) if type == "СА"
        F/G*Cp/R*P*sin(γ) - u*cos(γ) if type == "РК"
    [υ_смешение; υ_теория] ←
        [sqrt(AB^2 + 2*Cp*T*_см) - AB; sqrt(AB^2 + 2*Cp*T*) - AB] if type == "СА"
        [sqrt(AB^2 + 2*Cp*T*_см - u^2) - AB; sqrt(AB^2 + 2*Cp*T* - u^2) - AB] if type == "РК"
    (υ_теория^2 - υ_смешение^2)/2
# Число Нусельта () для газа [12, с. 34-35, 6, с. 333]:
Nu_ЦИАМ(Re, γ_inlet, γ_outlet) := (0.07 + 100*(γ_inlet/deg + γ_outlet/deg)^-2)*Re^0.68
Nu_КАИ(Re, γ_inlet, γ_outlet, b, t, installation_angle) := 0.206*Re^0.66*(sin(γ_inlet)/sin(γ_outlet)*(2*(b*sin(installation_angle))/(t*sin(γ_inlet + γ_outlet)*cos((γ_inlet - γ_outlet)/2)^2) - 1)^0.5)^-0.58
# Поправочный коэффициент для Nu переходного режима [6, с. 54]:
[Re_переход; Nu_переход] := [
    transpose([2200, 2300, 2500, 3000, 3500, 4000, 5000, 6000, 9000, 10000]);
    transpose([0.22, 0.35, 0.45, 0.59, 0.7, 0.76, 0.86, 0.91, 0.99, 1.0])
]
Nu_переход(Re) :=
    interp(cspline(Re_переход, Nu_переход), Re_переход, Nu_переход, Re) if Re ≤ 10000
    1 otherwise
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# Параметр пленки:
A_пленка(x, d_щель.экв, Re_экв, m_вдув, T_фактор) := x/d_щель.экв*Re_экв^-0.25*m_вдув^-1.3*T_фактор^-1.25
# Эффективность пленочного охл. ():
Θ_пленка(A) :=
    1 if A ≤ 3
    (A/3)^-0.285 if 3 < A < 11
    (A/7.43)^-0.95 otherwise
# Коэф. угла выдува охл. потока ():
k_α(α) :=
    1 if α ≤ 30*deg
    1 - (α/deg - 30)*(1 - mean(0.55, 0.73))/60 otherwise
# [area: Исходные данные]
# Массовый расход воздуха перед КС (кг/с):
G_в := 31.35
# Скорость потокп перед КС (м/с):
c_КС1 := 48.9
# Полное давление перед КС (Па):
P*_КС1 := 2845.6*10^3
# Полная температура перед КС (К):
T*_КС1 := 806.9
# Показатель адиабаты воздуха:
k_в := 1.4
# Горючее:
Fuel ≡ "Керосин"
# Температура горючего (К):
T_гор := 280
# Полная температура после КС (К):
T*_г := 1773
# [area: Выбираемые параметры]
# Коэф. полноты сгорания:
η_г := 0.99
0.95 ≤ η_г ≤ 0.995 = 1
200*10^3/3600 ≤ H_ГТУ ≤ 600*10^3/3600
# Теплонапряженность (Дж/м^3/с/Па):
H ≡ 5000/3600*10^3
4000*10^3/3600 ≤ H_ГТД ≤ 5000*10^3/3600
# Коэф. избытка окислителся в первичной зоне ():
α_г ≡ 1.1
1.05 ≤ α_г ≤ 1.2 = 1
# Ср. диаметр КС (м):
d_ср := 0.6
# Скорость в первичной зоне (м/с):
w_I := 10
5 ≤ w_I ≤ 12 = 1
# Скорость во вторичной зоне (м/с):
w_II := 25
# Количество подводов расхода из вторичнолй зоны ():
N := 4
# [area: Термодинамический расчет]
# Массовые доли компонентов горючего:
[C_р; H_р; S_р; A_p; O_р; W_p] :=
    [86.5; 13; 0.3; 0; 0.2; 0] if Fuel == "Дизель"
    [86; 13.7; 0.2; 0; 0.1; 0] if Fuel == "Керосин"
    NaN otherwise
    = [86; 13.7; 0.2; 0; 0.1; 0]
# Низшая теплота сгорания (Дж/кг):
Q_н := 4.19*(81*C_р + 246*H_р - 26*(O_р - S_р) - 6*W_p)*10^3 = 43.3196*10^6
# Необходимое количество окислителя (кг_воздуха/кг_горючего):
L_о := 0.1149*C_р + 0.3348*H_р - 0.0431*(S_р - O_р) = 14.4638
# Начальная температура измерений (К):
T_0 := 300
# Теплоемкость воздуха (Дж/кг/К):
Cp_в := k_в/(k_в - 1)*R_в = 1004.99
# Суммарный коэф. избытка окислителя:
α_Σ := (η_г*Q_н - Cp_ч.г(P*_КС1, T*_КС1, Fuel)*(1 + L_о)*(T*_г - T_0) + Cp_в*L_о*(T*_г - T_0))/(Cp_в*L_о*(T*_г - T_0)) = 1.71607
# Расход топлива (кг/с):
G_т := G_в/(α_Σ*L_о) = 1.26304
# Массовый расход в первичной зоне (кг/с):
G_I := G_в*α_г/α_Σ = 20.0953
# Массовый расход во вторичной зоне (кг/с):
G_II := G_в - G_I = 11.2547
# Массовый расзод в одном подводящем канале вторичной зоны (кг/с):
ΔG := G_II/N = 2.81367
# Дискретизация подводящих каналов:
i := 1 .. N
# Коэф. избытка окислителя в сечениях:
α[i] := α_г*(G_I + ΔG*i)/G_I
transpose(α) = [1.25402, 1.40804, 1.56205, 1.71607]
# [area: Основные геометрические размеры]
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# Критическая скорость перед КС (м/с):
a*_КС1 := sqrt(2*k_в/(k_в + 1)*R_в*T*_КС1) = 519.912
# Приведенная скорость перед КС ():
λ_КС1 := c_КС1/a*_КС1 = 0.0940543
# Полная плотность перед КС (кг/м^3):
ρ*_КС1 := P*_КС1/(R_в*T*_КС1) = 12.2818
# Плотность перед КС (кг/м^3):
ρ_КС1 := ρ*_КС1*ГДФ("ρ", λ_КС1, k_в) = 12.2365
# Площадь входа в первичную и вторичную зоны (м^2):
[F_I; F_II] := 1/ρ_КС1*[G_I/w_I; G_II/w_II] = [0.164224; 0.0367904]
# Объем жаровой трубы (м^3):
V_жт := G_т*Q_н*η_г/(H*P*_КС1) = 0.0137055
# Длина жаровой трубы (м):
L_жт := V_жт/F_I = 83.4564*10^-3
# Длина зоны горения (м):
L_гор := 0.75*L_жт = 62.5923*10^-3
# Длина жаровой трубы с конструктивом (м):
L_жт := L_жт + 0.1 = 183.456*10^-3
# Высота жаровой трубы (м):
h_I := F_I/(π*d_ср) = 87.1235*10^-3
# Диаметры первичной зоны (м):
[d_перI; d_корI] := d_ср + [h_I; -h_I] = [687.123; 512.877]*10^-3
# Высота вторичной зоны (м):
h_II := (-d_перI + sqrt(d_перI^2 + 4*F_II/π))/2 = 16.6402*10^-3
# Внешний диаметр вторичной зоны (м):
d_перII := d_перI + 2*h_II = 720.404*10^-3
# [area: Оценка потерь далвения в КС]
# Скоростной напор перед КС (Па):
ΔP_КС1 := ρ_КС1*c_КС1^2/2 = 14.6301*10^3
# Коэф. тепловых потерь в КС ():
ξ_тепло := 1/2*(T*_КС1/T*_г - 1)^2*((F_I + F_II)/F_I)^2 = 0.222422
# Относ. потери давления из-за подвода тепла ():
ξ_тепло*ΔP_КС1/P*_КС1 = 0.114354 %
