# Домашнее задание
#
# по дисциплине
# ТЕПЛООБМЕННЫЕ АППАРАТЫ
#
# "РАСЧЕТ ПАРАМЕТРОВ МАТРИЦЫ ТЕПЛООБМЕННИКА"
# Теплоемкость ТН криптона при 140000 Па
# [component: outputs C_pх]
j := 1, 2 .. 18
M_Tх[j] := C_pх[j, 0]
M_cpх[j] := C_pх[j, 1]
# Условие задания:
#
# 1. Определить величину поверхности теплообмена и геометрические размеры пластинчато-ребристой матрицы теплообменного апарата для схемы противотока при условии заданной величины максимально допустимых потерь давления каждого теплоносителя.
#
# 2. Определить величину поверхности теплообмена и геометрические размеры пластинчато-ребристой матрицы теплообменного аппарата для одноходовой перекрестной схемы при условии заданной величины потерь давления каждого теплоносителя.
M_Tх[j] =  # error: Эта переменная не определена.
M_cpх[j] =  # error
# Исходные данные: | горячий | холодный
# Поверхность:
#
# Теплоноситель:
#
# Массовый расход, кг/с:
#
# Давление, Па
#
# Потери давления,
#
# Температура, К:
#
# Степень регенерации:
surf_г := 102
surf_х := 107
ТН_г := "Kr"
ТН_х := "Kr"
G_г := 0.9
G_х := 0.9
P_г := 0.23*10^6
P_х := 0.14*10^6
ΔP_г := 0.017
ΔP_х := 0.02
C_pх(t) := interp(cspline(M_Tх, M_cpх), M_Tх, M_cpх, t)
T_г1 := 650
T_х1 := 320
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σ := 0.72
# Список сокращений и условных обозначений
# ТА - теплообменный аппарат
# ТН - теплоноситель
# ТО - теплообмен
# Г - горячий
# Х - холодный
# Пов-ть - поверхность
# Хар-ка - характеристика
# Св-во - свойство
# Коэф. - коэффициент
# Задание 1. Определить величину поверхности теплообмена и геометрические размеры пластинчато-ребристой матрицы теплообменного апарата для схемы противотока при условии заданной величины максимально допустимых потерь давления каждого теплоносителя.
# Решение:
# Теплоемкость ТН криптона при 230000
# [component: outputs C_pг]
j := 1, 2 .. 18
# Температура Х ТН на выходе (К):
T_х2 := T_х1 + σ*(T_г1 - T_х1) = 557.6
M_Tг[j] := C_pг[j, 0]
M_cpг[j] := C_pг[j, 1]
M_Tг[j] =  # error
M_cpг[j] =  # error
# Средняя температура Х ТН (К):
T_хср := (T_х1 + T_х2)/2 = 438.8
# Абсолутный ноль температуры:
T_0 := 273.15
# Расчет теплофизических св-в (плотности, теплоемкости, коэф. динамической вязкости и теплопроводности) ТН с использованием справочника Варгафтика методом линейной интерполяции и таблицы учебника Иванова таблица 2.1 с. 91:
# Газовая постоянная ТН (Дж/кг/К):
R(ТН) :=
    297 if ТН == "N2"
    488.5 if ТН == "NH3"
    208.2 if ТН == "Ar"
    4118.2 if ТН == "H2"
    287.4 if ТН == "Air"
    2078.2 if ТН == "He"
    260 if ТН == "O2"
    99.3 if ТН == "Kr"
    63.4 if ТН == "Xe"
    412.2 if ТН == "Ne"
    189 if ТН == "CO2"
    NaN otherwise
C_pг(t) := interp(cspline(M_Tг, M_cpг), M_Tг, M_cpг, t)
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R_г := R(ТН_г) = 99.3
R_х := R(ТН_х) = 99.3
# Коэф. динамической вязкости
# при абсолютном нуле (Па*с):
# Показатель коэф. динамической вязкости:
μ_0(ТН) := 10^-6*{
    16.67 if ТН == "N2"
    9.7 if ТН == "NH3"
    21.08 if ТН == "Ar"
    8.36 if ТН == "H2"
    17.16 if ТН == "Air"
    18.64 if ТН == "He"
    19.42 if ТН == "O2"
    23.44 if ТН == "Kr"
    21.08 if ТН == "Xe"
    29.71 if ТН == "Ne"
    13.65 if ТН == "CO2"
    NaN otherwise
}
m(ТН) :=
    0.68 if ТН == "N2"
    1.06 if ТН == "NH3"
    0.72 if ТН == "Ar"
    0.68 if ТН == "H2"
    0.68 if ТН == "Air"
    0.68 if ТН == "He"
    0.69 if ТН == "O2"
    0.83 if ТН == "Kr"
    0.89 if ТН == "Xe"
    0.65 if ТН == "Ne"
    0.82 if ТН == "CO2"
    NaN otherwise
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μ_0г := μ_0(ТН_г) = 2.344e-5
m_г := m(ТН_г) = 0.83
μ_0х := μ_0(ТН_х) = 2.344e-5
m_х := m(ТН_х) = 0.83
# Коэф. теплопроводности при абсолютном нуле (Вт/м/К):
# Показатель коэф. теплопроводности:
n(ТН) :=
    0.8 if ТН == "N2"
    1.53 if ТН == "NH3"
    0.8 if ТН == "Ar"
    0.78 if ТН == "H2"
    0.82 if ТН == "Air"
    0.73 if ТН == "He"
    0.87 if ТН == "O2"
    0.86 if ТН == "Kr"
    0.91 if ТН == "Xe"
    0.71 if ТН == "Ne"
    1.23 if ТН == "CO2"
    NaN otherwise
λ_0(ТН) := 10^-4*{
    241.9 if ТН == "N2"
    212 if ТН == "NH3"
    165.1 if ТН == "Ar"
    1721.2 if ТН == "H2"
    244.2 if ТН == "Air"
    1425.8 if ТН == "He"
    245.4 if ТН == "O2"
    88.9 if ТН == "Kr"
    52.3 if ТН == "Xe"
    464 if ТН == "Ne"
    147 if ТН == "CO2"
    NaN otherwise
}
λ_0г := λ_0(ТН_г) = 0.00889
n_г := n(ТН_г) = 0.86
λ_0х := λ_0(ТН_х) = 0.00889
n_х := n(ТН_х) = 0.86
# Коэф. динамической вязкости Х ТН (Па*с):
μ_х := μ_0х*(T_хср/T_0)^m_х = 3.47397e-5
# Коэф. теплопроводности Х ТН (Вт/м/К):
λ_х := λ_0х*(T_хср/T_0)^n_х = 0.0133643
# Плотность Х ТН (кг/м^3):
ρ_х := P_х/(R_х*T_хср) = 3.21301
# Теплоемкость Х ТН (Дж/кг/К):
C_pх := C_pх(T_хср)
# Количество тепла (мощности), получаемого Х ТН (Вт):
Q := C_pх*G_х*(T_х2 - T_х1)
# Расчет температуры на выходе и средней температуры Г ТН:
# Уравнение теплового баланса:
Q_х - Q_г == 0  # или
T_г2 := 412
Given
C_pх*G_х*(T_х2 - T_х1) - C_pг((T_г1 + T_г2)/2)*G_г*(T_г1 - T_г2) == 0
# Температура Г ТН на выходе (К):
T_г2 := Find(T_г2)
# Средняя температура Г ТН (К):
T_гср := (T_г1 + T_г2)/2
# Коэф. динамической вязкости Г ТН (Па*с):
μ_г := μ_0г*(T_гср/T_0)^m_г
# Коэф. теплопроводности Г ТН (Вт/м/К):
λ_г := λ_0г*(T_гср/T_0)^n_г
# Плотность Г ТН (кг/м^3):
ρ_г := P_г/(R_г*T_гср)
# Теплоемкость Г ТН (Дж/кг/К):
C_pг := C_pг(T_гср)
# Определение геометрических хар-к пов-тей ТО, используя табл. с. 88-89 уч. Иванова:
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# Эквивалентный диаметр (м):
d_э(Surface) :=
    1.49*10^-3 if Surface == 101
    1.42*10^-3 if Surface == 102
    1.73*10^-3 if Surface == 103
    2.38*10^-3 if Surface == 104
    1.21*10^-3 if Surface == 105
    1.4*10^-3 if Surface == 106
    1.22*10^-3 if Surface == 107
    NaN otherwise
d_э(surf_г) = 0.00142
d_э(surf_х) = 0.00122
# Высота пов-ти (м):
a(Surface) :=
    5.08*10^-3 if Surface == 101
    6.63*10^-3 if Surface == 102
    7.64*10^-3 if Surface == 103
    6.35*10^-3 if Surface == 104
    1.9*10^-3 if Surface == 105
    1.9*10^-3 if Surface == 106
    1.29*10^-3 if Surface == 107
    NaN otherwise
a(surf_г) = 0.00663
a(surf_х) = 0.00129
# Продольный размер пов-ти (м):
l(Surface) :=
    2.82*10^-3 if Surface == 101
    2.54*10^-3 if Surface == 102
    2.82*10^-3 if Surface == 103
    3.18*10^-3 if Surface == 104
    2.82*10^-3 if Surface == 105
    2.54*10^-3 if Surface == 106
    2.54*10^-3 if Surface == 107
    NaN otherwise
l(surf_г) = 0.00254
l(surf_х) = 0.00254
# Толщина ребра (м):
δ_р(Surface) :=
    0.1*10^-3 if Surface == 101
    0.1*10^-3 if Surface == 102
    0.1*10^-3 if Surface == 103
    0.1*10^-3 if Surface == 104
    0.1*10^-3 if Surface == 105
    0.1*10^-3 if Surface == 106
    0.05*10^-3 if Surface == 107
    NaN otherwise
δ_р(surf_г) = 0.0001
δ_р(surf_х) = 5e-5
# Толщина разделительного листа (м):
δ := 0.5*10^-3
# Условный коэф. компактности (м^-1):
β(Surface) :=
    2359 if Surface == 101
    2467 if Surface == 102
    2067 if Surface == 103
    1549 if Surface == 104
    2832 if Surface == 105
    2490 if Surface == 106
    3028 if Surface == 107
    NaN otherwise
β(surf_г) = 2467
β(surf_х) = 3028
# Отношение площади ребер к площади полной пов-ти:
Ф == F_р/F_ор
Ф(Surface) :=
    0.85 if Surface == 101
    0.887 if Surface == 102
    0.885 if Surface == 103
    0.809 if Surface == 104
    0.665 if Surface == 105
    0.611 if Surface == 106
    0.508 if Surface == 107
    NaN otherwise
Ф(surf_г) = 0.887
Ф(surf_х) = 0.508
# Расчет коэф. компактности и фронтового сечения:
# Коэф. компактности,
# приведенный к пов-ти А, Г ТН (м^-1):
K_Vг := a(surf_г)*β(surf_г)/(a(surf_г) + a(surf_х) + 2*δ) = 1833.66
# Коэф. компактности,
# приведенный к пов-ти А, Х ТН (м^-1):
K_Vх := a(surf_х)*β(surf_х)/(a(surf_г) + a(surf_х) + 2*δ) = 437.906
# Коэф. компактности,
# для гладкой пов-ти (м^-1):
K_Vгл := 1/(a(surf_г) + a(surf_х) + 2*δ) = 112.108
# Коэф. фронта Г ТН:
η_фг := K_Vг*d_э(surf_г)/4 = 0.650948
# Коэф. фронта Х ТН:
η_фх := K_Vх*d_э(surf_х)/4 = 0.133561
# Расчет коэф. потерь, зависящих только от геометрии пов-тей и температур ТН:
# Для Г ТН:
ξ_вхг := 0.5*(1 - η_фг)^0.75 = 0.227059
ξ_выхг := (1 - η_фг)^2 = 0.121837
A_г := (1 - η_фг^2 + ξ_вхг)*T_г1/T_гср + 2*(T_г2/T_г1 - 1)*T_г1/T_гср + (η_фг^2 - 1 + ξ_выхг)*T_г2/T_гср
# Для Х ТН:
ξ_вхх := 0.5*(1 - η_фх)^0.75 = 0.449028
ξ_выхх := (1 - η_фх)^2 = 0.750716
A_х := (1 - η_фх^2 + ξ_вхх)*T_х1/T_хср + 2*(T_х2/T_х1 - 1)*T_х1/T_хср + (η_фх^2 - 1 + ξ_выхх)*T_х2/T_хср = 1.83256
# Выражение скорости одного ТН (холодного) через скорость другого ТН (горячего)
# при параллельном течении (противотоке или прямотоке):
# Коэф. теплопроводности стали 12Х18Н10Т
# [component: outputs λ_Ст]
j := 1, 2 .. 9
v_х(v_г) := v_г*G_х*ρ_г*η_фг/(G_г*ρ_х*η_фх)
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M_λСт[j] := λ_Ст[j, 1]
M_T[j] := λ_Ст[j, 0]
M_λСт[j] =  # error
M_T[j] =  # error
λ_Ст(t) := interp(cspline(M_T, M_λСт), M_T, M_λСт, t)
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# Расчет чисел подобия (Re, Eu, Pr, Nu) по каждому ТН:
# Число Рейнольдса Re: | Число Прандтля Pr:
# Для Г ТН:
Re_г(v_г) := v_г*d_э(surf_г)*ρ_г/μ_г
# Для Г ТН:
Pr_г(v_г) := μ_г*C_pг/λ_г
# Для Х ТН:
Re_х(v_г) := v_х(v_г)*d_э(surf_х)*ρ_х/μ_х
# Для Х ТН:
Pr_х(v_г) := μ_х*C_pх/λ_х
# Число Эйлера Eu:
Eu(Surface, Re) :=
    if Surface == 101
        44.33*Re^-0.794 if 0 ≤ Re < 200
        36.2*Re^-0.756 if 200 ≤ Re < 500
        15.2*Re^-0.617 if 500 ≤ Re < 1000
        3.88*Re^-0.418 if 1000 ≤ Re < 1500
        2.331*Re^-0.348 if 1500 ≤ Re < 2000
        0.661*Re^-0.183 if 2000 ≤ Re < ∞
    if Surface == 102
        41.825*Re^-0.783 if 0 ≤ Re < 200
        37.655*Re^-0.763 if 200 ≤ Re < 500
        19.683*Re^-0.659 if 500 ≤ Re < 1000
        2.989*Re^-0.381 if 1000 ≤ Re < 2000
        0.819*Re^-0.215 if 2000 ≤ Re < ∞
    if Surface == 103
        38.68*Re^-0.799 if 0 ≤ Re < 300
        21.587*Re^-0.7 if 300 ≤ Re < 1200
        2.187*Re^-0.375 if 1200 ≤ Re < 3000
        0.693*Re^-0.23 if 3000 ≤ Re < ∞
    if Surface == 104
        27.124*Re^-0.763 if 0 ≤ Re < 600
        7.463*Re^-0.563 if 600 ≤ Re < 1200
        2.563*Re^-0.412 if 1200 ≤ Re < 2300
        0.293*Re^-0.136 if 2300 ≤ Re < ∞
    if Surface == 105
        30.97*Re^-0.731 if 0 ≤ Re < 500
        9.813*Re^-0.545 if 500 ≤ Re < 800
        3.374*Re^-0.386 if 800 ≤ Re < 1500
        1.283*Re^-0.254 if 1500 ≤ Re < ∞
    if Surface == 106
        33.463*Re^-0.805 if 0 ≤ Re < 300
        23.337*Re^-0.743 if 300 ≤ Re < 600
        7.178*Re^-0.558 if 600 ≤ Re < 1200
        2.359*Re^-0.402 if 1200 ≤ Re < ∞
    if Surface == 107
        28*Re^-0.744 if 0 ≤ Re < 400
        13.054*Re^-0.617 if 400 ≤ Re < 800
        2.84*Re^-0.389 if 800 ≤ Re < 1500
        0.888*Re^-0.230 if 1500 ≤ Re < ∞
    NaN otherwise
# Для Г ТН:
Eu_г(v_г) := Eu(surf_г, Re_г(v_г))
# Для Х ТН:
Eu_х(v_г) := Eu(surf_х, Re_х(v_г))
# Число Нуссельта  Nu:
Nu(Surface, Re, Pr) :=
    if Surface == 101
        0.473*Re^0.496*nthroot(Pr, 3) if 0 ≤ Re < 1200
        0.181*Re^0.631*nthroot(Pr, 3) if 1200 ≤ Re < ∞
    if Surface == 102
        1.696*Re^0.314*nthroot(Pr, 3) if 0 ≤ Re < 600
        0.731*Re^0.444*nthroot(Pr, 3) if 600 ≤ Re < 1200
        0.312*Re^0.565*nthroot(Pr, 3) if 1200 ≤ Re < ∞
    if Surface == 103
        1.585*Re^0.297*nthroot(Pr, 3) if 0 ≤ Re < 600
        0.422*Re^0.499*nthroot(Pr, 3) if 600 ≤ Re < 2000
        0.202*Re^0.599*nthroot(Pr, 3) if 2000 ≤ Re < ∞
    if Surface == 104
        0.92*Re^0.396*nthroot(Pr, 3) if 0 ≤ Re < 600
        0.395*Re^0.528*nthroot(Pr, 3) if 600 ≤ Re < 1200
        0.25*Re^0.591*nthroot(Pr, 3) if 1200 ≤ Re < 2300
        0.133*Re^0.67*nthroot(Pr, 3) if 2300 ≤ Re < ∞
    if Surface == 105
        0.41*Re^0.47*nthroot(Pr, 3) if 0 ≤ Re < 600
        0.093*Re^0.7*nthroot(Pr, 3) if 600 ≤ Re < ∞
    if Surface == 106
        0.357*Re^0.514*nthroot(Pr, 3) if 0 ≤ Re < 1000
        0.211*Re^0.59*nthroot(Pr, 3) if 1000 ≤ Re < 2000
        0.097*Re^0.693*nthroot(Pr, 3) if 2000 ≤ Re < ∞
    if Surface == 107
        0.36*Re^0.479*nthroot(Pr, 3) if 0 ≤ Re < 600
        0.175*Re^0.592*nthroot(Pr, 3) if 600 ≤ Re < 1200
        0.063*Re^0.736*nthroot(Pr, 3) if 1200 ≤ Re < ∞
    NaN otherwise
# Для Г ТН:
Nu_г(v_г) := Nu(surf_г, Re_г(v_г), Pr_г(v_г))
# Для Х ТН:
Nu_х(v_г) := Nu(surf_х, Re_х(v_г), Pr_х(v_г))
# Расчет коэф. ТО по каждому ТН:
# Для Г ТН:
α_г(v_г) := Nu_г(v_г)*λ_г/d_э(surf_г)
# Для Х ТН:
α_х(v_г) := Nu_х(v_г)*λ_х/d_э(surf_х)
# Средняя температура ТН (К):
T_ср := (T_гср + T_хср)/2
# Коэф. теплопроводности нержавеющей стали 12Х18Н10Т для средней температуры ТН:
λ_Ст := λ_Ст(T_ср)  # Вт/(м*К)
# Расчет параметра ребра:
# Для Г ТН:
m_г(v_г) := sqrt(2*α_г(v_г)/(λ_Ст*δ_р(surf_г)))
# Для Х ТН:
m_х(v_г) := sqrt(2*α_х(v_г)/(λ_Ст*δ_р(surf_х)))
# Расчет коэф. эффективности ребра:
# Для Г ТН:
η_рг(v_г) := tanh(0.5*m_г(v_г)*a(surf_г))/(0.5*m_г(v_г)*a(surf_г))
# Для Х ТН:
η_рх(v_г) := tanh(0.5*m_х(v_г)*a(surf_х))/(0.5*m_х(v_г)*a(surf_х))
# Расчет коэф. эффективности оребренной пов-ти:
# Для Г ТН:
η_орг(v_г) := 1 - Ф(surf_г)*(1 - η_рг(v_г))
# Для Х ТН:
η_орх(v_г) := 1 - Ф(surf_х)*(1 - η_рх(v_г))
# Расчет коэф. теплопередачи с учетом коэф. эффективности оребренных пов-тей, приведенного к Г пов-ти:
K_Fг(v_г) := 1/(1/(α_г(v_г)*η_орг(v_г)) + δ*K_Vг/(λ_Ст*K_Vгл) + 1/(α_х(v_г)*η_орх(v_г))*K_Vг/K_Vх)
# Выражение площади фронта через скорость Г ТН:
f_фр(v_г) := G_г/(v_г*ρ_г*η_фг)
# Расчет среднелогарифмического температурного напора при противоточном течении:
# Разности температур ТН
# на входе в ТОА и выходе из ТОА
# при противоточном течении:
ΔT_1 := T_г1 - T_х2 = 92.4  # К
ΔT_2 := T_г2 - T_х1  # К
ΔT_л := (ΔT_1 - ΔT_2)/ln(ΔT_1/ΔT_2)  # K
# Расчет длины матрицы по течению Г ТН:
L(v_г) := Q/(K_Fг(v_г)*ΔT_л*K_Vг*f_фр(v_г))
# Расчет относ. потерь давлений в матрице:
# Для Г ТН:
Δp_г(v_г) := (A_г + 2*Eu_г(v_г)*L(v_г)/l(surf_г))*v_г^2/(2*R_г*T_гср)
# Для Х ТН:
Δp_х(v_г) := (A_х + 2*Eu_х(v_г)*L(v_г)/l(surf_х))*v_х(v_г)^2/(2*R_х*T_хср)
# Трассировка скорости Г ТН (м/с):
v_г := 0, 0.01 .. 30
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# Расчет скорости горячего ТН:
v_г := 2
v_г := min(root(ΔP_х - Δp_х(v_г), v_г), root(ΔP_г - Δp_г(v_г), v_г))  # м/с
# Скорость Г ТН (м/с):
v_г =  # error
# Скорость Х ТН (м/с):
v_х := v_х(v_г)
# Определение относ. потерь давлений в матрице:
# Для Г ТН:
Δp_г(v_г) =  # error
# Для Х ТН:
Δp_х(v_г) =  # error
# Определение геометрических хар-к матрицы ТОА:
# Длина матрицы по течению Г ТН (м):
L(v_г) =  # error
# Площади фронта (м^2):
f_фр(v_г) =  # error
# Расчет площадь пов-ти ТО (м^2):
# Для Г ТН:
F_тог := K_Vг*f_фр(v_г)*L(v_г)
# Для Х ТН:
F_тох := K_Vх*f_фр(v_г)*L(v_г)
# При квадратном сечении:
# Высота матрицы ТОА (м):
H := sqrt(f_фр(v_г))
# Ширина матрицы ТОА (м):
B := sqrt(f_фр(v_г))
# Объем матрицы ТОА (м^3):
V := f_фр(v_г)*L(v_г)
# Задание 2. Определить величину поверхности теплообмена и геометрические размеры пластинчато-ребристой матрицы теплообменного аппарата для одноходовой перекрестной схемы при условии заданной величины потерь давления каждого теплоносителя.
# Исходные данные, расчет средних температур, теплофизических св-в ТН (плотности, теплоемкости, коэф. динамической язкости и теплопроводности),количества тепла, получаемого Х ТН, геометрических хар-к пов-тей ТО, коэф. компактности, коэф. фронтового сечения, коэф. потерь, зависящих только от геометрии пов-тей и температуры ТН, коэф. теплопроводности стали 12Х18Н10Т смотри Задание 1.
# Решение:
v_г := 0, 0.01 .. 50
# Трассировка скоростей ТН (м/с):
v_х := 0, 0.01 .. 50
# Расчет чисел подобия (Re, Eu, Pr, Nu) по каждому ТН:
# Число Рейнольдса Re: | Число Прандтля Pr:
# Для Г ТН:
Re_г(v_г) := v_г*d_э(surf_г)*ρ_г/μ_г
# Для Г ТН:
Pr_г(v_г) := μ_г*C_pг/λ_г
# Для Х ТН:
Re_х(v_х) := v_х*d_э(surf_х)*ρ_х/μ_х
# Для Х ТН:
Pr_х(v_х) := μ_х*C_pх/λ_х
# Число Эйлера Eu:
# Для Г ТН:
Eu_г(v_г) := Eu(surf_г, Re_г(v_г))
# Для Х ТН:
Eu_х(v_х) := Eu(surf_х, Re_х(v_х))
# Число Нуссельта  Nu:
# Для Г ТН:
Nu_г(v_г) := Nu(surf_г, Re_г(v_г), Pr_г(v_г))
# Для Х ТН:
Nu_х(v_х) := Nu(surf_х, Re_х(v_х), Pr_х(v_х))
# Расчет коэф. ТО по каждому ТН:
# Для Г ТН:
α_г(v_г) := Nu_г(v_г)*λ_г/d_э(surf_г)
# Для Х ТН:
α_х(v_х) := Nu_х(v_х)*λ_х/d_э(surf_х)
# Расчет размера матрицы L из ур-я потерь относительного давления Г ТН:
L(v_г) := (2*ΔP_г*R_г*T_гср/v_г^2 - A_г)*l(surf_г)/(2*Eu_г(v_г))
# Расчет параметра ребра:
# Для Г ТН:
m_г(v_г) := sqrt(2*α_г(v_г)/(λ_Ст*δ_р(surf_г)))
# Для Х ТН:
m_х(v_х) := sqrt(2*α_х(v_х)/(λ_Ст*δ_р(surf_х)))
# Расчет коэф. эффективности ребра:
# Для Г ТН:
η_рг(v_г) := tanh(0.5*m_г(v_г)*a(surf_г))/(0.5*m_г(v_г)*a(surf_г))
# Для Х ТН:
η_рх(v_х) := tanh(0.5*m_х(v_х)*a(surf_х))/(0.5*m_х(v_х)*a(surf_х))
# Отношение площади ребер к площади полной пов-ти:
# Для Г ТН:
Ф(surf_г) = 0.887
# Для Х ТН:
Ф(surf_х) = 0.508
# Расчет коэф. эффективности оребренной пов-ти:
# Для Г ТН:
η_орг(v_г) := 1 - Ф(surf_г)*(1 - η_рг(v_г))
# Для Х ТН:
η_орх(v_х) := 1 - Ф(surf_х)*(1 - η_рх(v_х))
# Расчет коэф. теплопередачи с учетом коэф. эффективности оребренных пов-тей, приведенного к Г пов-ти:
K_Fг(v_г, v_х) := 1/(1/(α_г(v_г)*η_орг(v_г)) + δ*K_Vг/(λ_Ст*K_Vгл) + 1/(α_х(v_х)*η_орх(v_х))*K_Vг/K_Vх)
# Выражение площади фронта через скорость Г ТН:
# Для Г ТН:
f_фрг(v_г) := G_г/(v_г*ρ_г*η_фг)
# Для Х ТН:
f_фрх(v_х) := G_х/(v_х*ρ_х*η_фх)
# Расчет среднеинтегрального температурного напора при перекрестном токе:
# Отношение водяных эквивалентов:
P := G_х*C_pх/(G_г*C_pг)
# Степень регенерации:
σ = 0.72
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# Поправка:
ψ := 0.71
# Расчет среднеинтегрального температурного напора при противотоке:
ΔT_лпрот := ΔT_л  # К
# Расчет среднеинтегрального температурного напора при перекрестном токе:
ΔT_лпер := ψ*ΔT_л  # К
# Расчет коэф. теплопередачи через ур-е теплопередачи:
k_Fг(v_г) := Q/(ΔT_лпер*f_фрг(v_г)*L(v_г)*K_Vг)
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# Расчет размеров квадратной матрицы H и B ТА из ур-я расхода:
H(v_г, v_х) := f_фрх(v_х)/L(v_г)
B(v_г, v_х) := f_фрг(v_г)/H(v_г, v_х)
# Расчетпотерь относительного давления Х ТН:
Δp_х(v_г, v_х) := (A_х + 2*Eu_х(v_х)*B(v_г, v_х)/l(surf_х))*v_х^2/(2*R_х*T_хср)
# Начальное приближение скоростей ТН (м/с):
[v_г; v_х] := [5; 10]
Given
K_Fг(v_г, v_х) == k_Fг(v_г)
Δp_х(v_г, v_х) == ΔP_х
# Скорость Г ТН:
# Скорость Х ТН:
[v_г; v_х] := Find(v_г, v_х)
# Определение геометрических хар-к матрицы ТОА:
# Длина матрицы ТА:
L(v_г) =  # error  # м
# Ширина матрицы ТА:
B(v_г, v_х) =  # error  # м
# Высота матрицы ТА:
H(v_г, v_х) =  # error  # м
# Площади фронта:
# Для Г ТН:
f_фрг(v_г) =  # error  # м^2
# Для Х ТН:
f_фрх(v_х) =  # error  # м^2
# Объем матрицы ТОА:
V := f_фрг(v_г)*L(v_г)  # м^3
# Расчет площадь пов-ти ТО:
# Для Г ТН:
F_тог := K_Vг*V  # м^2
# Для Х ТН:
F_тох := K_Vх*V  # м^2
# Произведение коэф. эффективности оребренной пов-ти на коэф. ТО
# через коэф. теплопередачи:
αη_орх(v_г) := (1/k_Fг(v_г) - 1/(α_г(v_г)*η_орг(v_г)) - δ*K_Vг/(λ_Ст*K_Vгл))^-1*K_Vг/K_Vх
# Произведение коэф. эффективности оребренной пов-ти на коэф. ТО,
# выраженное другим способом:
v_г := 0.001, 0.01 .. 30
αη(v_х) := η_орх(v_х)*α_х(v_х)
v_х := 0.001, 0.01 .. 30
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# Связь между скоростями Г и Х ТН:
v_х := 10
v_х(v_г) := root(αη_орх(v_г) - αη(v_х), v_х)
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# Список использованной литературы
#
# 1. Теплообменные аппараты и системы охлаждения газотурбинных и комбинированных установок. В.Л. Иванов, А.И. Леонтьев, Э.А. Манушин, М.И. Осипов. М: Издательство МГТУ им. Н.Э. Баумана, 2003г. 592с.
# 2. Справочник по теплофизическим свойствам газов и жидкостей. Н.Б. Варгафтик. М: Издательство Наука, 1972г. 720с.
# 3. Конспект лекций по предмету "Теплообменные аппараты". Лектор - Н.В. Васильев, 2021г.
